// SBML level 3 version 2

model biocrnpyler_359040()
  // model units - substance: mole, time: second, volume: litre, area: square_metre, length: metre, extent: mole

  // Compartments:
  compartment default = 1e-6;

  // Species:
  species dna_part_P_Tac_forward_part_P_Tet_forward_part_UTR1_forward_part_SrpR_forward_part_t16_forward_ in default = 0;
  species IPTG in default = 0;
  species LacI in default = 0;
  species complex_IPTG_2x_LacI_2x_ in default = 0;
  species aTc in default = 0;
  species TetR in default = 0;
  species complex_TetR_2x_aTc_2x_ in default = 0;
  species protein_RNAP in default = 0;
  species protein_Ribo in default = 0;
  species protein_RNAase in default = 0;
  species ordered_polymer_complex_part_P_Tac_protein_RNAP_forward__part_P_Tet_forward_part_UTR1_forward_part_SrpR_forward_part_t16_forward_ in default = 0;
  species rna_part_UTR1_forward_part_SrpR_forward_part_t16_forward_ in default = 0;
  species ordered_polymer_complex_part_P_Tac_protein_RNAP_forward__complex_part_P_Tet_protein_RNAP_forward__part_UTR1_forward_part_SrpR_forward_part_t16_forward_ in default = 0;
  species ordered_polymer_complex_part_P_Tac_protein_RNAP_forward__complex_TetR_2x_part_P_Tet_forward__part_UTR1_forward_part_SrpR_forward_part_t16_forward_ in default = 0;
  species ordered_polymer_complex_part_P_Tac_protein_RNAP_forward__complex_complex_TetR_2x_part_P_Tet__protein_RNAP_forward__part_UTR1_forward_part_SrpR_forward_part_t16_forward_ in default = 0;
  species ordered_polymer_complex_LacI_2x_part_P_Tac_forward__part_P_Tet_forward_part_UTR1_forward_part_SrpR_forward_part_t16_forward_ in default = 0;
  species ordered_polymer_complex_LacI_2x_part_P_Tac_forward__complex_part_P_Tet_protein_RNAP_forward__part_UTR1_forward_part_SrpR_forward_part_t16_forward_ in default = 0;
  species ordered_polymer_complex_LacI_2x_part_P_Tac_forward__complex_TetR_2x_part_P_Tet_forward__part_UTR1_forward_part_SrpR_forward_part_t16_forward_ in default = 0;
  species ordered_polymer_complex_LacI_2x_part_P_Tac_forward__complex_complex_TetR_2x_part_P_Tet__protein_RNAP_forward__part_UTR1_forward_part_SrpR_forward_part_t16_forward_ in default = 0;
  species ordered_polymer_complex_complex_LacI_2x_part_P_Tac__protein_RNAP_forward__part_P_Tet_forward_part_UTR1_forward_part_SrpR_forward_part_t16_forward_ in default = 0;
  species ordered_polymer_complex_complex_LacI_2x_part_P_Tac__protein_RNAP_forward__complex_part_P_Tet_protein_RNAP_forward__part_UTR1_forward_part_SrpR_forward_part_t16_forward_ in default = 0;
  species ordered_polymer_complex_complex_LacI_2x_part_P_Tac__protein_RNAP_forward__complex_TetR_2x_part_P_Tet_forward__part_UTR1_forward_part_SrpR_forward_part_t16_forward_ in default = 0;
  species ordered_polymer_complex_complex_LacI_2x_part_P_Tac__protein_RNAP_forward__complex_complex_TetR_2x_part_P_Tet__protein_RNAP_forward__part_UTR1_forward_part_SrpR_forward_part_t16_forward_ in default = 0;
  species ordered_polymer_part_P_Tac_forward_complex_TetR_2x_part_P_Tet_forward__part_UTR1_forward_part_SrpR_forward_part_t16_forward_ in default = 0;
  species rna_part_P_Tet_forward_part_UTR1_forward_part_SrpR_forward_part_t16_forward_ in default = 0;
  species ordered_polymer_part_P_Tac_forward_complex_part_P_Tet_protein_RNAP_forward__part_UTR1_forward_part_SrpR_forward_part_t16_forward_ in default = 0;
  species ordered_polymer_part_P_Tac_forward_complex_complex_TetR_2x_part_P_Tet__protein_RNAP_forward__part_UTR1_forward_part_SrpR_forward_part_t16_forward_ in default = 0;
  species ordered_polymer_part_P_Tet_forward_complex_part_UTR1_protein_Ribo_forward__part_SrpR_forward_part_t16_forward_ in default = 0;
  species protein_SrpR in default = 0;
  species ordered_polymer_complex_part_UTR1_protein_Ribo_forward__part_SrpR_forward_part_t16_forward_ in default = 0;
  species complex_protein_RNAase_rna_part_UTR1_forward_part_SrpR_forward_part_t16_forward__ in default = 0;
  species complex_protein_RNAase_rna_part_P_Tet_forward_part_UTR1_forward_part_SrpR_forward_part_t16_forward__ in default = 0;

  // Parameters:
  kb__ = 1;
  ku__ = 0.01;
  kb_P_Tet_leak_transcription = 2;
  ku_P_Tet_leak_transcription = 10;
  ktx_P_Tet_leak_transcription = 1;
  kb_P_Tet_TetR_transcription = 1;
  ku_P_Tet_TetR_transcription = 100;
  ktx_P_Tet_TetR_transcription = 1;
  kb_P_Tac_leak_transcription = 2;
  ku_P_Tac_leak_transcription = 10;
  ktx_P_Tac_leak_transcription = 1;
  kb_P_Tac_LacI_transcription = 1;
  ku_P_Tac_LacI_transcription = 100;
  ktx_P_Tac_LacI_transcription = 1;
  ktl__ = 0.2;
  kdeg__ = 2;

  // Reactions:
  r0: 2 IPTG + 2 LacI => complex_IPTG_2x_LacI_2x_; kb__*IPTG^2*LacI^2;
  r0rev: complex_IPTG_2x_LacI_2x_ => 2 IPTG + 2 LacI; ku__*complex_IPTG_2x_LacI_2x_;
  r1: 2 aTc + 2 TetR => complex_TetR_2x_aTc_2x_; kb__*aTc^2*TetR^2;
  r1rev: complex_TetR_2x_aTc_2x_ => 2 aTc + 2 TetR; ku__*complex_TetR_2x_aTc_2x_;
  r2: ordered_polymer_complex_part_P_Tac_protein_RNAP_forward__part_P_Tet_forward_part_UTR1_forward_part_SrpR_forward_part_t16_forward_ + protein_RNAP => ordered_polymer_complex_part_P_Tac_protein_RNAP_forward__complex_part_P_Tet_protein_RNAP_forward__part_UTR1_forward_part_SrpR_forward_part_t16_forward_; kb_P_Tet_leak_transcription*ordered_polymer_complex_part_P_Tac_protein_RNAP_forward__part_P_Tet_forward_part_UTR1_forward_part_SrpR_forward_part_t16_forward_*protein_RNAP;
  r2rev: ordered_polymer_complex_part_P_Tac_protein_RNAP_forward__complex_part_P_Tet_protein_RNAP_forward__part_UTR1_forward_part_SrpR_forward_part_t16_forward_ => ordered_polymer_complex_part_P_Tac_protein_RNAP_forward__part_P_Tet_forward_part_UTR1_forward_part_SrpR_forward_part_t16_forward_ + protein_RNAP; ku_P_Tet_leak_transcription*ordered_polymer_complex_part_P_Tac_protein_RNAP_forward__complex_part_P_Tet_protein_RNAP_forward__part_UTR1_forward_part_SrpR_forward_part_t16_forward_;
  r3: ordered_polymer_complex_part_P_Tac_protein_RNAP_forward__complex_part_P_Tet_protein_RNAP_forward__part_UTR1_forward_part_SrpR_forward_part_t16_forward_ => ordered_polymer_complex_part_P_Tac_protein_RNAP_forward__part_P_Tet_forward_part_UTR1_forward_part_SrpR_forward_part_t16_forward_ + rna_part_UTR1_forward_part_SrpR_forward_part_t16_forward_ + protein_RNAP; ktx_P_Tet_leak_transcription*ordered_polymer_complex_part_P_Tac_protein_RNAP_forward__complex_part_P_Tet_protein_RNAP_forward__part_UTR1_forward_part_SrpR_forward_part_t16_forward_;
  r4: 2 TetR + ordered_polymer_complex_part_P_Tac_protein_RNAP_forward__part_P_Tet_forward_part_UTR1_forward_part_SrpR_forward_part_t16_forward_ => ordered_polymer_complex_part_P_Tac_protein_RNAP_forward__complex_TetR_2x_part_P_Tet_forward__part_UTR1_forward_part_SrpR_forward_part_t16_forward_; kb__*TetR^2*ordered_polymer_complex_part_P_Tac_protein_RNAP_forward__part_P_Tet_forward_part_UTR1_forward_part_SrpR_forward_part_t16_forward_;
  r4rev: ordered_polymer_complex_part_P_Tac_protein_RNAP_forward__complex_TetR_2x_part_P_Tet_forward__part_UTR1_forward_part_SrpR_forward_part_t16_forward_ => 2 TetR + ordered_polymer_complex_part_P_Tac_protein_RNAP_forward__part_P_Tet_forward_part_UTR1_forward_part_SrpR_forward_part_t16_forward_; ku__*ordered_polymer_complex_part_P_Tac_protein_RNAP_forward__complex_TetR_2x_part_P_Tet_forward__part_UTR1_forward_part_SrpR_forward_part_t16_forward_;
  r5: ordered_polymer_complex_part_P_Tac_protein_RNAP_forward__complex_TetR_2x_part_P_Tet_forward__part_UTR1_forward_part_SrpR_forward_part_t16_forward_ + protein_RNAP => ordered_polymer_complex_part_P_Tac_protein_RNAP_forward__complex_complex_TetR_2x_part_P_Tet__protein_RNAP_forward__part_UTR1_forward_part_SrpR_forward_part_t16_forward_; kb_P_Tet_TetR_transcription*ordered_polymer_complex_part_P_Tac_protein_RNAP_forward__complex_TetR_2x_part_P_Tet_forward__part_UTR1_forward_part_SrpR_forward_part_t16_forward_*protein_RNAP;
  r5rev: ordered_polymer_complex_part_P_Tac_protein_RNAP_forward__complex_complex_TetR_2x_part_P_Tet__protein_RNAP_forward__part_UTR1_forward_part_SrpR_forward_part_t16_forward_ => ordered_polymer_complex_part_P_Tac_protein_RNAP_forward__complex_TetR_2x_part_P_Tet_forward__part_UTR1_forward_part_SrpR_forward_part_t16_forward_ + protein_RNAP; ku_P_Tet_TetR_transcription*ordered_polymer_complex_part_P_Tac_protein_RNAP_forward__complex_complex_TetR_2x_part_P_Tet__protein_RNAP_forward__part_UTR1_forward_part_SrpR_forward_part_t16_forward_;
  r6: ordered_polymer_complex_part_P_Tac_protein_RNAP_forward__complex_complex_TetR_2x_part_P_Tet__protein_RNAP_forward__part_UTR1_forward_part_SrpR_forward_part_t16_forward_ => ordered_polymer_complex_part_P_Tac_protein_RNAP_forward__complex_TetR_2x_part_P_Tet_forward__part_UTR1_forward_part_SrpR_forward_part_t16_forward_ + rna_part_UTR1_forward_part_SrpR_forward_part_t16_forward_ + protein_RNAP; ktx_P_Tet_TetR_transcription*ordered_polymer_complex_part_P_Tac_protein_RNAP_forward__complex_complex_TetR_2x_part_P_Tet__protein_RNAP_forward__part_UTR1_forward_part_SrpR_forward_part_t16_forward_;
  r7: ordered_polymer_complex_LacI_2x_part_P_Tac_forward__part_P_Tet_forward_part_UTR1_forward_part_SrpR_forward_part_t16_forward_ + protein_RNAP => ordered_polymer_complex_LacI_2x_part_P_Tac_forward__complex_part_P_Tet_protein_RNAP_forward__part_UTR1_forward_part_SrpR_forward_part_t16_forward_; kb_P_Tet_leak_transcription*ordered_polymer_complex_LacI_2x_part_P_Tac_forward__part_P_Tet_forward_part_UTR1_forward_part_SrpR_forward_part_t16_forward_*protein_RNAP;
  r7rev: ordered_polymer_complex_LacI_2x_part_P_Tac_forward__complex_part_P_Tet_protein_RNAP_forward__part_UTR1_forward_part_SrpR_forward_part_t16_forward_ => ordered_polymer_complex_LacI_2x_part_P_Tac_forward__part_P_Tet_forward_part_UTR1_forward_part_SrpR_forward_part_t16_forward_ + protein_RNAP; ku_P_Tet_leak_transcription*ordered_polymer_complex_LacI_2x_part_P_Tac_forward__complex_part_P_Tet_protein_RNAP_forward__part_UTR1_forward_part_SrpR_forward_part_t16_forward_;
  r8: ordered_polymer_complex_LacI_2x_part_P_Tac_forward__complex_part_P_Tet_protein_RNAP_forward__part_UTR1_forward_part_SrpR_forward_part_t16_forward_ => ordered_polymer_complex_LacI_2x_part_P_Tac_forward__part_P_Tet_forward_part_UTR1_forward_part_SrpR_forward_part_t16_forward_ + rna_part_UTR1_forward_part_SrpR_forward_part_t16_forward_ + protein_RNAP; ktx_P_Tet_leak_transcription*ordered_polymer_complex_LacI_2x_part_P_Tac_forward__complex_part_P_Tet_protein_RNAP_forward__part_UTR1_forward_part_SrpR_forward_part_t16_forward_;
  r9: 2 TetR + ordered_polymer_complex_LacI_2x_part_P_Tac_forward__part_P_Tet_forward_part_UTR1_forward_part_SrpR_forward_part_t16_forward_ => ordered_polymer_complex_LacI_2x_part_P_Tac_forward__complex_TetR_2x_part_P_Tet_forward__part_UTR1_forward_part_SrpR_forward_part_t16_forward_; kb__*TetR^2*ordered_polymer_complex_LacI_2x_part_P_Tac_forward__part_P_Tet_forward_part_UTR1_forward_part_SrpR_forward_part_t16_forward_;
  r9rev: ordered_polymer_complex_LacI_2x_part_P_Tac_forward__complex_TetR_2x_part_P_Tet_forward__part_UTR1_forward_part_SrpR_forward_part_t16_forward_ => 2 TetR + ordered_polymer_complex_LacI_2x_part_P_Tac_forward__part_P_Tet_forward_part_UTR1_forward_part_SrpR_forward_part_t16_forward_; ku__*ordered_polymer_complex_LacI_2x_part_P_Tac_forward__complex_TetR_2x_part_P_Tet_forward__part_UTR1_forward_part_SrpR_forward_part_t16_forward_;
  r10: ordered_polymer_complex_LacI_2x_part_P_Tac_forward__complex_TetR_2x_part_P_Tet_forward__part_UTR1_forward_part_SrpR_forward_part_t16_forward_ + protein_RNAP => ordered_polymer_complex_LacI_2x_part_P_Tac_forward__complex_complex_TetR_2x_part_P_Tet__protein_RNAP_forward__part_UTR1_forward_part_SrpR_forward_part_t16_forward_; kb_P_Tet_TetR_transcription*ordered_polymer_complex_LacI_2x_part_P_Tac_forward__complex_TetR_2x_part_P_Tet_forward__part_UTR1_forward_part_SrpR_forward_part_t16_forward_*protein_RNAP;
  r10rev: ordered_polymer_complex_LacI_2x_part_P_Tac_forward__complex_complex_TetR_2x_part_P_Tet__protein_RNAP_forward__part_UTR1_forward_part_SrpR_forward_part_t16_forward_ => ordered_polymer_complex_LacI_2x_part_P_Tac_forward__complex_TetR_2x_part_P_Tet_forward__part_UTR1_forward_part_SrpR_forward_part_t16_forward_ + protein_RNAP; ku_P_Tet_TetR_transcription*ordered_polymer_complex_LacI_2x_part_P_Tac_forward__complex_complex_TetR_2x_part_P_Tet__protein_RNAP_forward__part_UTR1_forward_part_SrpR_forward_part_t16_forward_;
  r11: ordered_polymer_complex_LacI_2x_part_P_Tac_forward__complex_complex_TetR_2x_part_P_Tet__protein_RNAP_forward__part_UTR1_forward_part_SrpR_forward_part_t16_forward_ => ordered_polymer_complex_LacI_2x_part_P_Tac_forward__complex_TetR_2x_part_P_Tet_forward__part_UTR1_forward_part_SrpR_forward_part_t16_forward_ + rna_part_UTR1_forward_part_SrpR_forward_part_t16_forward_ + protein_RNAP; ktx_P_Tet_TetR_transcription*ordered_polymer_complex_LacI_2x_part_P_Tac_forward__complex_complex_TetR_2x_part_P_Tet__protein_RNAP_forward__part_UTR1_forward_part_SrpR_forward_part_t16_forward_;
  r12: ordered_polymer_complex_complex_LacI_2x_part_P_Tac__protein_RNAP_forward__part_P_Tet_forward_part_UTR1_forward_part_SrpR_forward_part_t16_forward_ + protein_RNAP => ordered_polymer_complex_complex_LacI_2x_part_P_Tac__protein_RNAP_forward__complex_part_P_Tet_protein_RNAP_forward__part_UTR1_forward_part_SrpR_forward_part_t16_forward_; kb_P_Tet_leak_transcription*ordered_polymer_complex_complex_LacI_2x_part_P_Tac__protein_RNAP_forward__part_P_Tet_forward_part_UTR1_forward_part_SrpR_forward_part_t16_forward_*protein_RNAP;
  r12rev: ordered_polymer_complex_complex_LacI_2x_part_P_Tac__protein_RNAP_forward__complex_part_P_Tet_protein_RNAP_forward__part_UTR1_forward_part_SrpR_forward_part_t16_forward_ => ordered_polymer_complex_complex_LacI_2x_part_P_Tac__protein_RNAP_forward__part_P_Tet_forward_part_UTR1_forward_part_SrpR_forward_part_t16_forward_ + protein_RNAP; ku_P_Tet_leak_transcription*ordered_polymer_complex_complex_LacI_2x_part_P_Tac__protein_RNAP_forward__complex_part_P_Tet_protein_RNAP_forward__part_UTR1_forward_part_SrpR_forward_part_t16_forward_;
  r13: ordered_polymer_complex_complex_LacI_2x_part_P_Tac__protein_RNAP_forward__complex_part_P_Tet_protein_RNAP_forward__part_UTR1_forward_part_SrpR_forward_part_t16_forward_ => ordered_polymer_complex_complex_LacI_2x_part_P_Tac__protein_RNAP_forward__part_P_Tet_forward_part_UTR1_forward_part_SrpR_forward_part_t16_forward_ + rna_part_UTR1_forward_part_SrpR_forward_part_t16_forward_ + protein_RNAP; ktx_P_Tet_leak_transcription*ordered_polymer_complex_complex_LacI_2x_part_P_Tac__protein_RNAP_forward__complex_part_P_Tet_protein_RNAP_forward__part_UTR1_forward_part_SrpR_forward_part_t16_forward_;
  r14: 2 TetR + ordered_polymer_complex_complex_LacI_2x_part_P_Tac__protein_RNAP_forward__part_P_Tet_forward_part_UTR1_forward_part_SrpR_forward_part_t16_forward_ => ordered_polymer_complex_complex_LacI_2x_part_P_Tac__protein_RNAP_forward__complex_TetR_2x_part_P_Tet_forward__part_UTR1_forward_part_SrpR_forward_part_t16_forward_; kb__*TetR^2*ordered_polymer_complex_complex_LacI_2x_part_P_Tac__protein_RNAP_forward__part_P_Tet_forward_part_UTR1_forward_part_SrpR_forward_part_t16_forward_;
  r14rev: ordered_polymer_complex_complex_LacI_2x_part_P_Tac__protein_RNAP_forward__complex_TetR_2x_part_P_Tet_forward__part_UTR1_forward_part_SrpR_forward_part_t16_forward_ => 2 TetR + ordered_polymer_complex_complex_LacI_2x_part_P_Tac__protein_RNAP_forward__part_P_Tet_forward_part_UTR1_forward_part_SrpR_forward_part_t16_forward_; ku__*ordered_polymer_complex_complex_LacI_2x_part_P_Tac__protein_RNAP_forward__complex_TetR_2x_part_P_Tet_forward__part_UTR1_forward_part_SrpR_forward_part_t16_forward_;
  r15: ordered_polymer_complex_complex_LacI_2x_part_P_Tac__protein_RNAP_forward__complex_TetR_2x_part_P_Tet_forward__part_UTR1_forward_part_SrpR_forward_part_t16_forward_ + protein_RNAP => ordered_polymer_complex_complex_LacI_2x_part_P_Tac__protein_RNAP_forward__complex_complex_TetR_2x_part_P_Tet__protein_RNAP_forward__part_UTR1_forward_part_SrpR_forward_part_t16_forward_; kb_P_Tet_TetR_transcription*ordered_polymer_complex_complex_LacI_2x_part_P_Tac__protein_RNAP_forward__complex_TetR_2x_part_P_Tet_forward__part_UTR1_forward_part_SrpR_forward_part_t16_forward_*protein_RNAP;
  r15rev: ordered_polymer_complex_complex_LacI_2x_part_P_Tac__protein_RNAP_forward__complex_complex_TetR_2x_part_P_Tet__protein_RNAP_forward__part_UTR1_forward_part_SrpR_forward_part_t16_forward_ => ordered_polymer_complex_complex_LacI_2x_part_P_Tac__protein_RNAP_forward__complex_TetR_2x_part_P_Tet_forward__part_UTR1_forward_part_SrpR_forward_part_t16_forward_ + protein_RNAP; ku_P_Tet_TetR_transcription*ordered_polymer_complex_complex_LacI_2x_part_P_Tac__protein_RNAP_forward__complex_complex_TetR_2x_part_P_Tet__protein_RNAP_forward__part_UTR1_forward_part_SrpR_forward_part_t16_forward_;
  r16: ordered_polymer_complex_complex_LacI_2x_part_P_Tac__protein_RNAP_forward__complex_complex_TetR_2x_part_P_Tet__protein_RNAP_forward__part_UTR1_forward_part_SrpR_forward_part_t16_forward_ => ordered_polymer_complex_complex_LacI_2x_part_P_Tac__protein_RNAP_forward__complex_TetR_2x_part_P_Tet_forward__part_UTR1_forward_part_SrpR_forward_part_t16_forward_ + rna_part_UTR1_forward_part_SrpR_forward_part_t16_forward_ + protein_RNAP; ktx_P_Tet_TetR_transcription*ordered_polymer_complex_complex_LacI_2x_part_P_Tac__protein_RNAP_forward__complex_complex_TetR_2x_part_P_Tet__protein_RNAP_forward__part_UTR1_forward_part_SrpR_forward_part_t16_forward_;
  r17: ordered_polymer_part_P_Tac_forward_complex_TetR_2x_part_P_Tet_forward__part_UTR1_forward_part_SrpR_forward_part_t16_forward_ + protein_RNAP => ordered_polymer_complex_part_P_Tac_protein_RNAP_forward__complex_TetR_2x_part_P_Tet_forward__part_UTR1_forward_part_SrpR_forward_part_t16_forward_; kb_P_Tac_leak_transcription*ordered_polymer_part_P_Tac_forward_complex_TetR_2x_part_P_Tet_forward__part_UTR1_forward_part_SrpR_forward_part_t16_forward_*protein_RNAP;
  r17rev: ordered_polymer_complex_part_P_Tac_protein_RNAP_forward__complex_TetR_2x_part_P_Tet_forward__part_UTR1_forward_part_SrpR_forward_part_t16_forward_ => ordered_polymer_part_P_Tac_forward_complex_TetR_2x_part_P_Tet_forward__part_UTR1_forward_part_SrpR_forward_part_t16_forward_ + protein_RNAP; ku_P_Tac_leak_transcription*ordered_polymer_complex_part_P_Tac_protein_RNAP_forward__complex_TetR_2x_part_P_Tet_forward__part_UTR1_forward_part_SrpR_forward_part_t16_forward_;
  r18: ordered_polymer_complex_part_P_Tac_protein_RNAP_forward__complex_TetR_2x_part_P_Tet_forward__part_UTR1_forward_part_SrpR_forward_part_t16_forward_ => ordered_polymer_part_P_Tac_forward_complex_TetR_2x_part_P_Tet_forward__part_UTR1_forward_part_SrpR_forward_part_t16_forward_ + rna_part_P_Tet_forward_part_UTR1_forward_part_SrpR_forward_part_t16_forward_ + protein_RNAP; ktx_P_Tac_leak_transcription*ordered_polymer_complex_part_P_Tac_protein_RNAP_forward__complex_TetR_2x_part_P_Tet_forward__part_UTR1_forward_part_SrpR_forward_part_t16_forward_;
  r19: 2 LacI + ordered_polymer_part_P_Tac_forward_complex_TetR_2x_part_P_Tet_forward__part_UTR1_forward_part_SrpR_forward_part_t16_forward_ => ordered_polymer_complex_LacI_2x_part_P_Tac_forward__complex_TetR_2x_part_P_Tet_forward__part_UTR1_forward_part_SrpR_forward_part_t16_forward_; kb__*LacI^2*ordered_polymer_part_P_Tac_forward_complex_TetR_2x_part_P_Tet_forward__part_UTR1_forward_part_SrpR_forward_part_t16_forward_;
  r19rev: ordered_polymer_complex_LacI_2x_part_P_Tac_forward__complex_TetR_2x_part_P_Tet_forward__part_UTR1_forward_part_SrpR_forward_part_t16_forward_ => 2 LacI + ordered_polymer_part_P_Tac_forward_complex_TetR_2x_part_P_Tet_forward__part_UTR1_forward_part_SrpR_forward_part_t16_forward_; ku__*ordered_polymer_complex_LacI_2x_part_P_Tac_forward__complex_TetR_2x_part_P_Tet_forward__part_UTR1_forward_part_SrpR_forward_part_t16_forward_;
  r20: ordered_polymer_complex_LacI_2x_part_P_Tac_forward__complex_TetR_2x_part_P_Tet_forward__part_UTR1_forward_part_SrpR_forward_part_t16_forward_ + protein_RNAP => ordered_polymer_complex_complex_LacI_2x_part_P_Tac__protein_RNAP_forward__complex_TetR_2x_part_P_Tet_forward__part_UTR1_forward_part_SrpR_forward_part_t16_forward_; kb_P_Tac_LacI_transcription*ordered_polymer_complex_LacI_2x_part_P_Tac_forward__complex_TetR_2x_part_P_Tet_forward__part_UTR1_forward_part_SrpR_forward_part_t16_forward_*protein_RNAP;
  r20rev: ordered_polymer_complex_complex_LacI_2x_part_P_Tac__protein_RNAP_forward__complex_TetR_2x_part_P_Tet_forward__part_UTR1_forward_part_SrpR_forward_part_t16_forward_ => ordered_polymer_complex_LacI_2x_part_P_Tac_forward__complex_TetR_2x_part_P_Tet_forward__part_UTR1_forward_part_SrpR_forward_part_t16_forward_ + protein_RNAP; ku_P_Tac_LacI_transcription*ordered_polymer_complex_complex_LacI_2x_part_P_Tac__protein_RNAP_forward__complex_TetR_2x_part_P_Tet_forward__part_UTR1_forward_part_SrpR_forward_part_t16_forward_;
  r21: ordered_polymer_complex_complex_LacI_2x_part_P_Tac__protein_RNAP_forward__complex_TetR_2x_part_P_Tet_forward__part_UTR1_forward_part_SrpR_forward_part_t16_forward_ => ordered_polymer_complex_LacI_2x_part_P_Tac_forward__complex_TetR_2x_part_P_Tet_forward__part_UTR1_forward_part_SrpR_forward_part_t16_forward_ + rna_part_P_Tet_forward_part_UTR1_forward_part_SrpR_forward_part_t16_forward_ + protein_RNAP; ktx_P_Tac_LacI_transcription*ordered_polymer_complex_complex_LacI_2x_part_P_Tac__protein_RNAP_forward__complex_TetR_2x_part_P_Tet_forward__part_UTR1_forward_part_SrpR_forward_part_t16_forward_;
  r22: ordered_polymer_part_P_Tac_forward_complex_part_P_Tet_protein_RNAP_forward__part_UTR1_forward_part_SrpR_forward_part_t16_forward_ + protein_RNAP => ordered_polymer_complex_part_P_Tac_protein_RNAP_forward__complex_part_P_Tet_protein_RNAP_forward__part_UTR1_forward_part_SrpR_forward_part_t16_forward_; kb_P_Tac_leak_transcription*ordered_polymer_part_P_Tac_forward_complex_part_P_Tet_protein_RNAP_forward__part_UTR1_forward_part_SrpR_forward_part_t16_forward_*protein_RNAP;
  r22rev: ordered_polymer_complex_part_P_Tac_protein_RNAP_forward__complex_part_P_Tet_protein_RNAP_forward__part_UTR1_forward_part_SrpR_forward_part_t16_forward_ => ordered_polymer_part_P_Tac_forward_complex_part_P_Tet_protein_RNAP_forward__part_UTR1_forward_part_SrpR_forward_part_t16_forward_ + protein_RNAP; ku_P_Tac_leak_transcription*ordered_polymer_complex_part_P_Tac_protein_RNAP_forward__complex_part_P_Tet_protein_RNAP_forward__part_UTR1_forward_part_SrpR_forward_part_t16_forward_;
  r23: ordered_polymer_complex_part_P_Tac_protein_RNAP_forward__complex_part_P_Tet_protein_RNAP_forward__part_UTR1_forward_part_SrpR_forward_part_t16_forward_ => ordered_polymer_part_P_Tac_forward_complex_part_P_Tet_protein_RNAP_forward__part_UTR1_forward_part_SrpR_forward_part_t16_forward_ + rna_part_P_Tet_forward_part_UTR1_forward_part_SrpR_forward_part_t16_forward_ + protein_RNAP; ktx_P_Tac_leak_transcription*ordered_polymer_complex_part_P_Tac_protein_RNAP_forward__complex_part_P_Tet_protein_RNAP_forward__part_UTR1_forward_part_SrpR_forward_part_t16_forward_;
  r24: 2 LacI + ordered_polymer_part_P_Tac_forward_complex_part_P_Tet_protein_RNAP_forward__part_UTR1_forward_part_SrpR_forward_part_t16_forward_ => ordered_polymer_complex_LacI_2x_part_P_Tac_forward__complex_part_P_Tet_protein_RNAP_forward__part_UTR1_forward_part_SrpR_forward_part_t16_forward_; kb__*LacI^2*ordered_polymer_part_P_Tac_forward_complex_part_P_Tet_protein_RNAP_forward__part_UTR1_forward_part_SrpR_forward_part_t16_forward_;
  r24rev: ordered_polymer_complex_LacI_2x_part_P_Tac_forward__complex_part_P_Tet_protein_RNAP_forward__part_UTR1_forward_part_SrpR_forward_part_t16_forward_ => 2 LacI + ordered_polymer_part_P_Tac_forward_complex_part_P_Tet_protein_RNAP_forward__part_UTR1_forward_part_SrpR_forward_part_t16_forward_; ku__*ordered_polymer_complex_LacI_2x_part_P_Tac_forward__complex_part_P_Tet_protein_RNAP_forward__part_UTR1_forward_part_SrpR_forward_part_t16_forward_;
  r25: ordered_polymer_complex_LacI_2x_part_P_Tac_forward__complex_part_P_Tet_protein_RNAP_forward__part_UTR1_forward_part_SrpR_forward_part_t16_forward_ + protein_RNAP => ordered_polymer_complex_complex_LacI_2x_part_P_Tac__protein_RNAP_forward__complex_part_P_Tet_protein_RNAP_forward__part_UTR1_forward_part_SrpR_forward_part_t16_forward_; kb_P_Tac_LacI_transcription*ordered_polymer_complex_LacI_2x_part_P_Tac_forward__complex_part_P_Tet_protein_RNAP_forward__part_UTR1_forward_part_SrpR_forward_part_t16_forward_*protein_RNAP;
  r25rev: ordered_polymer_complex_complex_LacI_2x_part_P_Tac__protein_RNAP_forward__complex_part_P_Tet_protein_RNAP_forward__part_UTR1_forward_part_SrpR_forward_part_t16_forward_ => ordered_polymer_complex_LacI_2x_part_P_Tac_forward__complex_part_P_Tet_protein_RNAP_forward__part_UTR1_forward_part_SrpR_forward_part_t16_forward_ + protein_RNAP; ku_P_Tac_LacI_transcription*ordered_polymer_complex_complex_LacI_2x_part_P_Tac__protein_RNAP_forward__complex_part_P_Tet_protein_RNAP_forward__part_UTR1_forward_part_SrpR_forward_part_t16_forward_;
  r26: ordered_polymer_complex_complex_LacI_2x_part_P_Tac__protein_RNAP_forward__complex_part_P_Tet_protein_RNAP_forward__part_UTR1_forward_part_SrpR_forward_part_t16_forward_ => ordered_polymer_complex_LacI_2x_part_P_Tac_forward__complex_part_P_Tet_protein_RNAP_forward__part_UTR1_forward_part_SrpR_forward_part_t16_forward_ + rna_part_P_Tet_forward_part_UTR1_forward_part_SrpR_forward_part_t16_forward_ + protein_RNAP; ktx_P_Tac_LacI_transcription*ordered_polymer_complex_complex_LacI_2x_part_P_Tac__protein_RNAP_forward__complex_part_P_Tet_protein_RNAP_forward__part_UTR1_forward_part_SrpR_forward_part_t16_forward_;
  r27: ordered_polymer_part_P_Tac_forward_complex_complex_TetR_2x_part_P_Tet__protein_RNAP_forward__part_UTR1_forward_part_SrpR_forward_part_t16_forward_ + protein_RNAP => ordered_polymer_complex_part_P_Tac_protein_RNAP_forward__complex_complex_TetR_2x_part_P_Tet__protein_RNAP_forward__part_UTR1_forward_part_SrpR_forward_part_t16_forward_; kb_P_Tac_leak_transcription*ordered_polymer_part_P_Tac_forward_complex_complex_TetR_2x_part_P_Tet__protein_RNAP_forward__part_UTR1_forward_part_SrpR_forward_part_t16_forward_*protein_RNAP;
  r27rev: ordered_polymer_complex_part_P_Tac_protein_RNAP_forward__complex_complex_TetR_2x_part_P_Tet__protein_RNAP_forward__part_UTR1_forward_part_SrpR_forward_part_t16_forward_ => ordered_polymer_part_P_Tac_forward_complex_complex_TetR_2x_part_P_Tet__protein_RNAP_forward__part_UTR1_forward_part_SrpR_forward_part_t16_forward_ + protein_RNAP; ku_P_Tac_leak_transcription*ordered_polymer_complex_part_P_Tac_protein_RNAP_forward__complex_complex_TetR_2x_part_P_Tet__protein_RNAP_forward__part_UTR1_forward_part_SrpR_forward_part_t16_forward_;
  r28: ordered_polymer_complex_part_P_Tac_protein_RNAP_forward__complex_complex_TetR_2x_part_P_Tet__protein_RNAP_forward__part_UTR1_forward_part_SrpR_forward_part_t16_forward_ => ordered_polymer_part_P_Tac_forward_complex_complex_TetR_2x_part_P_Tet__protein_RNAP_forward__part_UTR1_forward_part_SrpR_forward_part_t16_forward_ + rna_part_P_Tet_forward_part_UTR1_forward_part_SrpR_forward_part_t16_forward_ + protein_RNAP; ktx_P_Tac_leak_transcription*ordered_polymer_complex_part_P_Tac_protein_RNAP_forward__complex_complex_TetR_2x_part_P_Tet__protein_RNAP_forward__part_UTR1_forward_part_SrpR_forward_part_t16_forward_;
  r29: 2 LacI + ordered_polymer_part_P_Tac_forward_complex_complex_TetR_2x_part_P_Tet__protein_RNAP_forward__part_UTR1_forward_part_SrpR_forward_part_t16_forward_ => ordered_polymer_complex_LacI_2x_part_P_Tac_forward__complex_complex_TetR_2x_part_P_Tet__protein_RNAP_forward__part_UTR1_forward_part_SrpR_forward_part_t16_forward_; kb__*LacI^2*ordered_polymer_part_P_Tac_forward_complex_complex_TetR_2x_part_P_Tet__protein_RNAP_forward__part_UTR1_forward_part_SrpR_forward_part_t16_forward_;
  r29rev: ordered_polymer_complex_LacI_2x_part_P_Tac_forward__complex_complex_TetR_2x_part_P_Tet__protein_RNAP_forward__part_UTR1_forward_part_SrpR_forward_part_t16_forward_ => 2 LacI + ordered_polymer_part_P_Tac_forward_complex_complex_TetR_2x_part_P_Tet__protein_RNAP_forward__part_UTR1_forward_part_SrpR_forward_part_t16_forward_; ku__*ordered_polymer_complex_LacI_2x_part_P_Tac_forward__complex_complex_TetR_2x_part_P_Tet__protein_RNAP_forward__part_UTR1_forward_part_SrpR_forward_part_t16_forward_;
  r30: ordered_polymer_complex_LacI_2x_part_P_Tac_forward__complex_complex_TetR_2x_part_P_Tet__protein_RNAP_forward__part_UTR1_forward_part_SrpR_forward_part_t16_forward_ + protein_RNAP => ordered_polymer_complex_complex_LacI_2x_part_P_Tac__protein_RNAP_forward__complex_complex_TetR_2x_part_P_Tet__protein_RNAP_forward__part_UTR1_forward_part_SrpR_forward_part_t16_forward_; kb_P_Tac_LacI_transcription*ordered_polymer_complex_LacI_2x_part_P_Tac_forward__complex_complex_TetR_2x_part_P_Tet__protein_RNAP_forward__part_UTR1_forward_part_SrpR_forward_part_t16_forward_*protein_RNAP;
  r30rev: ordered_polymer_complex_complex_LacI_2x_part_P_Tac__protein_RNAP_forward__complex_complex_TetR_2x_part_P_Tet__protein_RNAP_forward__part_UTR1_forward_part_SrpR_forward_part_t16_forward_ => ordered_polymer_complex_LacI_2x_part_P_Tac_forward__complex_complex_TetR_2x_part_P_Tet__protein_RNAP_forward__part_UTR1_forward_part_SrpR_forward_part_t16_forward_ + protein_RNAP; ku_P_Tac_LacI_transcription*ordered_polymer_complex_complex_LacI_2x_part_P_Tac__protein_RNAP_forward__complex_complex_TetR_2x_part_P_Tet__protein_RNAP_forward__part_UTR1_forward_part_SrpR_forward_part_t16_forward_;
  r31: ordered_polymer_complex_complex_LacI_2x_part_P_Tac__protein_RNAP_forward__complex_complex_TetR_2x_part_P_Tet__protein_RNAP_forward__part_UTR1_forward_part_SrpR_forward_part_t16_forward_ => ordered_polymer_complex_LacI_2x_part_P_Tac_forward__complex_complex_TetR_2x_part_P_Tet__protein_RNAP_forward__part_UTR1_forward_part_SrpR_forward_part_t16_forward_ + rna_part_P_Tet_forward_part_UTR1_forward_part_SrpR_forward_part_t16_forward_ + protein_RNAP; ktx_P_Tac_LacI_transcription*ordered_polymer_complex_complex_LacI_2x_part_P_Tac__protein_RNAP_forward__complex_complex_TetR_2x_part_P_Tet__protein_RNAP_forward__part_UTR1_forward_part_SrpR_forward_part_t16_forward_;
  r32: dna_part_P_Tac_forward_part_P_Tet_forward_part_UTR1_forward_part_SrpR_forward_part_t16_forward_ + protein_RNAP => ordered_polymer_complex_part_P_Tac_protein_RNAP_forward__part_P_Tet_forward_part_UTR1_forward_part_SrpR_forward_part_t16_forward_; kb_P_Tac_leak_transcription*dna_part_P_Tac_forward_part_P_Tet_forward_part_UTR1_forward_part_SrpR_forward_part_t16_forward_*protein_RNAP;
  r32rev: ordered_polymer_complex_part_P_Tac_protein_RNAP_forward__part_P_Tet_forward_part_UTR1_forward_part_SrpR_forward_part_t16_forward_ => dna_part_P_Tac_forward_part_P_Tet_forward_part_UTR1_forward_part_SrpR_forward_part_t16_forward_ + protein_RNAP; ku_P_Tac_leak_transcription*ordered_polymer_complex_part_P_Tac_protein_RNAP_forward__part_P_Tet_forward_part_UTR1_forward_part_SrpR_forward_part_t16_forward_;
  r33: ordered_polymer_complex_part_P_Tac_protein_RNAP_forward__part_P_Tet_forward_part_UTR1_forward_part_SrpR_forward_part_t16_forward_ => dna_part_P_Tac_forward_part_P_Tet_forward_part_UTR1_forward_part_SrpR_forward_part_t16_forward_ + rna_part_P_Tet_forward_part_UTR1_forward_part_SrpR_forward_part_t16_forward_ + protein_RNAP; ktx_P_Tac_leak_transcription*ordered_polymer_complex_part_P_Tac_protein_RNAP_forward__part_P_Tet_forward_part_UTR1_forward_part_SrpR_forward_part_t16_forward_;
  r34: 2 LacI + dna_part_P_Tac_forward_part_P_Tet_forward_part_UTR1_forward_part_SrpR_forward_part_t16_forward_ => ordered_polymer_complex_LacI_2x_part_P_Tac_forward__part_P_Tet_forward_part_UTR1_forward_part_SrpR_forward_part_t16_forward_; kb__*LacI^2*dna_part_P_Tac_forward_part_P_Tet_forward_part_UTR1_forward_part_SrpR_forward_part_t16_forward_;
  r34rev: ordered_polymer_complex_LacI_2x_part_P_Tac_forward__part_P_Tet_forward_part_UTR1_forward_part_SrpR_forward_part_t16_forward_ => 2 LacI + dna_part_P_Tac_forward_part_P_Tet_forward_part_UTR1_forward_part_SrpR_forward_part_t16_forward_; ku__*ordered_polymer_complex_LacI_2x_part_P_Tac_forward__part_P_Tet_forward_part_UTR1_forward_part_SrpR_forward_part_t16_forward_;
  r35: ordered_polymer_complex_LacI_2x_part_P_Tac_forward__part_P_Tet_forward_part_UTR1_forward_part_SrpR_forward_part_t16_forward_ + protein_RNAP => ordered_polymer_complex_complex_LacI_2x_part_P_Tac__protein_RNAP_forward__part_P_Tet_forward_part_UTR1_forward_part_SrpR_forward_part_t16_forward_; kb_P_Tac_LacI_transcription*ordered_polymer_complex_LacI_2x_part_P_Tac_forward__part_P_Tet_forward_part_UTR1_forward_part_SrpR_forward_part_t16_forward_*protein_RNAP;
  r35rev: ordered_polymer_complex_complex_LacI_2x_part_P_Tac__protein_RNAP_forward__part_P_Tet_forward_part_UTR1_forward_part_SrpR_forward_part_t16_forward_ => ordered_polymer_complex_LacI_2x_part_P_Tac_forward__part_P_Tet_forward_part_UTR1_forward_part_SrpR_forward_part_t16_forward_ + protein_RNAP; ku_P_Tac_LacI_transcription*ordered_polymer_complex_complex_LacI_2x_part_P_Tac__protein_RNAP_forward__part_P_Tet_forward_part_UTR1_forward_part_SrpR_forward_part_t16_forward_;
  r36: ordered_polymer_complex_complex_LacI_2x_part_P_Tac__protein_RNAP_forward__part_P_Tet_forward_part_UTR1_forward_part_SrpR_forward_part_t16_forward_ => ordered_polymer_complex_LacI_2x_part_P_Tac_forward__part_P_Tet_forward_part_UTR1_forward_part_SrpR_forward_part_t16_forward_ + rna_part_P_Tet_forward_part_UTR1_forward_part_SrpR_forward_part_t16_forward_ + protein_RNAP; ktx_P_Tac_LacI_transcription*ordered_polymer_complex_complex_LacI_2x_part_P_Tac__protein_RNAP_forward__part_P_Tet_forward_part_UTR1_forward_part_SrpR_forward_part_t16_forward_;
  r37: dna_part_P_Tac_forward_part_P_Tet_forward_part_UTR1_forward_part_SrpR_forward_part_t16_forward_ + protein_RNAP => ordered_polymer_part_P_Tac_forward_complex_part_P_Tet_protein_RNAP_forward__part_UTR1_forward_part_SrpR_forward_part_t16_forward_; kb_P_Tet_leak_transcription*dna_part_P_Tac_forward_part_P_Tet_forward_part_UTR1_forward_part_SrpR_forward_part_t16_forward_*protein_RNAP;
  r37rev: ordered_polymer_part_P_Tac_forward_complex_part_P_Tet_protein_RNAP_forward__part_UTR1_forward_part_SrpR_forward_part_t16_forward_ => dna_part_P_Tac_forward_part_P_Tet_forward_part_UTR1_forward_part_SrpR_forward_part_t16_forward_ + protein_RNAP; ku_P_Tet_leak_transcription*ordered_polymer_part_P_Tac_forward_complex_part_P_Tet_protein_RNAP_forward__part_UTR1_forward_part_SrpR_forward_part_t16_forward_;
  r38: ordered_polymer_part_P_Tac_forward_complex_part_P_Tet_protein_RNAP_forward__part_UTR1_forward_part_SrpR_forward_part_t16_forward_ => dna_part_P_Tac_forward_part_P_Tet_forward_part_UTR1_forward_part_SrpR_forward_part_t16_forward_ + rna_part_UTR1_forward_part_SrpR_forward_part_t16_forward_ + protein_RNAP; ktx_P_Tet_leak_transcription*ordered_polymer_part_P_Tac_forward_complex_part_P_Tet_protein_RNAP_forward__part_UTR1_forward_part_SrpR_forward_part_t16_forward_;
  r39: 2 TetR + dna_part_P_Tac_forward_part_P_Tet_forward_part_UTR1_forward_part_SrpR_forward_part_t16_forward_ => ordered_polymer_part_P_Tac_forward_complex_TetR_2x_part_P_Tet_forward__part_UTR1_forward_part_SrpR_forward_part_t16_forward_; kb__*TetR^2*dna_part_P_Tac_forward_part_P_Tet_forward_part_UTR1_forward_part_SrpR_forward_part_t16_forward_;
  r39rev: ordered_polymer_part_P_Tac_forward_complex_TetR_2x_part_P_Tet_forward__part_UTR1_forward_part_SrpR_forward_part_t16_forward_ => 2 TetR + dna_part_P_Tac_forward_part_P_Tet_forward_part_UTR1_forward_part_SrpR_forward_part_t16_forward_; ku__*ordered_polymer_part_P_Tac_forward_complex_TetR_2x_part_P_Tet_forward__part_UTR1_forward_part_SrpR_forward_part_t16_forward_;
  r40: ordered_polymer_part_P_Tac_forward_complex_TetR_2x_part_P_Tet_forward__part_UTR1_forward_part_SrpR_forward_part_t16_forward_ + protein_RNAP => ordered_polymer_part_P_Tac_forward_complex_complex_TetR_2x_part_P_Tet__protein_RNAP_forward__part_UTR1_forward_part_SrpR_forward_part_t16_forward_; kb_P_Tet_TetR_transcription*ordered_polymer_part_P_Tac_forward_complex_TetR_2x_part_P_Tet_forward__part_UTR1_forward_part_SrpR_forward_part_t16_forward_*protein_RNAP;
  r40rev: ordered_polymer_part_P_Tac_forward_complex_complex_TetR_2x_part_P_Tet__protein_RNAP_forward__part_UTR1_forward_part_SrpR_forward_part_t16_forward_ => ordered_polymer_part_P_Tac_forward_complex_TetR_2x_part_P_Tet_forward__part_UTR1_forward_part_SrpR_forward_part_t16_forward_ + protein_RNAP; ku_P_Tet_TetR_transcription*ordered_polymer_part_P_Tac_forward_complex_complex_TetR_2x_part_P_Tet__protein_RNAP_forward__part_UTR1_forward_part_SrpR_forward_part_t16_forward_;
  r41: ordered_polymer_part_P_Tac_forward_complex_complex_TetR_2x_part_P_Tet__protein_RNAP_forward__part_UTR1_forward_part_SrpR_forward_part_t16_forward_ => ordered_polymer_part_P_Tac_forward_complex_TetR_2x_part_P_Tet_forward__part_UTR1_forward_part_SrpR_forward_part_t16_forward_ + rna_part_UTR1_forward_part_SrpR_forward_part_t16_forward_ + protein_RNAP; ktx_P_Tet_TetR_transcription*ordered_polymer_part_P_Tac_forward_complex_complex_TetR_2x_part_P_Tet__protein_RNAP_forward__part_UTR1_forward_part_SrpR_forward_part_t16_forward_;
  r42: rna_part_P_Tet_forward_part_UTR1_forward_part_SrpR_forward_part_t16_forward_ + protein_Ribo => ordered_polymer_part_P_Tet_forward_complex_part_UTR1_protein_Ribo_forward__part_SrpR_forward_part_t16_forward_; kb__*rna_part_P_Tet_forward_part_UTR1_forward_part_SrpR_forward_part_t16_forward_*protein_Ribo;
  r42rev: ordered_polymer_part_P_Tet_forward_complex_part_UTR1_protein_Ribo_forward__part_SrpR_forward_part_t16_forward_ => rna_part_P_Tet_forward_part_UTR1_forward_part_SrpR_forward_part_t16_forward_ + protein_Ribo; ku__*ordered_polymer_part_P_Tet_forward_complex_part_UTR1_protein_Ribo_forward__part_SrpR_forward_part_t16_forward_;
  r43: ordered_polymer_part_P_Tet_forward_complex_part_UTR1_protein_Ribo_forward__part_SrpR_forward_part_t16_forward_ => rna_part_P_Tet_forward_part_UTR1_forward_part_SrpR_forward_part_t16_forward_ + protein_SrpR + protein_Ribo; ktl__*ordered_polymer_part_P_Tet_forward_complex_part_UTR1_protein_Ribo_forward__part_SrpR_forward_part_t16_forward_;
  r44: rna_part_UTR1_forward_part_SrpR_forward_part_t16_forward_ + protein_Ribo => ordered_polymer_complex_part_UTR1_protein_Ribo_forward__part_SrpR_forward_part_t16_forward_; kb__*rna_part_UTR1_forward_part_SrpR_forward_part_t16_forward_*protein_Ribo;
  r44rev: ordered_polymer_complex_part_UTR1_protein_Ribo_forward__part_SrpR_forward_part_t16_forward_ => rna_part_UTR1_forward_part_SrpR_forward_part_t16_forward_ + protein_Ribo; ku__*ordered_polymer_complex_part_UTR1_protein_Ribo_forward__part_SrpR_forward_part_t16_forward_;
  r45: ordered_polymer_complex_part_UTR1_protein_Ribo_forward__part_SrpR_forward_part_t16_forward_ => rna_part_UTR1_forward_part_SrpR_forward_part_t16_forward_ + protein_SrpR + protein_Ribo; ktl__*ordered_polymer_complex_part_UTR1_protein_Ribo_forward__part_SrpR_forward_part_t16_forward_;
  r46: rna_part_UTR1_forward_part_SrpR_forward_part_t16_forward_ + protein_RNAase => complex_protein_RNAase_rna_part_UTR1_forward_part_SrpR_forward_part_t16_forward__; kb__*rna_part_UTR1_forward_part_SrpR_forward_part_t16_forward_*protein_RNAase;
  r46rev: complex_protein_RNAase_rna_part_UTR1_forward_part_SrpR_forward_part_t16_forward__ => rna_part_UTR1_forward_part_SrpR_forward_part_t16_forward_ + protein_RNAase; ku__*complex_protein_RNAase_rna_part_UTR1_forward_part_SrpR_forward_part_t16_forward__;
  r47: complex_protein_RNAase_rna_part_UTR1_forward_part_SrpR_forward_part_t16_forward__ => protein_RNAase; kdeg__*complex_protein_RNAase_rna_part_UTR1_forward_part_SrpR_forward_part_t16_forward__;
  r48: rna_part_P_Tet_forward_part_UTR1_forward_part_SrpR_forward_part_t16_forward_ + protein_RNAase => complex_protein_RNAase_rna_part_P_Tet_forward_part_UTR1_forward_part_SrpR_forward_part_t16_forward__; kb__*rna_part_P_Tet_forward_part_UTR1_forward_part_SrpR_forward_part_t16_forward_*protein_RNAase;
  r48rev: complex_protein_RNAase_rna_part_P_Tet_forward_part_UTR1_forward_part_SrpR_forward_part_t16_forward__ => rna_part_P_Tet_forward_part_UTR1_forward_part_SrpR_forward_part_t16_forward_ + protein_RNAase; ku__*complex_protein_RNAase_rna_part_P_Tet_forward_part_UTR1_forward_part_SrpR_forward_part_t16_forward__;
  r49: complex_protein_RNAase_rna_part_P_Tet_forward_part_UTR1_forward_part_SrpR_forward_part_t16_forward__ => protein_RNAase; kdeg__*complex_protein_RNAase_rna_part_P_Tet_forward_part_UTR1_forward_part_SrpR_forward_part_t16_forward__;

  // Unit definitions:
  unit square_metre = metre^2;
end
