// SBML level 3 version 2

model biocrnpyler_305743()
  // model units - substance: mole, time: second, volume: litre, area: square_metre, length: metre, extent: mole

  // Compartments:
  compartment default = 1e-6;

  // Species:
  species dna_part_P_SrpR_forward_part_P_BetI_forward_part_UTR1_forward_part_PhlF_forward_part_t16_forward_ in default = 0;
  species dna_part_P_Tac_forward_part_P_Tet_forward_part_UTR1_forward_part_SrpR_forward_part_t16_forward_ in default = 0;
  species dna_part_P_HlyIIR_forward_part_P_AmeR_forward_part_UTR1_forward_part_BetI_forward_part_t16_forward_ in default = 0;
  species dna_part_P_Tet_forward_part_UTR1_forward_part_AmeR_forward_part_t16_forward_ in default = 0;
  species dna_part_P_Tac_forward_part_UTR1_forward_part_HlyIIR_forward_part_t16_forward_ in default = 0;
  species dna_part_P_BAD_forward_part_UTR1_forward_part_AmtR_forward_part_t16_forward_ in default = 0;
  species dna_part_P_PhlF_forward_part_P_AmtR_forward_part_UTR1_forward_part_YFP_forward_part_t16_forward_ in default = 0;
  species IPTG in default = 0;
  species LacI in default = 0;
  species complex_IPTG_2x_LacI_2x_ in default = 0;
  species aTc in default = 0;
  species TetR in default = 0;
  species complex_TetR_2x_aTc_2x_ in default = 0;
  species Ara in default = 0;
  species AraC in default = 0;
  species complex_Ara_2x_AraC_2x_ in default = 0;
  species protein_RNAP in default = 0;
  species protein_Ribo in default = 0;
  species protein_RNAase in default = 0;
  species ordered_polymer_complex_part_P_SrpR_protein_RNAP_forward__part_P_BetI_forward_part_UTR1_forward_part_PhlF_forward_part_t16_forward_ in default = 0;
  species rna_part_UTR1_forward_part_PhlF_forward_part_t16_forward_ in default = 0;
  species ordered_polymer_complex_part_P_SrpR_protein_RNAP_forward__complex_part_P_BetI_protein_RNAP_forward__part_UTR1_forward_part_PhlF_forward_part_t16_forward_ in default = 0;
  species protein_BetI_degtagged in default = 0;
  species ordered_polymer_complex_part_P_SrpR_protein_RNAP_forward__complex_part_P_BetI_protein_BetI_degtagged_2x_forward__part_UTR1_forward_part_PhlF_forward_part_t16_forward_ in default = 0;
  species ordered_polymer_complex_part_P_SrpR_protein_RNAP_forward__complex_complex_part_P_BetI_protein_BetI_degtagged_2x__protein_RNAP_forward__part_UTR1_forward_part_PhlF_forward_part_t16_forward_ in default = 0;
  species ordered_polymer_complex_part_P_SrpR_protein_SrpR_degtagged_2x_forward__part_P_BetI_forward_part_UTR1_forward_part_PhlF_forward_part_t16_forward_ in default = 0;
  species ordered_polymer_complex_part_P_SrpR_protein_SrpR_degtagged_2x_forward__complex_part_P_BetI_protein_RNAP_forward__part_UTR1_forward_part_PhlF_forward_part_t16_forward_ in default = 0;
  species ordered_polymer_complex_part_P_SrpR_protein_SrpR_degtagged_2x_forward__complex_part_P_BetI_protein_BetI_degtagged_2x_forward__part_UTR1_forward_part_PhlF_forward_part_t16_forward_ in default = 0;
  species ordered_polymer_complex_part_P_SrpR_protein_SrpR_degtagged_2x_forward__complex_complex_part_P_BetI_protein_BetI_degtagged_2x__protein_RNAP_forward__part_UTR1_forward_part_PhlF_forward_part_t16_forward_ in default = 0;
  species ordered_polymer_complex_complex_part_P_SrpR_protein_SrpR_degtagged_2x__protein_RNAP_forward__part_P_BetI_forward_part_UTR1_forward_part_PhlF_forward_part_t16_forward_ in default = 0;
  species ordered_polymer_complex_complex_part_P_SrpR_protein_SrpR_degtagged_2x__protein_RNAP_forward__complex_part_P_BetI_protein_RNAP_forward__part_UTR1_forward_part_PhlF_forward_part_t16_forward_ in default = 0;
  species ordered_polymer_complex_complex_part_P_SrpR_protein_SrpR_degtagged_2x__protein_RNAP_forward__complex_part_P_BetI_protein_BetI_degtagged_2x_forward__part_UTR1_forward_part_PhlF_forward_part_t16_forward_ in default = 0;
  species ordered_polymer_complex_complex_part_P_SrpR_protein_SrpR_degtagged_2x__protein_RNAP_forward__complex_complex_part_P_BetI_protein_BetI_degtagged_2x__protein_RNAP_forward__part_UTR1_forward_part_PhlF_forward_part_t16_forward_ in default = 0;
  species ordered_polymer_part_P_SrpR_forward_complex_complex_part_P_BetI_protein_BetI_degtagged_2x__protein_RNAP_forward__part_UTR1_forward_part_PhlF_forward_part_t16_forward_ in default = 0;
  species rna_part_P_BetI_forward_part_UTR1_forward_part_PhlF_forward_part_t16_forward_ in default = 0;
  species protein_SrpR_degtagged in default = 0;
  species ordered_polymer_part_P_SrpR_forward_complex_part_P_BetI_protein_RNAP_forward__part_UTR1_forward_part_PhlF_forward_part_t16_forward_ in default = 0;
  species ordered_polymer_part_P_SrpR_forward_complex_part_P_BetI_protein_BetI_degtagged_2x_forward__part_UTR1_forward_part_PhlF_forward_part_t16_forward_ in default = 0;
  species ordered_polymer_complex_complex_LacI_2x_part_P_Tac__protein_RNAP_forward__part_P_Tet_forward_part_UTR1_forward_part_SrpR_forward_part_t16_forward_ in default = 0;
  species rna_part_UTR1_forward_part_SrpR_forward_part_t16_forward_ in default = 0;
  species ordered_polymer_complex_complex_LacI_2x_part_P_Tac__protein_RNAP_forward__complex_part_P_Tet_protein_RNAP_forward__part_UTR1_forward_part_SrpR_forward_part_t16_forward_ in default = 0;
  species ordered_polymer_complex_complex_LacI_2x_part_P_Tac__protein_RNAP_forward__complex_TetR_2x_part_P_Tet_forward__part_UTR1_forward_part_SrpR_forward_part_t16_forward_ in default = 0;
  species ordered_polymer_complex_complex_LacI_2x_part_P_Tac__protein_RNAP_forward__complex_complex_TetR_2x_part_P_Tet__protein_RNAP_forward__part_UTR1_forward_part_SrpR_forward_part_t16_forward_ in default = 0;
  species ordered_polymer_complex_part_P_Tac_protein_RNAP_forward__part_P_Tet_forward_part_UTR1_forward_part_SrpR_forward_part_t16_forward_ in default = 0;
  species ordered_polymer_complex_part_P_Tac_protein_RNAP_forward__complex_part_P_Tet_protein_RNAP_forward__part_UTR1_forward_part_SrpR_forward_part_t16_forward_ in default = 0;
  species ordered_polymer_complex_part_P_Tac_protein_RNAP_forward__complex_TetR_2x_part_P_Tet_forward__part_UTR1_forward_part_SrpR_forward_part_t16_forward_ in default = 0;
  species ordered_polymer_complex_part_P_Tac_protein_RNAP_forward__complex_complex_TetR_2x_part_P_Tet__protein_RNAP_forward__part_UTR1_forward_part_SrpR_forward_part_t16_forward_ in default = 0;
  species ordered_polymer_complex_LacI_2x_part_P_Tac_forward__part_P_Tet_forward_part_UTR1_forward_part_SrpR_forward_part_t16_forward_ in default = 0;
  species ordered_polymer_complex_LacI_2x_part_P_Tac_forward__complex_part_P_Tet_protein_RNAP_forward__part_UTR1_forward_part_SrpR_forward_part_t16_forward_ in default = 0;
  species ordered_polymer_complex_LacI_2x_part_P_Tac_forward__complex_TetR_2x_part_P_Tet_forward__part_UTR1_forward_part_SrpR_forward_part_t16_forward_ in default = 0;
  species ordered_polymer_complex_LacI_2x_part_P_Tac_forward__complex_complex_TetR_2x_part_P_Tet__protein_RNAP_forward__part_UTR1_forward_part_SrpR_forward_part_t16_forward_ in default = 0;
  species ordered_polymer_part_P_Tac_forward_complex_part_P_Tet_protein_RNAP_forward__part_UTR1_forward_part_SrpR_forward_part_t16_forward_ in default = 0;
  species rna_part_P_Tet_forward_part_UTR1_forward_part_SrpR_forward_part_t16_forward_ in default = 0;
  species ordered_polymer_part_P_Tac_forward_complex_complex_TetR_2x_part_P_Tet__protein_RNAP_forward__part_UTR1_forward_part_SrpR_forward_part_t16_forward_ in default = 0;
  species ordered_polymer_part_P_Tac_forward_complex_TetR_2x_part_P_Tet_forward__part_UTR1_forward_part_SrpR_forward_part_t16_forward_ in default = 0;
  species ordered_polymer_complex_complex_part_P_HlyIIR_protein_HlyIIR_degtagged_2x__protein_RNAP_forward__part_P_AmeR_forward_part_UTR1_forward_part_BetI_forward_part_t16_forward_ in default = 0;
  species rna_part_UTR1_forward_part_BetI_forward_part_t16_forward_ in default = 0;
  species ordered_polymer_complex_complex_part_P_HlyIIR_protein_HlyIIR_degtagged_2x__protein_RNAP_forward__complex_part_P_AmeR_protein_RNAP_forward__part_UTR1_forward_part_BetI_forward_part_t16_forward_ in default = 0;
  species protein_AmeR_degtagged in default = 0;
  species ordered_polymer_complex_complex_part_P_HlyIIR_protein_HlyIIR_degtagged_2x__protein_RNAP_forward__complex_part_P_AmeR_protein_AmeR_degtagged_2x_forward__part_UTR1_forward_part_BetI_forward_part_t16_forward_ in default = 0;
  species ordered_polymer_complex_complex_part_P_HlyIIR_protein_HlyIIR_degtagged_2x__protein_RNAP_forward__complex_complex_part_P_AmeR_protein_AmeR_degtagged_2x__protein_RNAP_forward__part_UTR1_forward_part_BetI_forward_part_t16_forward_ in default = 0;
  species ordered_polymer_complex_part_P_HlyIIR_protein_HlyIIR_degtagged_2x_forward__part_P_AmeR_forward_part_UTR1_forward_part_BetI_forward_part_t16_forward_ in default = 0;
  species ordered_polymer_complex_part_P_HlyIIR_protein_HlyIIR_degtagged_2x_forward__complex_part_P_AmeR_protein_RNAP_forward__part_UTR1_forward_part_BetI_forward_part_t16_forward_ in default = 0;
  species ordered_polymer_complex_part_P_HlyIIR_protein_HlyIIR_degtagged_2x_forward__complex_part_P_AmeR_protein_AmeR_degtagged_2x_forward__part_UTR1_forward_part_BetI_forward_part_t16_forward_ in default = 0;
  species ordered_polymer_complex_part_P_HlyIIR_protein_HlyIIR_degtagged_2x_forward__complex_complex_part_P_AmeR_protein_AmeR_degtagged_2x__protein_RNAP_forward__part_UTR1_forward_part_BetI_forward_part_t16_forward_ in default = 0;
  species ordered_polymer_complex_part_P_HlyIIR_protein_RNAP_forward__part_P_AmeR_forward_part_UTR1_forward_part_BetI_forward_part_t16_forward_ in default = 0;
  species ordered_polymer_complex_part_P_HlyIIR_protein_RNAP_forward__complex_part_P_AmeR_protein_RNAP_forward__part_UTR1_forward_part_BetI_forward_part_t16_forward_ in default = 0;
  species ordered_polymer_complex_part_P_HlyIIR_protein_RNAP_forward__complex_part_P_AmeR_protein_AmeR_degtagged_2x_forward__part_UTR1_forward_part_BetI_forward_part_t16_forward_ in default = 0;
  species ordered_polymer_complex_part_P_HlyIIR_protein_RNAP_forward__complex_complex_part_P_AmeR_protein_AmeR_degtagged_2x__protein_RNAP_forward__part_UTR1_forward_part_BetI_forward_part_t16_forward_ in default = 0;
  species ordered_polymer_part_P_HlyIIR_forward_complex_part_P_AmeR_protein_AmeR_degtagged_2x_forward__part_UTR1_forward_part_BetI_forward_part_t16_forward_ in default = 0;
  species rna_part_P_AmeR_forward_part_UTR1_forward_part_BetI_forward_part_t16_forward_ in default = 0;
  species protein_HlyIIR_degtagged in default = 0;
  species ordered_polymer_part_P_HlyIIR_forward_complex_part_P_AmeR_protein_RNAP_forward__part_UTR1_forward_part_BetI_forward_part_t16_forward_ in default = 0;
  species ordered_polymer_part_P_HlyIIR_forward_complex_complex_part_P_AmeR_protein_AmeR_degtagged_2x__protein_RNAP_forward__part_UTR1_forward_part_BetI_forward_part_t16_forward_ in default = 0;
  species rna_part_UTR1_forward_part_AmeR_forward_part_t16_forward_ in default = 0;
  species ordered_polymer_complex_part_P_Tet_protein_RNAP_forward__part_UTR1_forward_part_AmeR_forward_part_t16_forward_ in default = 0;
  species ordered_polymer_complex_TetR_2x_part_P_Tet_forward__part_UTR1_forward_part_AmeR_forward_part_t16_forward_ in default = 0;
  species ordered_polymer_complex_complex_TetR_2x_part_P_Tet__protein_RNAP_forward__part_UTR1_forward_part_AmeR_forward_part_t16_forward_ in default = 0;
  species rna_part_UTR1_forward_part_HlyIIR_forward_part_t16_forward_ in default = 0;
  species ordered_polymer_complex_part_P_Tac_protein_RNAP_forward__part_UTR1_forward_part_HlyIIR_forward_part_t16_forward_ in default = 0;
  species ordered_polymer_complex_LacI_2x_part_P_Tac_forward__part_UTR1_forward_part_HlyIIR_forward_part_t16_forward_ in default = 0;
  species ordered_polymer_complex_complex_LacI_2x_part_P_Tac__protein_RNAP_forward__part_UTR1_forward_part_HlyIIR_forward_part_t16_forward_ in default = 0;
  species rna_part_UTR1_forward_part_AmtR_forward_part_t16_forward_ in default = 0;
  species ordered_polymer_complex_part_P_BAD_protein_RNAP_forward__part_UTR1_forward_part_AmtR_forward_part_t16_forward_ in default = 0;
  species ordered_polymer_complex_complex_Ara_2x_AraC_2x__2x_part_P_BAD_forward__part_UTR1_forward_part_AmtR_forward_part_t16_forward_ in default = 0;
  species ordered_polymer_complex_complex_complex_Ara_2x_AraC_2x__2x_part_P_BAD__protein_RNAP_forward__part_UTR1_forward_part_AmtR_forward_part_t16_forward_ in default = 0;
  species ordered_polymer_complex_complex_part_P_PhlF_protein_PhlF_degtagged_2x__protein_RNAP_forward__part_P_AmtR_forward_part_UTR1_forward_part_YFP_forward_part_t16_forward_ in default = 0;
  species rna_part_UTR1_forward_part_YFP_forward_part_t16_forward_ in default = 0;
  species ordered_polymer_complex_complex_part_P_PhlF_protein_PhlF_degtagged_2x__protein_RNAP_forward__complex_part_P_AmtR_protein_RNAP_forward__part_UTR1_forward_part_YFP_forward_part_t16_forward_ in default = 0;
  species protein_AmtR_degtagged in default = 0;
  species ordered_polymer_complex_complex_part_P_PhlF_protein_PhlF_degtagged_2x__protein_RNAP_forward__complex_part_P_AmtR_protein_AmtR_degtagged_2x_forward__part_UTR1_forward_part_YFP_forward_part_t16_forward_ in default = 0;
  species ordered_polymer_complex_complex_part_P_PhlF_protein_PhlF_degtagged_2x__protein_RNAP_forward__complex_complex_part_P_AmtR_protein_AmtR_degtagged_2x__protein_RNAP_forward__part_UTR1_forward_part_YFP_forward_part_t16_forward_ in default = 0;
  species ordered_polymer_complex_part_P_PhlF_protein_PhlF_degtagged_2x_forward__part_P_AmtR_forward_part_UTR1_forward_part_YFP_forward_part_t16_forward_ in default = 0;
  species ordered_polymer_complex_part_P_PhlF_protein_PhlF_degtagged_2x_forward__complex_part_P_AmtR_protein_RNAP_forward__part_UTR1_forward_part_YFP_forward_part_t16_forward_ in default = 0;
  species ordered_polymer_complex_part_P_PhlF_protein_PhlF_degtagged_2x_forward__complex_part_P_AmtR_protein_AmtR_degtagged_2x_forward__part_UTR1_forward_part_YFP_forward_part_t16_forward_ in default = 0;
  species ordered_polymer_complex_part_P_PhlF_protein_PhlF_degtagged_2x_forward__complex_complex_part_P_AmtR_protein_AmtR_degtagged_2x__protein_RNAP_forward__part_UTR1_forward_part_YFP_forward_part_t16_forward_ in default = 0;
  species ordered_polymer_complex_part_P_PhlF_protein_RNAP_forward__part_P_AmtR_forward_part_UTR1_forward_part_YFP_forward_part_t16_forward_ in default = 0;
  species ordered_polymer_complex_part_P_PhlF_protein_RNAP_forward__complex_part_P_AmtR_protein_RNAP_forward__part_UTR1_forward_part_YFP_forward_part_t16_forward_ in default = 0;
  species ordered_polymer_complex_part_P_PhlF_protein_RNAP_forward__complex_part_P_AmtR_protein_AmtR_degtagged_2x_forward__part_UTR1_forward_part_YFP_forward_part_t16_forward_ in default = 0;
  species ordered_polymer_complex_part_P_PhlF_protein_RNAP_forward__complex_complex_part_P_AmtR_protein_AmtR_degtagged_2x__protein_RNAP_forward__part_UTR1_forward_part_YFP_forward_part_t16_forward_ in default = 0;
  species ordered_polymer_part_P_PhlF_forward_complex_complex_part_P_AmtR_protein_AmtR_degtagged_2x__protein_RNAP_forward__part_UTR1_forward_part_YFP_forward_part_t16_forward_ in default = 0;
  species rna_part_P_AmtR_forward_part_UTR1_forward_part_YFP_forward_part_t16_forward_ in default = 0;
  species protein_PhlF_degtagged in default = 0;
  species ordered_polymer_part_P_PhlF_forward_complex_part_P_AmtR_protein_AmtR_degtagged_2x_forward__part_UTR1_forward_part_YFP_forward_part_t16_forward_ in default = 0;
  species ordered_polymer_part_P_PhlF_forward_complex_part_P_AmtR_protein_RNAP_forward__part_UTR1_forward_part_YFP_forward_part_t16_forward_ in default = 0;
  species ordered_polymer_part_P_BetI_forward_complex_part_UTR1_protein_Ribo_forward__part_PhlF_forward_part_t16_forward_ in default = 0;
  species protein_PhlF_degtagged in default = 0;
  species ordered_polymer_complex_part_UTR1_protein_Ribo_forward__part_PhlF_forward_part_t16_forward_ in default = 0;
  species ordered_polymer_part_P_Tet_forward_complex_part_UTR1_protein_Ribo_forward__part_SrpR_forward_part_t16_forward_ in default = 0;
  species protein_SrpR_degtagged in default = 0;
  species ordered_polymer_complex_part_UTR1_protein_Ribo_forward__part_SrpR_forward_part_t16_forward_ in default = 0;
  species ordered_polymer_part_P_AmeR_forward_complex_part_UTR1_protein_Ribo_forward__part_BetI_forward_part_t16_forward_ in default = 0;
  species protein_BetI_degtagged in default = 0;
  species ordered_polymer_complex_part_UTR1_protein_Ribo_forward__part_BetI_forward_part_t16_forward_ in default = 0;
  species ordered_polymer_complex_part_UTR1_protein_Ribo_forward__part_AmeR_forward_part_t16_forward_ in default = 0;
  species protein_AmeR_degtagged in default = 0;
  species ordered_polymer_complex_part_UTR1_protein_Ribo_forward__part_HlyIIR_forward_part_t16_forward_ in default = 0;
  species protein_HlyIIR_degtagged in default = 0;
  species ordered_polymer_complex_part_UTR1_protein_Ribo_forward__part_AmtR_forward_part_t16_forward_ in default = 0;
  species protein_AmtR_degtagged in default = 0;
  species ordered_polymer_part_P_AmtR_forward_complex_part_UTR1_protein_Ribo_forward__part_YFP_forward_part_t16_forward_ in default = 0;
  species protein_YFP_degtagged in default = 0;
  species ordered_polymer_complex_part_UTR1_protein_Ribo_forward__part_YFP_forward_part_t16_forward_ in default = 0;
  species protease in default = 0;
  species complex_protease_protein_PhlF_degtagged_ in default = 0;
  species complex_protease_protein_SrpR_degtagged_ in default = 0;
  species complex_protease_protein_BetI_degtagged_ in default = 0;
  species complex_protease_protein_AmeR_degtagged_ in default = 0;
  species complex_protease_protein_HlyIIR_degtagged_ in default = 0;
  species complex_protease_protein_AmtR_degtagged_ in default = 0;
  species complex_protease_protein_YFP_degtagged_ in default = 0;
  species complex_protein_RNAase_rna_part_UTR1_forward_part_PhlF_forward_part_t16_forward__ in default = 0;
  species complex_protein_RNAase_rna_part_P_BetI_forward_part_UTR1_forward_part_PhlF_forward_part_t16_forward__ in default = 0;
  species complex_protein_RNAase_rna_part_UTR1_forward_part_SrpR_forward_part_t16_forward__ in default = 0;
  species complex_protein_RNAase_rna_part_P_Tet_forward_part_UTR1_forward_part_SrpR_forward_part_t16_forward__ in default = 0;
  species complex_protein_RNAase_rna_part_UTR1_forward_part_BetI_forward_part_t16_forward__ in default = 0;
  species complex_protein_RNAase_rna_part_P_AmeR_forward_part_UTR1_forward_part_BetI_forward_part_t16_forward__ in default = 0;
  species complex_protein_RNAase_rna_part_UTR1_forward_part_AmeR_forward_part_t16_forward__ in default = 0;
  species complex_protein_RNAase_rna_part_UTR1_forward_part_HlyIIR_forward_part_t16_forward__ in default = 0;
  species complex_protein_RNAase_rna_part_UTR1_forward_part_AmtR_forward_part_t16_forward__ in default = 0;
  species complex_protein_RNAase_rna_part_UTR1_forward_part_YFP_forward_part_t16_forward__ in default = 0;
  species complex_protein_RNAase_rna_part_P_AmtR_forward_part_UTR1_forward_part_YFP_forward_part_t16_forward__ in default = 0;

  // Parameters:
  kb__ = 100;
  ku__ = 10;
  kb_P_BetI_leak_transcription_mm = 100;
  ku_P_BetI_leak_transcription_mm = 10;
  ktx_P_BetI_leak_transcription_mm = 0.05;
  kb__one_step_cooperative_binding = 100;
  ku__one_step_cooperative_binding = 10;
  kb__transcription_mm = 1;
  ku__transcription_mm = 100;
  ktx__transcription_mm = 0.05;
  kb_P_SrpR_leak_transcription_mm = 100;
  ku_P_SrpR_leak_transcription_mm = 10;
  ktx_P_SrpR_leak_transcription_mm = 0.05;
  kb_P_Tet_leak_transcription_mm = 100;
  ku_P_Tet_leak_transcription_mm = 10;
  ktx_P_Tet_leak_transcription_mm = 0.05;
  kb_P_Tac_leak_transcription_mm = 100;
  ku_P_Tac_leak_transcription_mm = 10;
  ktx_P_Tac_leak_transcription_mm = 0.05;
  kb_P_AmeR_leak_transcription_mm = 100;
  ku_P_AmeR_leak_transcription_mm = 10;
  ktx_P_AmeR_leak_transcription_mm = 0.05;
  kb_P_HlyIIR_leak_transcription_mm = 100;
  ku_P_HlyIIR_leak_transcription_mm = 10;
  ktx_P_HlyIIR_leak_transcription_mm = 0.05;
  kb_P_BAD_leak_transcription_mm = 1;
  ku_P_BAD_leak_transcription_mm = 100;
  ktx_P_BAD_leak_transcription_mm = 0.05;
  kb_P_BAD_Ara_2x_AraC_2x_transcription_mm = 100;
  ku_P_BAD_Ara_2x_AraC_2x_transcription_mm = 10;
  ktx_P_BAD_Ara_2x_AraC_2x_transcription_mm = 0.05;
  kb_P_AmtR_leak_transcription_mm = 100;
  ku_P_AmtR_leak_transcription_mm = 10;
  ktx_P_AmtR_leak_transcription_mm = 0.05;
  kb_P_PhlF_leak_transcription_mm = 100;
  ku_P_PhlF_leak_transcription_mm = 10;
  ktx_P_PhlF_leak_transcription_mm = 0.05;
  ktl__ = 0.05;
  kdeg__ = 0.0075;

  // Reactions:
  r0: 2 IPTG + 2 LacI => complex_IPTG_2x_LacI_2x_; kb__*IPTG^2*LacI^2;
  r0rev: complex_IPTG_2x_LacI_2x_ => 2 IPTG + 2 LacI; ku__*complex_IPTG_2x_LacI_2x_;
  r1: 2 aTc + 2 TetR => complex_TetR_2x_aTc_2x_; kb__*aTc^2*TetR^2;
  r1rev: complex_TetR_2x_aTc_2x_ => 2 aTc + 2 TetR; ku__*complex_TetR_2x_aTc_2x_;
  r2: 2 Ara + 2 AraC => complex_Ara_2x_AraC_2x_; kb__*Ara^2*AraC^2;
  r2rev: complex_Ara_2x_AraC_2x_ => 2 Ara + 2 AraC; ku__*complex_Ara_2x_AraC_2x_;
  r3: ordered_polymer_complex_part_P_SrpR_protein_RNAP_forward__part_P_BetI_forward_part_UTR1_forward_part_PhlF_forward_part_t16_forward_ + protein_RNAP => ordered_polymer_complex_part_P_SrpR_protein_RNAP_forward__complex_part_P_BetI_protein_RNAP_forward__part_UTR1_forward_part_PhlF_forward_part_t16_forward_; kb_P_BetI_leak_transcription_mm*ordered_polymer_complex_part_P_SrpR_protein_RNAP_forward__part_P_BetI_forward_part_UTR1_forward_part_PhlF_forward_part_t16_forward_*protein_RNAP;
  r3rev: ordered_polymer_complex_part_P_SrpR_protein_RNAP_forward__complex_part_P_BetI_protein_RNAP_forward__part_UTR1_forward_part_PhlF_forward_part_t16_forward_ => ordered_polymer_complex_part_P_SrpR_protein_RNAP_forward__part_P_BetI_forward_part_UTR1_forward_part_PhlF_forward_part_t16_forward_ + protein_RNAP; ku_P_BetI_leak_transcription_mm*ordered_polymer_complex_part_P_SrpR_protein_RNAP_forward__complex_part_P_BetI_protein_RNAP_forward__part_UTR1_forward_part_PhlF_forward_part_t16_forward_;
  r4: ordered_polymer_complex_part_P_SrpR_protein_RNAP_forward__complex_part_P_BetI_protein_RNAP_forward__part_UTR1_forward_part_PhlF_forward_part_t16_forward_ => ordered_polymer_complex_part_P_SrpR_protein_RNAP_forward__part_P_BetI_forward_part_UTR1_forward_part_PhlF_forward_part_t16_forward_ + rna_part_UTR1_forward_part_PhlF_forward_part_t16_forward_ + protein_RNAP; ktx_P_BetI_leak_transcription_mm*ordered_polymer_complex_part_P_SrpR_protein_RNAP_forward__complex_part_P_BetI_protein_RNAP_forward__part_UTR1_forward_part_PhlF_forward_part_t16_forward_;
  r5: 2 protein_BetI_degtagged + ordered_polymer_complex_part_P_SrpR_protein_RNAP_forward__part_P_BetI_forward_part_UTR1_forward_part_PhlF_forward_part_t16_forward_ => ordered_polymer_complex_part_P_SrpR_protein_RNAP_forward__complex_part_P_BetI_protein_BetI_degtagged_2x_forward__part_UTR1_forward_part_PhlF_forward_part_t16_forward_; kb__one_step_cooperative_binding*protein_BetI_degtagged^2*ordered_polymer_complex_part_P_SrpR_protein_RNAP_forward__part_P_BetI_forward_part_UTR1_forward_part_PhlF_forward_part_t16_forward_;
  r5rev: ordered_polymer_complex_part_P_SrpR_protein_RNAP_forward__complex_part_P_BetI_protein_BetI_degtagged_2x_forward__part_UTR1_forward_part_PhlF_forward_part_t16_forward_ => 2 protein_BetI_degtagged + ordered_polymer_complex_part_P_SrpR_protein_RNAP_forward__part_P_BetI_forward_part_UTR1_forward_part_PhlF_forward_part_t16_forward_; ku__one_step_cooperative_binding*ordered_polymer_complex_part_P_SrpR_protein_RNAP_forward__complex_part_P_BetI_protein_BetI_degtagged_2x_forward__part_UTR1_forward_part_PhlF_forward_part_t16_forward_;
  r6: ordered_polymer_complex_part_P_SrpR_protein_RNAP_forward__complex_part_P_BetI_protein_BetI_degtagged_2x_forward__part_UTR1_forward_part_PhlF_forward_part_t16_forward_ + protein_RNAP => ordered_polymer_complex_part_P_SrpR_protein_RNAP_forward__complex_complex_part_P_BetI_protein_BetI_degtagged_2x__protein_RNAP_forward__part_UTR1_forward_part_PhlF_forward_part_t16_forward_; kb__transcription_mm*ordered_polymer_complex_part_P_SrpR_protein_RNAP_forward__complex_part_P_BetI_protein_BetI_degtagged_2x_forward__part_UTR1_forward_part_PhlF_forward_part_t16_forward_*protein_RNAP;
  r6rev: ordered_polymer_complex_part_P_SrpR_protein_RNAP_forward__complex_complex_part_P_BetI_protein_BetI_degtagged_2x__protein_RNAP_forward__part_UTR1_forward_part_PhlF_forward_part_t16_forward_ => ordered_polymer_complex_part_P_SrpR_protein_RNAP_forward__complex_part_P_BetI_protein_BetI_degtagged_2x_forward__part_UTR1_forward_part_PhlF_forward_part_t16_forward_ + protein_RNAP; ku__transcription_mm*ordered_polymer_complex_part_P_SrpR_protein_RNAP_forward__complex_complex_part_P_BetI_protein_BetI_degtagged_2x__protein_RNAP_forward__part_UTR1_forward_part_PhlF_forward_part_t16_forward_;
  r7: ordered_polymer_complex_part_P_SrpR_protein_RNAP_forward__complex_complex_part_P_BetI_protein_BetI_degtagged_2x__protein_RNAP_forward__part_UTR1_forward_part_PhlF_forward_part_t16_forward_ => ordered_polymer_complex_part_P_SrpR_protein_RNAP_forward__complex_part_P_BetI_protein_BetI_degtagged_2x_forward__part_UTR1_forward_part_PhlF_forward_part_t16_forward_ + rna_part_UTR1_forward_part_PhlF_forward_part_t16_forward_ + protein_RNAP; ktx__transcription_mm*ordered_polymer_complex_part_P_SrpR_protein_RNAP_forward__complex_complex_part_P_BetI_protein_BetI_degtagged_2x__protein_RNAP_forward__part_UTR1_forward_part_PhlF_forward_part_t16_forward_;
  r8: ordered_polymer_complex_part_P_SrpR_protein_SrpR_degtagged_2x_forward__part_P_BetI_forward_part_UTR1_forward_part_PhlF_forward_part_t16_forward_ + protein_RNAP => ordered_polymer_complex_part_P_SrpR_protein_SrpR_degtagged_2x_forward__complex_part_P_BetI_protein_RNAP_forward__part_UTR1_forward_part_PhlF_forward_part_t16_forward_; kb_P_BetI_leak_transcription_mm*ordered_polymer_complex_part_P_SrpR_protein_SrpR_degtagged_2x_forward__part_P_BetI_forward_part_UTR1_forward_part_PhlF_forward_part_t16_forward_*protein_RNAP;
  r8rev: ordered_polymer_complex_part_P_SrpR_protein_SrpR_degtagged_2x_forward__complex_part_P_BetI_protein_RNAP_forward__part_UTR1_forward_part_PhlF_forward_part_t16_forward_ => ordered_polymer_complex_part_P_SrpR_protein_SrpR_degtagged_2x_forward__part_P_BetI_forward_part_UTR1_forward_part_PhlF_forward_part_t16_forward_ + protein_RNAP; ku_P_BetI_leak_transcription_mm*ordered_polymer_complex_part_P_SrpR_protein_SrpR_degtagged_2x_forward__complex_part_P_BetI_protein_RNAP_forward__part_UTR1_forward_part_PhlF_forward_part_t16_forward_;
  r9: ordered_polymer_complex_part_P_SrpR_protein_SrpR_degtagged_2x_forward__complex_part_P_BetI_protein_RNAP_forward__part_UTR1_forward_part_PhlF_forward_part_t16_forward_ => ordered_polymer_complex_part_P_SrpR_protein_SrpR_degtagged_2x_forward__part_P_BetI_forward_part_UTR1_forward_part_PhlF_forward_part_t16_forward_ + rna_part_UTR1_forward_part_PhlF_forward_part_t16_forward_ + protein_RNAP; ktx_P_BetI_leak_transcription_mm*ordered_polymer_complex_part_P_SrpR_protein_SrpR_degtagged_2x_forward__complex_part_P_BetI_protein_RNAP_forward__part_UTR1_forward_part_PhlF_forward_part_t16_forward_;
  r10: 2 protein_BetI_degtagged + ordered_polymer_complex_part_P_SrpR_protein_SrpR_degtagged_2x_forward__part_P_BetI_forward_part_UTR1_forward_part_PhlF_forward_part_t16_forward_ => ordered_polymer_complex_part_P_SrpR_protein_SrpR_degtagged_2x_forward__complex_part_P_BetI_protein_BetI_degtagged_2x_forward__part_UTR1_forward_part_PhlF_forward_part_t16_forward_; kb__one_step_cooperative_binding*protein_BetI_degtagged^2*ordered_polymer_complex_part_P_SrpR_protein_SrpR_degtagged_2x_forward__part_P_BetI_forward_part_UTR1_forward_part_PhlF_forward_part_t16_forward_;
  r10rev: ordered_polymer_complex_part_P_SrpR_protein_SrpR_degtagged_2x_forward__complex_part_P_BetI_protein_BetI_degtagged_2x_forward__part_UTR1_forward_part_PhlF_forward_part_t16_forward_ => 2 protein_BetI_degtagged + ordered_polymer_complex_part_P_SrpR_protein_SrpR_degtagged_2x_forward__part_P_BetI_forward_part_UTR1_forward_part_PhlF_forward_part_t16_forward_; ku__one_step_cooperative_binding*ordered_polymer_complex_part_P_SrpR_protein_SrpR_degtagged_2x_forward__complex_part_P_BetI_protein_BetI_degtagged_2x_forward__part_UTR1_forward_part_PhlF_forward_part_t16_forward_;
  r11: ordered_polymer_complex_part_P_SrpR_protein_SrpR_degtagged_2x_forward__complex_part_P_BetI_protein_BetI_degtagged_2x_forward__part_UTR1_forward_part_PhlF_forward_part_t16_forward_ + protein_RNAP => ordered_polymer_complex_part_P_SrpR_protein_SrpR_degtagged_2x_forward__complex_complex_part_P_BetI_protein_BetI_degtagged_2x__protein_RNAP_forward__part_UTR1_forward_part_PhlF_forward_part_t16_forward_; kb__transcription_mm*ordered_polymer_complex_part_P_SrpR_protein_SrpR_degtagged_2x_forward__complex_part_P_BetI_protein_BetI_degtagged_2x_forward__part_UTR1_forward_part_PhlF_forward_part_t16_forward_*protein_RNAP;
  r11rev: ordered_polymer_complex_part_P_SrpR_protein_SrpR_degtagged_2x_forward__complex_complex_part_P_BetI_protein_BetI_degtagged_2x__protein_RNAP_forward__part_UTR1_forward_part_PhlF_forward_part_t16_forward_ => ordered_polymer_complex_part_P_SrpR_protein_SrpR_degtagged_2x_forward__complex_part_P_BetI_protein_BetI_degtagged_2x_forward__part_UTR1_forward_part_PhlF_forward_part_t16_forward_ + protein_RNAP; ku__transcription_mm*ordered_polymer_complex_part_P_SrpR_protein_SrpR_degtagged_2x_forward__complex_complex_part_P_BetI_protein_BetI_degtagged_2x__protein_RNAP_forward__part_UTR1_forward_part_PhlF_forward_part_t16_forward_;
  r12: ordered_polymer_complex_part_P_SrpR_protein_SrpR_degtagged_2x_forward__complex_complex_part_P_BetI_protein_BetI_degtagged_2x__protein_RNAP_forward__part_UTR1_forward_part_PhlF_forward_part_t16_forward_ => ordered_polymer_complex_part_P_SrpR_protein_SrpR_degtagged_2x_forward__complex_part_P_BetI_protein_BetI_degtagged_2x_forward__part_UTR1_forward_part_PhlF_forward_part_t16_forward_ + rna_part_UTR1_forward_part_PhlF_forward_part_t16_forward_ + protein_RNAP; ktx__transcription_mm*ordered_polymer_complex_part_P_SrpR_protein_SrpR_degtagged_2x_forward__complex_complex_part_P_BetI_protein_BetI_degtagged_2x__protein_RNAP_forward__part_UTR1_forward_part_PhlF_forward_part_t16_forward_;
  r13: ordered_polymer_complex_complex_part_P_SrpR_protein_SrpR_degtagged_2x__protein_RNAP_forward__part_P_BetI_forward_part_UTR1_forward_part_PhlF_forward_part_t16_forward_ + protein_RNAP => ordered_polymer_complex_complex_part_P_SrpR_protein_SrpR_degtagged_2x__protein_RNAP_forward__complex_part_P_BetI_protein_RNAP_forward__part_UTR1_forward_part_PhlF_forward_part_t16_forward_; kb_P_BetI_leak_transcription_mm*ordered_polymer_complex_complex_part_P_SrpR_protein_SrpR_degtagged_2x__protein_RNAP_forward__part_P_BetI_forward_part_UTR1_forward_part_PhlF_forward_part_t16_forward_*protein_RNAP;
  r13rev: ordered_polymer_complex_complex_part_P_SrpR_protein_SrpR_degtagged_2x__protein_RNAP_forward__complex_part_P_BetI_protein_RNAP_forward__part_UTR1_forward_part_PhlF_forward_part_t16_forward_ => ordered_polymer_complex_complex_part_P_SrpR_protein_SrpR_degtagged_2x__protein_RNAP_forward__part_P_BetI_forward_part_UTR1_forward_part_PhlF_forward_part_t16_forward_ + protein_RNAP; ku_P_BetI_leak_transcription_mm*ordered_polymer_complex_complex_part_P_SrpR_protein_SrpR_degtagged_2x__protein_RNAP_forward__complex_part_P_BetI_protein_RNAP_forward__part_UTR1_forward_part_PhlF_forward_part_t16_forward_;
  r14: ordered_polymer_complex_complex_part_P_SrpR_protein_SrpR_degtagged_2x__protein_RNAP_forward__complex_part_P_BetI_protein_RNAP_forward__part_UTR1_forward_part_PhlF_forward_part_t16_forward_ => ordered_polymer_complex_complex_part_P_SrpR_protein_SrpR_degtagged_2x__protein_RNAP_forward__part_P_BetI_forward_part_UTR1_forward_part_PhlF_forward_part_t16_forward_ + rna_part_UTR1_forward_part_PhlF_forward_part_t16_forward_ + protein_RNAP; ktx_P_BetI_leak_transcription_mm*ordered_polymer_complex_complex_part_P_SrpR_protein_SrpR_degtagged_2x__protein_RNAP_forward__complex_part_P_BetI_protein_RNAP_forward__part_UTR1_forward_part_PhlF_forward_part_t16_forward_;
  r15: 2 protein_BetI_degtagged + ordered_polymer_complex_complex_part_P_SrpR_protein_SrpR_degtagged_2x__protein_RNAP_forward__part_P_BetI_forward_part_UTR1_forward_part_PhlF_forward_part_t16_forward_ => ordered_polymer_complex_complex_part_P_SrpR_protein_SrpR_degtagged_2x__protein_RNAP_forward__complex_part_P_BetI_protein_BetI_degtagged_2x_forward__part_UTR1_forward_part_PhlF_forward_part_t16_forward_; kb__one_step_cooperative_binding*protein_BetI_degtagged^2*ordered_polymer_complex_complex_part_P_SrpR_protein_SrpR_degtagged_2x__protein_RNAP_forward__part_P_BetI_forward_part_UTR1_forward_part_PhlF_forward_part_t16_forward_;
  r15rev: ordered_polymer_complex_complex_part_P_SrpR_protein_SrpR_degtagged_2x__protein_RNAP_forward__complex_part_P_BetI_protein_BetI_degtagged_2x_forward__part_UTR1_forward_part_PhlF_forward_part_t16_forward_ => 2 protein_BetI_degtagged + ordered_polymer_complex_complex_part_P_SrpR_protein_SrpR_degtagged_2x__protein_RNAP_forward__part_P_BetI_forward_part_UTR1_forward_part_PhlF_forward_part_t16_forward_; ku__one_step_cooperative_binding*ordered_polymer_complex_complex_part_P_SrpR_protein_SrpR_degtagged_2x__protein_RNAP_forward__complex_part_P_BetI_protein_BetI_degtagged_2x_forward__part_UTR1_forward_part_PhlF_forward_part_t16_forward_;
  r16: ordered_polymer_complex_complex_part_P_SrpR_protein_SrpR_degtagged_2x__protein_RNAP_forward__complex_part_P_BetI_protein_BetI_degtagged_2x_forward__part_UTR1_forward_part_PhlF_forward_part_t16_forward_ + protein_RNAP => ordered_polymer_complex_complex_part_P_SrpR_protein_SrpR_degtagged_2x__protein_RNAP_forward__complex_complex_part_P_BetI_protein_BetI_degtagged_2x__protein_RNAP_forward__part_UTR1_forward_part_PhlF_forward_part_t16_forward_; kb__transcription_mm*ordered_polymer_complex_complex_part_P_SrpR_protein_SrpR_degtagged_2x__protein_RNAP_forward__complex_part_P_BetI_protein_BetI_degtagged_2x_forward__part_UTR1_forward_part_PhlF_forward_part_t16_forward_*protein_RNAP;
  r16rev: ordered_polymer_complex_complex_part_P_SrpR_protein_SrpR_degtagged_2x__protein_RNAP_forward__complex_complex_part_P_BetI_protein_BetI_degtagged_2x__protein_RNAP_forward__part_UTR1_forward_part_PhlF_forward_part_t16_forward_ => ordered_polymer_complex_complex_part_P_SrpR_protein_SrpR_degtagged_2x__protein_RNAP_forward__complex_part_P_BetI_protein_BetI_degtagged_2x_forward__part_UTR1_forward_part_PhlF_forward_part_t16_forward_ + protein_RNAP; ku__transcription_mm*ordered_polymer_complex_complex_part_P_SrpR_protein_SrpR_degtagged_2x__protein_RNAP_forward__complex_complex_part_P_BetI_protein_BetI_degtagged_2x__protein_RNAP_forward__part_UTR1_forward_part_PhlF_forward_part_t16_forward_;
  r17: ordered_polymer_complex_complex_part_P_SrpR_protein_SrpR_degtagged_2x__protein_RNAP_forward__complex_complex_part_P_BetI_protein_BetI_degtagged_2x__protein_RNAP_forward__part_UTR1_forward_part_PhlF_forward_part_t16_forward_ => ordered_polymer_complex_complex_part_P_SrpR_protein_SrpR_degtagged_2x__protein_RNAP_forward__complex_part_P_BetI_protein_BetI_degtagged_2x_forward__part_UTR1_forward_part_PhlF_forward_part_t16_forward_ + rna_part_UTR1_forward_part_PhlF_forward_part_t16_forward_ + protein_RNAP; ktx__transcription_mm*ordered_polymer_complex_complex_part_P_SrpR_protein_SrpR_degtagged_2x__protein_RNAP_forward__complex_complex_part_P_BetI_protein_BetI_degtagged_2x__protein_RNAP_forward__part_UTR1_forward_part_PhlF_forward_part_t16_forward_;
  r18: ordered_polymer_part_P_SrpR_forward_complex_complex_part_P_BetI_protein_BetI_degtagged_2x__protein_RNAP_forward__part_UTR1_forward_part_PhlF_forward_part_t16_forward_ + protein_RNAP => ordered_polymer_complex_part_P_SrpR_protein_RNAP_forward__complex_complex_part_P_BetI_protein_BetI_degtagged_2x__protein_RNAP_forward__part_UTR1_forward_part_PhlF_forward_part_t16_forward_; kb_P_SrpR_leak_transcription_mm*ordered_polymer_part_P_SrpR_forward_complex_complex_part_P_BetI_protein_BetI_degtagged_2x__protein_RNAP_forward__part_UTR1_forward_part_PhlF_forward_part_t16_forward_*protein_RNAP;
  r18rev: ordered_polymer_complex_part_P_SrpR_protein_RNAP_forward__complex_complex_part_P_BetI_protein_BetI_degtagged_2x__protein_RNAP_forward__part_UTR1_forward_part_PhlF_forward_part_t16_forward_ => ordered_polymer_part_P_SrpR_forward_complex_complex_part_P_BetI_protein_BetI_degtagged_2x__protein_RNAP_forward__part_UTR1_forward_part_PhlF_forward_part_t16_forward_ + protein_RNAP; ku_P_SrpR_leak_transcription_mm*ordered_polymer_complex_part_P_SrpR_protein_RNAP_forward__complex_complex_part_P_BetI_protein_BetI_degtagged_2x__protein_RNAP_forward__part_UTR1_forward_part_PhlF_forward_part_t16_forward_;
  r19: ordered_polymer_complex_part_P_SrpR_protein_RNAP_forward__complex_complex_part_P_BetI_protein_BetI_degtagged_2x__protein_RNAP_forward__part_UTR1_forward_part_PhlF_forward_part_t16_forward_ => ordered_polymer_part_P_SrpR_forward_complex_complex_part_P_BetI_protein_BetI_degtagged_2x__protein_RNAP_forward__part_UTR1_forward_part_PhlF_forward_part_t16_forward_ + rna_part_P_BetI_forward_part_UTR1_forward_part_PhlF_forward_part_t16_forward_ + protein_RNAP; ktx_P_SrpR_leak_transcription_mm*ordered_polymer_complex_part_P_SrpR_protein_RNAP_forward__complex_complex_part_P_BetI_protein_BetI_degtagged_2x__protein_RNAP_forward__part_UTR1_forward_part_PhlF_forward_part_t16_forward_;
  r20: 2 protein_SrpR_degtagged + ordered_polymer_part_P_SrpR_forward_complex_complex_part_P_BetI_protein_BetI_degtagged_2x__protein_RNAP_forward__part_UTR1_forward_part_PhlF_forward_part_t16_forward_ => ordered_polymer_complex_part_P_SrpR_protein_SrpR_degtagged_2x_forward__complex_complex_part_P_BetI_protein_BetI_degtagged_2x__protein_RNAP_forward__part_UTR1_forward_part_PhlF_forward_part_t16_forward_; kb__one_step_cooperative_binding*protein_SrpR_degtagged^2*ordered_polymer_part_P_SrpR_forward_complex_complex_part_P_BetI_protein_BetI_degtagged_2x__protein_RNAP_forward__part_UTR1_forward_part_PhlF_forward_part_t16_forward_;
  r20rev: ordered_polymer_complex_part_P_SrpR_protein_SrpR_degtagged_2x_forward__complex_complex_part_P_BetI_protein_BetI_degtagged_2x__protein_RNAP_forward__part_UTR1_forward_part_PhlF_forward_part_t16_forward_ => 2 protein_SrpR_degtagged + ordered_polymer_part_P_SrpR_forward_complex_complex_part_P_BetI_protein_BetI_degtagged_2x__protein_RNAP_forward__part_UTR1_forward_part_PhlF_forward_part_t16_forward_; ku__one_step_cooperative_binding*ordered_polymer_complex_part_P_SrpR_protein_SrpR_degtagged_2x_forward__complex_complex_part_P_BetI_protein_BetI_degtagged_2x__protein_RNAP_forward__part_UTR1_forward_part_PhlF_forward_part_t16_forward_;
  r21: ordered_polymer_complex_part_P_SrpR_protein_SrpR_degtagged_2x_forward__complex_complex_part_P_BetI_protein_BetI_degtagged_2x__protein_RNAP_forward__part_UTR1_forward_part_PhlF_forward_part_t16_forward_ + protein_RNAP => ordered_polymer_complex_complex_part_P_SrpR_protein_SrpR_degtagged_2x__protein_RNAP_forward__complex_complex_part_P_BetI_protein_BetI_degtagged_2x__protein_RNAP_forward__part_UTR1_forward_part_PhlF_forward_part_t16_forward_; kb__transcription_mm*ordered_polymer_complex_part_P_SrpR_protein_SrpR_degtagged_2x_forward__complex_complex_part_P_BetI_protein_BetI_degtagged_2x__protein_RNAP_forward__part_UTR1_forward_part_PhlF_forward_part_t16_forward_*protein_RNAP;
  r21rev: ordered_polymer_complex_complex_part_P_SrpR_protein_SrpR_degtagged_2x__protein_RNAP_forward__complex_complex_part_P_BetI_protein_BetI_degtagged_2x__protein_RNAP_forward__part_UTR1_forward_part_PhlF_forward_part_t16_forward_ => ordered_polymer_complex_part_P_SrpR_protein_SrpR_degtagged_2x_forward__complex_complex_part_P_BetI_protein_BetI_degtagged_2x__protein_RNAP_forward__part_UTR1_forward_part_PhlF_forward_part_t16_forward_ + protein_RNAP; ku__transcription_mm*ordered_polymer_complex_complex_part_P_SrpR_protein_SrpR_degtagged_2x__protein_RNAP_forward__complex_complex_part_P_BetI_protein_BetI_degtagged_2x__protein_RNAP_forward__part_UTR1_forward_part_PhlF_forward_part_t16_forward_;
  r22: ordered_polymer_complex_complex_part_P_SrpR_protein_SrpR_degtagged_2x__protein_RNAP_forward__complex_complex_part_P_BetI_protein_BetI_degtagged_2x__protein_RNAP_forward__part_UTR1_forward_part_PhlF_forward_part_t16_forward_ => ordered_polymer_complex_part_P_SrpR_protein_SrpR_degtagged_2x_forward__complex_complex_part_P_BetI_protein_BetI_degtagged_2x__protein_RNAP_forward__part_UTR1_forward_part_PhlF_forward_part_t16_forward_ + rna_part_P_BetI_forward_part_UTR1_forward_part_PhlF_forward_part_t16_forward_ + protein_RNAP; ktx__transcription_mm*ordered_polymer_complex_complex_part_P_SrpR_protein_SrpR_degtagged_2x__protein_RNAP_forward__complex_complex_part_P_BetI_protein_BetI_degtagged_2x__protein_RNAP_forward__part_UTR1_forward_part_PhlF_forward_part_t16_forward_;
  r23: ordered_polymer_part_P_SrpR_forward_complex_part_P_BetI_protein_RNAP_forward__part_UTR1_forward_part_PhlF_forward_part_t16_forward_ + protein_RNAP => ordered_polymer_complex_part_P_SrpR_protein_RNAP_forward__complex_part_P_BetI_protein_RNAP_forward__part_UTR1_forward_part_PhlF_forward_part_t16_forward_; kb_P_SrpR_leak_transcription_mm*ordered_polymer_part_P_SrpR_forward_complex_part_P_BetI_protein_RNAP_forward__part_UTR1_forward_part_PhlF_forward_part_t16_forward_*protein_RNAP;
  r23rev: ordered_polymer_complex_part_P_SrpR_protein_RNAP_forward__complex_part_P_BetI_protein_RNAP_forward__part_UTR1_forward_part_PhlF_forward_part_t16_forward_ => ordered_polymer_part_P_SrpR_forward_complex_part_P_BetI_protein_RNAP_forward__part_UTR1_forward_part_PhlF_forward_part_t16_forward_ + protein_RNAP; ku_P_SrpR_leak_transcription_mm*ordered_polymer_complex_part_P_SrpR_protein_RNAP_forward__complex_part_P_BetI_protein_RNAP_forward__part_UTR1_forward_part_PhlF_forward_part_t16_forward_;
  r24: ordered_polymer_complex_part_P_SrpR_protein_RNAP_forward__complex_part_P_BetI_protein_RNAP_forward__part_UTR1_forward_part_PhlF_forward_part_t16_forward_ => ordered_polymer_part_P_SrpR_forward_complex_part_P_BetI_protein_RNAP_forward__part_UTR1_forward_part_PhlF_forward_part_t16_forward_ + rna_part_P_BetI_forward_part_UTR1_forward_part_PhlF_forward_part_t16_forward_ + protein_RNAP; ktx_P_SrpR_leak_transcription_mm*ordered_polymer_complex_part_P_SrpR_protein_RNAP_forward__complex_part_P_BetI_protein_RNAP_forward__part_UTR1_forward_part_PhlF_forward_part_t16_forward_;
  r25: 2 protein_SrpR_degtagged + ordered_polymer_part_P_SrpR_forward_complex_part_P_BetI_protein_RNAP_forward__part_UTR1_forward_part_PhlF_forward_part_t16_forward_ => ordered_polymer_complex_part_P_SrpR_protein_SrpR_degtagged_2x_forward__complex_part_P_BetI_protein_RNAP_forward__part_UTR1_forward_part_PhlF_forward_part_t16_forward_; kb__one_step_cooperative_binding*protein_SrpR_degtagged^2*ordered_polymer_part_P_SrpR_forward_complex_part_P_BetI_protein_RNAP_forward__part_UTR1_forward_part_PhlF_forward_part_t16_forward_;
  r25rev: ordered_polymer_complex_part_P_SrpR_protein_SrpR_degtagged_2x_forward__complex_part_P_BetI_protein_RNAP_forward__part_UTR1_forward_part_PhlF_forward_part_t16_forward_ => 2 protein_SrpR_degtagged + ordered_polymer_part_P_SrpR_forward_complex_part_P_BetI_protein_RNAP_forward__part_UTR1_forward_part_PhlF_forward_part_t16_forward_; ku__one_step_cooperative_binding*ordered_polymer_complex_part_P_SrpR_protein_SrpR_degtagged_2x_forward__complex_part_P_BetI_protein_RNAP_forward__part_UTR1_forward_part_PhlF_forward_part_t16_forward_;
  r26: ordered_polymer_complex_part_P_SrpR_protein_SrpR_degtagged_2x_forward__complex_part_P_BetI_protein_RNAP_forward__part_UTR1_forward_part_PhlF_forward_part_t16_forward_ + protein_RNAP => ordered_polymer_complex_complex_part_P_SrpR_protein_SrpR_degtagged_2x__protein_RNAP_forward__complex_part_P_BetI_protein_RNAP_forward__part_UTR1_forward_part_PhlF_forward_part_t16_forward_; kb__transcription_mm*ordered_polymer_complex_part_P_SrpR_protein_SrpR_degtagged_2x_forward__complex_part_P_BetI_protein_RNAP_forward__part_UTR1_forward_part_PhlF_forward_part_t16_forward_*protein_RNAP;
  r26rev: ordered_polymer_complex_complex_part_P_SrpR_protein_SrpR_degtagged_2x__protein_RNAP_forward__complex_part_P_BetI_protein_RNAP_forward__part_UTR1_forward_part_PhlF_forward_part_t16_forward_ => ordered_polymer_complex_part_P_SrpR_protein_SrpR_degtagged_2x_forward__complex_part_P_BetI_protein_RNAP_forward__part_UTR1_forward_part_PhlF_forward_part_t16_forward_ + protein_RNAP; ku__transcription_mm*ordered_polymer_complex_complex_part_P_SrpR_protein_SrpR_degtagged_2x__protein_RNAP_forward__complex_part_P_BetI_protein_RNAP_forward__part_UTR1_forward_part_PhlF_forward_part_t16_forward_;
  r27: ordered_polymer_complex_complex_part_P_SrpR_protein_SrpR_degtagged_2x__protein_RNAP_forward__complex_part_P_BetI_protein_RNAP_forward__part_UTR1_forward_part_PhlF_forward_part_t16_forward_ => ordered_polymer_complex_part_P_SrpR_protein_SrpR_degtagged_2x_forward__complex_part_P_BetI_protein_RNAP_forward__part_UTR1_forward_part_PhlF_forward_part_t16_forward_ + rna_part_P_BetI_forward_part_UTR1_forward_part_PhlF_forward_part_t16_forward_ + protein_RNAP; ktx__transcription_mm*ordered_polymer_complex_complex_part_P_SrpR_protein_SrpR_degtagged_2x__protein_RNAP_forward__complex_part_P_BetI_protein_RNAP_forward__part_UTR1_forward_part_PhlF_forward_part_t16_forward_;
  r28: ordered_polymer_part_P_SrpR_forward_complex_part_P_BetI_protein_BetI_degtagged_2x_forward__part_UTR1_forward_part_PhlF_forward_part_t16_forward_ + protein_RNAP => ordered_polymer_complex_part_P_SrpR_protein_RNAP_forward__complex_part_P_BetI_protein_BetI_degtagged_2x_forward__part_UTR1_forward_part_PhlF_forward_part_t16_forward_; kb_P_SrpR_leak_transcription_mm*ordered_polymer_part_P_SrpR_forward_complex_part_P_BetI_protein_BetI_degtagged_2x_forward__part_UTR1_forward_part_PhlF_forward_part_t16_forward_*protein_RNAP;
  r28rev: ordered_polymer_complex_part_P_SrpR_protein_RNAP_forward__complex_part_P_BetI_protein_BetI_degtagged_2x_forward__part_UTR1_forward_part_PhlF_forward_part_t16_forward_ => ordered_polymer_part_P_SrpR_forward_complex_part_P_BetI_protein_BetI_degtagged_2x_forward__part_UTR1_forward_part_PhlF_forward_part_t16_forward_ + protein_RNAP; ku_P_SrpR_leak_transcription_mm*ordered_polymer_complex_part_P_SrpR_protein_RNAP_forward__complex_part_P_BetI_protein_BetI_degtagged_2x_forward__part_UTR1_forward_part_PhlF_forward_part_t16_forward_;
  r29: ordered_polymer_complex_part_P_SrpR_protein_RNAP_forward__complex_part_P_BetI_protein_BetI_degtagged_2x_forward__part_UTR1_forward_part_PhlF_forward_part_t16_forward_ => ordered_polymer_part_P_SrpR_forward_complex_part_P_BetI_protein_BetI_degtagged_2x_forward__part_UTR1_forward_part_PhlF_forward_part_t16_forward_ + rna_part_P_BetI_forward_part_UTR1_forward_part_PhlF_forward_part_t16_forward_ + protein_RNAP; ktx_P_SrpR_leak_transcription_mm*ordered_polymer_complex_part_P_SrpR_protein_RNAP_forward__complex_part_P_BetI_protein_BetI_degtagged_2x_forward__part_UTR1_forward_part_PhlF_forward_part_t16_forward_;
  r30: 2 protein_SrpR_degtagged + ordered_polymer_part_P_SrpR_forward_complex_part_P_BetI_protein_BetI_degtagged_2x_forward__part_UTR1_forward_part_PhlF_forward_part_t16_forward_ => ordered_polymer_complex_part_P_SrpR_protein_SrpR_degtagged_2x_forward__complex_part_P_BetI_protein_BetI_degtagged_2x_forward__part_UTR1_forward_part_PhlF_forward_part_t16_forward_; kb__one_step_cooperative_binding*protein_SrpR_degtagged^2*ordered_polymer_part_P_SrpR_forward_complex_part_P_BetI_protein_BetI_degtagged_2x_forward__part_UTR1_forward_part_PhlF_forward_part_t16_forward_;
  r30rev: ordered_polymer_complex_part_P_SrpR_protein_SrpR_degtagged_2x_forward__complex_part_P_BetI_protein_BetI_degtagged_2x_forward__part_UTR1_forward_part_PhlF_forward_part_t16_forward_ => 2 protein_SrpR_degtagged + ordered_polymer_part_P_SrpR_forward_complex_part_P_BetI_protein_BetI_degtagged_2x_forward__part_UTR1_forward_part_PhlF_forward_part_t16_forward_; ku__one_step_cooperative_binding*ordered_polymer_complex_part_P_SrpR_protein_SrpR_degtagged_2x_forward__complex_part_P_BetI_protein_BetI_degtagged_2x_forward__part_UTR1_forward_part_PhlF_forward_part_t16_forward_;
  r31: ordered_polymer_complex_part_P_SrpR_protein_SrpR_degtagged_2x_forward__complex_part_P_BetI_protein_BetI_degtagged_2x_forward__part_UTR1_forward_part_PhlF_forward_part_t16_forward_ + protein_RNAP => ordered_polymer_complex_complex_part_P_SrpR_protein_SrpR_degtagged_2x__protein_RNAP_forward__complex_part_P_BetI_protein_BetI_degtagged_2x_forward__part_UTR1_forward_part_PhlF_forward_part_t16_forward_; kb__transcription_mm*ordered_polymer_complex_part_P_SrpR_protein_SrpR_degtagged_2x_forward__complex_part_P_BetI_protein_BetI_degtagged_2x_forward__part_UTR1_forward_part_PhlF_forward_part_t16_forward_*protein_RNAP;
  r31rev: ordered_polymer_complex_complex_part_P_SrpR_protein_SrpR_degtagged_2x__protein_RNAP_forward__complex_part_P_BetI_protein_BetI_degtagged_2x_forward__part_UTR1_forward_part_PhlF_forward_part_t16_forward_ => ordered_polymer_complex_part_P_SrpR_protein_SrpR_degtagged_2x_forward__complex_part_P_BetI_protein_BetI_degtagged_2x_forward__part_UTR1_forward_part_PhlF_forward_part_t16_forward_ + protein_RNAP; ku__transcription_mm*ordered_polymer_complex_complex_part_P_SrpR_protein_SrpR_degtagged_2x__protein_RNAP_forward__complex_part_P_BetI_protein_BetI_degtagged_2x_forward__part_UTR1_forward_part_PhlF_forward_part_t16_forward_;
  r32: ordered_polymer_complex_complex_part_P_SrpR_protein_SrpR_degtagged_2x__protein_RNAP_forward__complex_part_P_BetI_protein_BetI_degtagged_2x_forward__part_UTR1_forward_part_PhlF_forward_part_t16_forward_ => ordered_polymer_complex_part_P_SrpR_protein_SrpR_degtagged_2x_forward__complex_part_P_BetI_protein_BetI_degtagged_2x_forward__part_UTR1_forward_part_PhlF_forward_part_t16_forward_ + rna_part_P_BetI_forward_part_UTR1_forward_part_PhlF_forward_part_t16_forward_ + protein_RNAP; ktx__transcription_mm*ordered_polymer_complex_complex_part_P_SrpR_protein_SrpR_degtagged_2x__protein_RNAP_forward__complex_part_P_BetI_protein_BetI_degtagged_2x_forward__part_UTR1_forward_part_PhlF_forward_part_t16_forward_;
  r33: dna_part_P_SrpR_forward_part_P_BetI_forward_part_UTR1_forward_part_PhlF_forward_part_t16_forward_ + protein_RNAP => ordered_polymer_complex_part_P_SrpR_protein_RNAP_forward__part_P_BetI_forward_part_UTR1_forward_part_PhlF_forward_part_t16_forward_; kb_P_SrpR_leak_transcription_mm*dna_part_P_SrpR_forward_part_P_BetI_forward_part_UTR1_forward_part_PhlF_forward_part_t16_forward_*protein_RNAP;
  r33rev: ordered_polymer_complex_part_P_SrpR_protein_RNAP_forward__part_P_BetI_forward_part_UTR1_forward_part_PhlF_forward_part_t16_forward_ => dna_part_P_SrpR_forward_part_P_BetI_forward_part_UTR1_forward_part_PhlF_forward_part_t16_forward_ + protein_RNAP; ku_P_SrpR_leak_transcription_mm*ordered_polymer_complex_part_P_SrpR_protein_RNAP_forward__part_P_BetI_forward_part_UTR1_forward_part_PhlF_forward_part_t16_forward_;
  r34: ordered_polymer_complex_part_P_SrpR_protein_RNAP_forward__part_P_BetI_forward_part_UTR1_forward_part_PhlF_forward_part_t16_forward_ => dna_part_P_SrpR_forward_part_P_BetI_forward_part_UTR1_forward_part_PhlF_forward_part_t16_forward_ + rna_part_P_BetI_forward_part_UTR1_forward_part_PhlF_forward_part_t16_forward_ + protein_RNAP; ktx_P_SrpR_leak_transcription_mm*ordered_polymer_complex_part_P_SrpR_protein_RNAP_forward__part_P_BetI_forward_part_UTR1_forward_part_PhlF_forward_part_t16_forward_;
  r35: 2 protein_SrpR_degtagged + dna_part_P_SrpR_forward_part_P_BetI_forward_part_UTR1_forward_part_PhlF_forward_part_t16_forward_ => ordered_polymer_complex_part_P_SrpR_protein_SrpR_degtagged_2x_forward__part_P_BetI_forward_part_UTR1_forward_part_PhlF_forward_part_t16_forward_; kb__one_step_cooperative_binding*protein_SrpR_degtagged^2*dna_part_P_SrpR_forward_part_P_BetI_forward_part_UTR1_forward_part_PhlF_forward_part_t16_forward_;
  r35rev: ordered_polymer_complex_part_P_SrpR_protein_SrpR_degtagged_2x_forward__part_P_BetI_forward_part_UTR1_forward_part_PhlF_forward_part_t16_forward_ => 2 protein_SrpR_degtagged + dna_part_P_SrpR_forward_part_P_BetI_forward_part_UTR1_forward_part_PhlF_forward_part_t16_forward_; ku__one_step_cooperative_binding*ordered_polymer_complex_part_P_SrpR_protein_SrpR_degtagged_2x_forward__part_P_BetI_forward_part_UTR1_forward_part_PhlF_forward_part_t16_forward_;
  r36: ordered_polymer_complex_part_P_SrpR_protein_SrpR_degtagged_2x_forward__part_P_BetI_forward_part_UTR1_forward_part_PhlF_forward_part_t16_forward_ + protein_RNAP => ordered_polymer_complex_complex_part_P_SrpR_protein_SrpR_degtagged_2x__protein_RNAP_forward__part_P_BetI_forward_part_UTR1_forward_part_PhlF_forward_part_t16_forward_; kb__transcription_mm*ordered_polymer_complex_part_P_SrpR_protein_SrpR_degtagged_2x_forward__part_P_BetI_forward_part_UTR1_forward_part_PhlF_forward_part_t16_forward_*protein_RNAP;
  r36rev: ordered_polymer_complex_complex_part_P_SrpR_protein_SrpR_degtagged_2x__protein_RNAP_forward__part_P_BetI_forward_part_UTR1_forward_part_PhlF_forward_part_t16_forward_ => ordered_polymer_complex_part_P_SrpR_protein_SrpR_degtagged_2x_forward__part_P_BetI_forward_part_UTR1_forward_part_PhlF_forward_part_t16_forward_ + protein_RNAP; ku__transcription_mm*ordered_polymer_complex_complex_part_P_SrpR_protein_SrpR_degtagged_2x__protein_RNAP_forward__part_P_BetI_forward_part_UTR1_forward_part_PhlF_forward_part_t16_forward_;
  r37: ordered_polymer_complex_complex_part_P_SrpR_protein_SrpR_degtagged_2x__protein_RNAP_forward__part_P_BetI_forward_part_UTR1_forward_part_PhlF_forward_part_t16_forward_ => ordered_polymer_complex_part_P_SrpR_protein_SrpR_degtagged_2x_forward__part_P_BetI_forward_part_UTR1_forward_part_PhlF_forward_part_t16_forward_ + rna_part_P_BetI_forward_part_UTR1_forward_part_PhlF_forward_part_t16_forward_ + protein_RNAP; ktx__transcription_mm*ordered_polymer_complex_complex_part_P_SrpR_protein_SrpR_degtagged_2x__protein_RNAP_forward__part_P_BetI_forward_part_UTR1_forward_part_PhlF_forward_part_t16_forward_;
  r38: dna_part_P_SrpR_forward_part_P_BetI_forward_part_UTR1_forward_part_PhlF_forward_part_t16_forward_ + protein_RNAP => ordered_polymer_part_P_SrpR_forward_complex_part_P_BetI_protein_RNAP_forward__part_UTR1_forward_part_PhlF_forward_part_t16_forward_; kb_P_BetI_leak_transcription_mm*dna_part_P_SrpR_forward_part_P_BetI_forward_part_UTR1_forward_part_PhlF_forward_part_t16_forward_*protein_RNAP;
  r38rev: ordered_polymer_part_P_SrpR_forward_complex_part_P_BetI_protein_RNAP_forward__part_UTR1_forward_part_PhlF_forward_part_t16_forward_ => dna_part_P_SrpR_forward_part_P_BetI_forward_part_UTR1_forward_part_PhlF_forward_part_t16_forward_ + protein_RNAP; ku_P_BetI_leak_transcription_mm*ordered_polymer_part_P_SrpR_forward_complex_part_P_BetI_protein_RNAP_forward__part_UTR1_forward_part_PhlF_forward_part_t16_forward_;
  r39: ordered_polymer_part_P_SrpR_forward_complex_part_P_BetI_protein_RNAP_forward__part_UTR1_forward_part_PhlF_forward_part_t16_forward_ => dna_part_P_SrpR_forward_part_P_BetI_forward_part_UTR1_forward_part_PhlF_forward_part_t16_forward_ + rna_part_UTR1_forward_part_PhlF_forward_part_t16_forward_ + protein_RNAP; ktx_P_BetI_leak_transcription_mm*ordered_polymer_part_P_SrpR_forward_complex_part_P_BetI_protein_RNAP_forward__part_UTR1_forward_part_PhlF_forward_part_t16_forward_;
  r40: 2 protein_BetI_degtagged + dna_part_P_SrpR_forward_part_P_BetI_forward_part_UTR1_forward_part_PhlF_forward_part_t16_forward_ => ordered_polymer_part_P_SrpR_forward_complex_part_P_BetI_protein_BetI_degtagged_2x_forward__part_UTR1_forward_part_PhlF_forward_part_t16_forward_; kb__one_step_cooperative_binding*protein_BetI_degtagged^2*dna_part_P_SrpR_forward_part_P_BetI_forward_part_UTR1_forward_part_PhlF_forward_part_t16_forward_;
  r40rev: ordered_polymer_part_P_SrpR_forward_complex_part_P_BetI_protein_BetI_degtagged_2x_forward__part_UTR1_forward_part_PhlF_forward_part_t16_forward_ => 2 protein_BetI_degtagged + dna_part_P_SrpR_forward_part_P_BetI_forward_part_UTR1_forward_part_PhlF_forward_part_t16_forward_; ku__one_step_cooperative_binding*ordered_polymer_part_P_SrpR_forward_complex_part_P_BetI_protein_BetI_degtagged_2x_forward__part_UTR1_forward_part_PhlF_forward_part_t16_forward_;
  r41: ordered_polymer_part_P_SrpR_forward_complex_part_P_BetI_protein_BetI_degtagged_2x_forward__part_UTR1_forward_part_PhlF_forward_part_t16_forward_ + protein_RNAP => ordered_polymer_part_P_SrpR_forward_complex_complex_part_P_BetI_protein_BetI_degtagged_2x__protein_RNAP_forward__part_UTR1_forward_part_PhlF_forward_part_t16_forward_; kb__transcription_mm*ordered_polymer_part_P_SrpR_forward_complex_part_P_BetI_protein_BetI_degtagged_2x_forward__part_UTR1_forward_part_PhlF_forward_part_t16_forward_*protein_RNAP;
  r41rev: ordered_polymer_part_P_SrpR_forward_complex_complex_part_P_BetI_protein_BetI_degtagged_2x__protein_RNAP_forward__part_UTR1_forward_part_PhlF_forward_part_t16_forward_ => ordered_polymer_part_P_SrpR_forward_complex_part_P_BetI_protein_BetI_degtagged_2x_forward__part_UTR1_forward_part_PhlF_forward_part_t16_forward_ + protein_RNAP; ku__transcription_mm*ordered_polymer_part_P_SrpR_forward_complex_complex_part_P_BetI_protein_BetI_degtagged_2x__protein_RNAP_forward__part_UTR1_forward_part_PhlF_forward_part_t16_forward_;
  r42: ordered_polymer_part_P_SrpR_forward_complex_complex_part_P_BetI_protein_BetI_degtagged_2x__protein_RNAP_forward__part_UTR1_forward_part_PhlF_forward_part_t16_forward_ => ordered_polymer_part_P_SrpR_forward_complex_part_P_BetI_protein_BetI_degtagged_2x_forward__part_UTR1_forward_part_PhlF_forward_part_t16_forward_ + rna_part_UTR1_forward_part_PhlF_forward_part_t16_forward_ + protein_RNAP; ktx__transcription_mm*ordered_polymer_part_P_SrpR_forward_complex_complex_part_P_BetI_protein_BetI_degtagged_2x__protein_RNAP_forward__part_UTR1_forward_part_PhlF_forward_part_t16_forward_;
  r43: ordered_polymer_complex_complex_LacI_2x_part_P_Tac__protein_RNAP_forward__part_P_Tet_forward_part_UTR1_forward_part_SrpR_forward_part_t16_forward_ + protein_RNAP => ordered_polymer_complex_complex_LacI_2x_part_P_Tac__protein_RNAP_forward__complex_part_P_Tet_protein_RNAP_forward__part_UTR1_forward_part_SrpR_forward_part_t16_forward_; kb_P_Tet_leak_transcription_mm*ordered_polymer_complex_complex_LacI_2x_part_P_Tac__protein_RNAP_forward__part_P_Tet_forward_part_UTR1_forward_part_SrpR_forward_part_t16_forward_*protein_RNAP;
  r43rev: ordered_polymer_complex_complex_LacI_2x_part_P_Tac__protein_RNAP_forward__complex_part_P_Tet_protein_RNAP_forward__part_UTR1_forward_part_SrpR_forward_part_t16_forward_ => ordered_polymer_complex_complex_LacI_2x_part_P_Tac__protein_RNAP_forward__part_P_Tet_forward_part_UTR1_forward_part_SrpR_forward_part_t16_forward_ + protein_RNAP; ku_P_Tet_leak_transcription_mm*ordered_polymer_complex_complex_LacI_2x_part_P_Tac__protein_RNAP_forward__complex_part_P_Tet_protein_RNAP_forward__part_UTR1_forward_part_SrpR_forward_part_t16_forward_;
  r44: ordered_polymer_complex_complex_LacI_2x_part_P_Tac__protein_RNAP_forward__complex_part_P_Tet_protein_RNAP_forward__part_UTR1_forward_part_SrpR_forward_part_t16_forward_ => ordered_polymer_complex_complex_LacI_2x_part_P_Tac__protein_RNAP_forward__part_P_Tet_forward_part_UTR1_forward_part_SrpR_forward_part_t16_forward_ + rna_part_UTR1_forward_part_SrpR_forward_part_t16_forward_ + protein_RNAP; ktx_P_Tet_leak_transcription_mm*ordered_polymer_complex_complex_LacI_2x_part_P_Tac__protein_RNAP_forward__complex_part_P_Tet_protein_RNAP_forward__part_UTR1_forward_part_SrpR_forward_part_t16_forward_;
  r45: 2 TetR + ordered_polymer_complex_complex_LacI_2x_part_P_Tac__protein_RNAP_forward__part_P_Tet_forward_part_UTR1_forward_part_SrpR_forward_part_t16_forward_ => ordered_polymer_complex_complex_LacI_2x_part_P_Tac__protein_RNAP_forward__complex_TetR_2x_part_P_Tet_forward__part_UTR1_forward_part_SrpR_forward_part_t16_forward_; kb__one_step_cooperative_binding*TetR^2*ordered_polymer_complex_complex_LacI_2x_part_P_Tac__protein_RNAP_forward__part_P_Tet_forward_part_UTR1_forward_part_SrpR_forward_part_t16_forward_;
  r45rev: ordered_polymer_complex_complex_LacI_2x_part_P_Tac__protein_RNAP_forward__complex_TetR_2x_part_P_Tet_forward__part_UTR1_forward_part_SrpR_forward_part_t16_forward_ => 2 TetR + ordered_polymer_complex_complex_LacI_2x_part_P_Tac__protein_RNAP_forward__part_P_Tet_forward_part_UTR1_forward_part_SrpR_forward_part_t16_forward_; ku__one_step_cooperative_binding*ordered_polymer_complex_complex_LacI_2x_part_P_Tac__protein_RNAP_forward__complex_TetR_2x_part_P_Tet_forward__part_UTR1_forward_part_SrpR_forward_part_t16_forward_;
  r46: ordered_polymer_complex_complex_LacI_2x_part_P_Tac__protein_RNAP_forward__complex_TetR_2x_part_P_Tet_forward__part_UTR1_forward_part_SrpR_forward_part_t16_forward_ + protein_RNAP => ordered_polymer_complex_complex_LacI_2x_part_P_Tac__protein_RNAP_forward__complex_complex_TetR_2x_part_P_Tet__protein_RNAP_forward__part_UTR1_forward_part_SrpR_forward_part_t16_forward_; kb__transcription_mm*ordered_polymer_complex_complex_LacI_2x_part_P_Tac__protein_RNAP_forward__complex_TetR_2x_part_P_Tet_forward__part_UTR1_forward_part_SrpR_forward_part_t16_forward_*protein_RNAP;
  r46rev: ordered_polymer_complex_complex_LacI_2x_part_P_Tac__protein_RNAP_forward__complex_complex_TetR_2x_part_P_Tet__protein_RNAP_forward__part_UTR1_forward_part_SrpR_forward_part_t16_forward_ => ordered_polymer_complex_complex_LacI_2x_part_P_Tac__protein_RNAP_forward__complex_TetR_2x_part_P_Tet_forward__part_UTR1_forward_part_SrpR_forward_part_t16_forward_ + protein_RNAP; ku__transcription_mm*ordered_polymer_complex_complex_LacI_2x_part_P_Tac__protein_RNAP_forward__complex_complex_TetR_2x_part_P_Tet__protein_RNAP_forward__part_UTR1_forward_part_SrpR_forward_part_t16_forward_;
  r47: ordered_polymer_complex_complex_LacI_2x_part_P_Tac__protein_RNAP_forward__complex_complex_TetR_2x_part_P_Tet__protein_RNAP_forward__part_UTR1_forward_part_SrpR_forward_part_t16_forward_ => ordered_polymer_complex_complex_LacI_2x_part_P_Tac__protein_RNAP_forward__complex_TetR_2x_part_P_Tet_forward__part_UTR1_forward_part_SrpR_forward_part_t16_forward_ + rna_part_UTR1_forward_part_SrpR_forward_part_t16_forward_ + protein_RNAP; ktx__transcription_mm*ordered_polymer_complex_complex_LacI_2x_part_P_Tac__protein_RNAP_forward__complex_complex_TetR_2x_part_P_Tet__protein_RNAP_forward__part_UTR1_forward_part_SrpR_forward_part_t16_forward_;
  r48: ordered_polymer_complex_part_P_Tac_protein_RNAP_forward__part_P_Tet_forward_part_UTR1_forward_part_SrpR_forward_part_t16_forward_ + protein_RNAP => ordered_polymer_complex_part_P_Tac_protein_RNAP_forward__complex_part_P_Tet_protein_RNAP_forward__part_UTR1_forward_part_SrpR_forward_part_t16_forward_; kb_P_Tet_leak_transcription_mm*ordered_polymer_complex_part_P_Tac_protein_RNAP_forward__part_P_Tet_forward_part_UTR1_forward_part_SrpR_forward_part_t16_forward_*protein_RNAP;
  r48rev: ordered_polymer_complex_part_P_Tac_protein_RNAP_forward__complex_part_P_Tet_protein_RNAP_forward__part_UTR1_forward_part_SrpR_forward_part_t16_forward_ => ordered_polymer_complex_part_P_Tac_protein_RNAP_forward__part_P_Tet_forward_part_UTR1_forward_part_SrpR_forward_part_t16_forward_ + protein_RNAP; ku_P_Tet_leak_transcription_mm*ordered_polymer_complex_part_P_Tac_protein_RNAP_forward__complex_part_P_Tet_protein_RNAP_forward__part_UTR1_forward_part_SrpR_forward_part_t16_forward_;
  r49: ordered_polymer_complex_part_P_Tac_protein_RNAP_forward__complex_part_P_Tet_protein_RNAP_forward__part_UTR1_forward_part_SrpR_forward_part_t16_forward_ => ordered_polymer_complex_part_P_Tac_protein_RNAP_forward__part_P_Tet_forward_part_UTR1_forward_part_SrpR_forward_part_t16_forward_ + rna_part_UTR1_forward_part_SrpR_forward_part_t16_forward_ + protein_RNAP; ktx_P_Tet_leak_transcription_mm*ordered_polymer_complex_part_P_Tac_protein_RNAP_forward__complex_part_P_Tet_protein_RNAP_forward__part_UTR1_forward_part_SrpR_forward_part_t16_forward_;
  r50: 2 TetR + ordered_polymer_complex_part_P_Tac_protein_RNAP_forward__part_P_Tet_forward_part_UTR1_forward_part_SrpR_forward_part_t16_forward_ => ordered_polymer_complex_part_P_Tac_protein_RNAP_forward__complex_TetR_2x_part_P_Tet_forward__part_UTR1_forward_part_SrpR_forward_part_t16_forward_; kb__one_step_cooperative_binding*TetR^2*ordered_polymer_complex_part_P_Tac_protein_RNAP_forward__part_P_Tet_forward_part_UTR1_forward_part_SrpR_forward_part_t16_forward_;
  r50rev: ordered_polymer_complex_part_P_Tac_protein_RNAP_forward__complex_TetR_2x_part_P_Tet_forward__part_UTR1_forward_part_SrpR_forward_part_t16_forward_ => 2 TetR + ordered_polymer_complex_part_P_Tac_protein_RNAP_forward__part_P_Tet_forward_part_UTR1_forward_part_SrpR_forward_part_t16_forward_; ku__one_step_cooperative_binding*ordered_polymer_complex_part_P_Tac_protein_RNAP_forward__complex_TetR_2x_part_P_Tet_forward__part_UTR1_forward_part_SrpR_forward_part_t16_forward_;
  r51: ordered_polymer_complex_part_P_Tac_protein_RNAP_forward__complex_TetR_2x_part_P_Tet_forward__part_UTR1_forward_part_SrpR_forward_part_t16_forward_ + protein_RNAP => ordered_polymer_complex_part_P_Tac_protein_RNAP_forward__complex_complex_TetR_2x_part_P_Tet__protein_RNAP_forward__part_UTR1_forward_part_SrpR_forward_part_t16_forward_; kb__transcription_mm*ordered_polymer_complex_part_P_Tac_protein_RNAP_forward__complex_TetR_2x_part_P_Tet_forward__part_UTR1_forward_part_SrpR_forward_part_t16_forward_*protein_RNAP;
  r51rev: ordered_polymer_complex_part_P_Tac_protein_RNAP_forward__complex_complex_TetR_2x_part_P_Tet__protein_RNAP_forward__part_UTR1_forward_part_SrpR_forward_part_t16_forward_ => ordered_polymer_complex_part_P_Tac_protein_RNAP_forward__complex_TetR_2x_part_P_Tet_forward__part_UTR1_forward_part_SrpR_forward_part_t16_forward_ + protein_RNAP; ku__transcription_mm*ordered_polymer_complex_part_P_Tac_protein_RNAP_forward__complex_complex_TetR_2x_part_P_Tet__protein_RNAP_forward__part_UTR1_forward_part_SrpR_forward_part_t16_forward_;
  r52: ordered_polymer_complex_part_P_Tac_protein_RNAP_forward__complex_complex_TetR_2x_part_P_Tet__protein_RNAP_forward__part_UTR1_forward_part_SrpR_forward_part_t16_forward_ => ordered_polymer_complex_part_P_Tac_protein_RNAP_forward__complex_TetR_2x_part_P_Tet_forward__part_UTR1_forward_part_SrpR_forward_part_t16_forward_ + rna_part_UTR1_forward_part_SrpR_forward_part_t16_forward_ + protein_RNAP; ktx__transcription_mm*ordered_polymer_complex_part_P_Tac_protein_RNAP_forward__complex_complex_TetR_2x_part_P_Tet__protein_RNAP_forward__part_UTR1_forward_part_SrpR_forward_part_t16_forward_;
  r53: ordered_polymer_complex_LacI_2x_part_P_Tac_forward__part_P_Tet_forward_part_UTR1_forward_part_SrpR_forward_part_t16_forward_ + protein_RNAP => ordered_polymer_complex_LacI_2x_part_P_Tac_forward__complex_part_P_Tet_protein_RNAP_forward__part_UTR1_forward_part_SrpR_forward_part_t16_forward_; kb_P_Tet_leak_transcription_mm*ordered_polymer_complex_LacI_2x_part_P_Tac_forward__part_P_Tet_forward_part_UTR1_forward_part_SrpR_forward_part_t16_forward_*protein_RNAP;
  r53rev: ordered_polymer_complex_LacI_2x_part_P_Tac_forward__complex_part_P_Tet_protein_RNAP_forward__part_UTR1_forward_part_SrpR_forward_part_t16_forward_ => ordered_polymer_complex_LacI_2x_part_P_Tac_forward__part_P_Tet_forward_part_UTR1_forward_part_SrpR_forward_part_t16_forward_ + protein_RNAP; ku_P_Tet_leak_transcription_mm*ordered_polymer_complex_LacI_2x_part_P_Tac_forward__complex_part_P_Tet_protein_RNAP_forward__part_UTR1_forward_part_SrpR_forward_part_t16_forward_;
  r54: ordered_polymer_complex_LacI_2x_part_P_Tac_forward__complex_part_P_Tet_protein_RNAP_forward__part_UTR1_forward_part_SrpR_forward_part_t16_forward_ => ordered_polymer_complex_LacI_2x_part_P_Tac_forward__part_P_Tet_forward_part_UTR1_forward_part_SrpR_forward_part_t16_forward_ + rna_part_UTR1_forward_part_SrpR_forward_part_t16_forward_ + protein_RNAP; ktx_P_Tet_leak_transcription_mm*ordered_polymer_complex_LacI_2x_part_P_Tac_forward__complex_part_P_Tet_protein_RNAP_forward__part_UTR1_forward_part_SrpR_forward_part_t16_forward_;
  r55: 2 TetR + ordered_polymer_complex_LacI_2x_part_P_Tac_forward__part_P_Tet_forward_part_UTR1_forward_part_SrpR_forward_part_t16_forward_ => ordered_polymer_complex_LacI_2x_part_P_Tac_forward__complex_TetR_2x_part_P_Tet_forward__part_UTR1_forward_part_SrpR_forward_part_t16_forward_; kb__one_step_cooperative_binding*TetR^2*ordered_polymer_complex_LacI_2x_part_P_Tac_forward__part_P_Tet_forward_part_UTR1_forward_part_SrpR_forward_part_t16_forward_;
  r55rev: ordered_polymer_complex_LacI_2x_part_P_Tac_forward__complex_TetR_2x_part_P_Tet_forward__part_UTR1_forward_part_SrpR_forward_part_t16_forward_ => 2 TetR + ordered_polymer_complex_LacI_2x_part_P_Tac_forward__part_P_Tet_forward_part_UTR1_forward_part_SrpR_forward_part_t16_forward_; ku__one_step_cooperative_binding*ordered_polymer_complex_LacI_2x_part_P_Tac_forward__complex_TetR_2x_part_P_Tet_forward__part_UTR1_forward_part_SrpR_forward_part_t16_forward_;
  r56: ordered_polymer_complex_LacI_2x_part_P_Tac_forward__complex_TetR_2x_part_P_Tet_forward__part_UTR1_forward_part_SrpR_forward_part_t16_forward_ + protein_RNAP => ordered_polymer_complex_LacI_2x_part_P_Tac_forward__complex_complex_TetR_2x_part_P_Tet__protein_RNAP_forward__part_UTR1_forward_part_SrpR_forward_part_t16_forward_; kb__transcription_mm*ordered_polymer_complex_LacI_2x_part_P_Tac_forward__complex_TetR_2x_part_P_Tet_forward__part_UTR1_forward_part_SrpR_forward_part_t16_forward_*protein_RNAP;
  r56rev: ordered_polymer_complex_LacI_2x_part_P_Tac_forward__complex_complex_TetR_2x_part_P_Tet__protein_RNAP_forward__part_UTR1_forward_part_SrpR_forward_part_t16_forward_ => ordered_polymer_complex_LacI_2x_part_P_Tac_forward__complex_TetR_2x_part_P_Tet_forward__part_UTR1_forward_part_SrpR_forward_part_t16_forward_ + protein_RNAP; ku__transcription_mm*ordered_polymer_complex_LacI_2x_part_P_Tac_forward__complex_complex_TetR_2x_part_P_Tet__protein_RNAP_forward__part_UTR1_forward_part_SrpR_forward_part_t16_forward_;
  r57: ordered_polymer_complex_LacI_2x_part_P_Tac_forward__complex_complex_TetR_2x_part_P_Tet__protein_RNAP_forward__part_UTR1_forward_part_SrpR_forward_part_t16_forward_ => ordered_polymer_complex_LacI_2x_part_P_Tac_forward__complex_TetR_2x_part_P_Tet_forward__part_UTR1_forward_part_SrpR_forward_part_t16_forward_ + rna_part_UTR1_forward_part_SrpR_forward_part_t16_forward_ + protein_RNAP; ktx__transcription_mm*ordered_polymer_complex_LacI_2x_part_P_Tac_forward__complex_complex_TetR_2x_part_P_Tet__protein_RNAP_forward__part_UTR1_forward_part_SrpR_forward_part_t16_forward_;
  r58: ordered_polymer_part_P_Tac_forward_complex_part_P_Tet_protein_RNAP_forward__part_UTR1_forward_part_SrpR_forward_part_t16_forward_ + protein_RNAP => ordered_polymer_complex_part_P_Tac_protein_RNAP_forward__complex_part_P_Tet_protein_RNAP_forward__part_UTR1_forward_part_SrpR_forward_part_t16_forward_; kb_P_Tac_leak_transcription_mm*ordered_polymer_part_P_Tac_forward_complex_part_P_Tet_protein_RNAP_forward__part_UTR1_forward_part_SrpR_forward_part_t16_forward_*protein_RNAP;
  r58rev: ordered_polymer_complex_part_P_Tac_protein_RNAP_forward__complex_part_P_Tet_protein_RNAP_forward__part_UTR1_forward_part_SrpR_forward_part_t16_forward_ => ordered_polymer_part_P_Tac_forward_complex_part_P_Tet_protein_RNAP_forward__part_UTR1_forward_part_SrpR_forward_part_t16_forward_ + protein_RNAP; ku_P_Tac_leak_transcription_mm*ordered_polymer_complex_part_P_Tac_protein_RNAP_forward__complex_part_P_Tet_protein_RNAP_forward__part_UTR1_forward_part_SrpR_forward_part_t16_forward_;
  r59: ordered_polymer_complex_part_P_Tac_protein_RNAP_forward__complex_part_P_Tet_protein_RNAP_forward__part_UTR1_forward_part_SrpR_forward_part_t16_forward_ => ordered_polymer_part_P_Tac_forward_complex_part_P_Tet_protein_RNAP_forward__part_UTR1_forward_part_SrpR_forward_part_t16_forward_ + rna_part_P_Tet_forward_part_UTR1_forward_part_SrpR_forward_part_t16_forward_ + protein_RNAP; ktx_P_Tac_leak_transcription_mm*ordered_polymer_complex_part_P_Tac_protein_RNAP_forward__complex_part_P_Tet_protein_RNAP_forward__part_UTR1_forward_part_SrpR_forward_part_t16_forward_;
  r60: 2 LacI + ordered_polymer_part_P_Tac_forward_complex_part_P_Tet_protein_RNAP_forward__part_UTR1_forward_part_SrpR_forward_part_t16_forward_ => ordered_polymer_complex_LacI_2x_part_P_Tac_forward__complex_part_P_Tet_protein_RNAP_forward__part_UTR1_forward_part_SrpR_forward_part_t16_forward_; kb__one_step_cooperative_binding*LacI^2*ordered_polymer_part_P_Tac_forward_complex_part_P_Tet_protein_RNAP_forward__part_UTR1_forward_part_SrpR_forward_part_t16_forward_;
  r60rev: ordered_polymer_complex_LacI_2x_part_P_Tac_forward__complex_part_P_Tet_protein_RNAP_forward__part_UTR1_forward_part_SrpR_forward_part_t16_forward_ => 2 LacI + ordered_polymer_part_P_Tac_forward_complex_part_P_Tet_protein_RNAP_forward__part_UTR1_forward_part_SrpR_forward_part_t16_forward_; ku__one_step_cooperative_binding*ordered_polymer_complex_LacI_2x_part_P_Tac_forward__complex_part_P_Tet_protein_RNAP_forward__part_UTR1_forward_part_SrpR_forward_part_t16_forward_;
  r61: ordered_polymer_complex_LacI_2x_part_P_Tac_forward__complex_part_P_Tet_protein_RNAP_forward__part_UTR1_forward_part_SrpR_forward_part_t16_forward_ + protein_RNAP => ordered_polymer_complex_complex_LacI_2x_part_P_Tac__protein_RNAP_forward__complex_part_P_Tet_protein_RNAP_forward__part_UTR1_forward_part_SrpR_forward_part_t16_forward_; kb__transcription_mm*ordered_polymer_complex_LacI_2x_part_P_Tac_forward__complex_part_P_Tet_protein_RNAP_forward__part_UTR1_forward_part_SrpR_forward_part_t16_forward_*protein_RNAP;
  r61rev: ordered_polymer_complex_complex_LacI_2x_part_P_Tac__protein_RNAP_forward__complex_part_P_Tet_protein_RNAP_forward__part_UTR1_forward_part_SrpR_forward_part_t16_forward_ => ordered_polymer_complex_LacI_2x_part_P_Tac_forward__complex_part_P_Tet_protein_RNAP_forward__part_UTR1_forward_part_SrpR_forward_part_t16_forward_ + protein_RNAP; ku__transcription_mm*ordered_polymer_complex_complex_LacI_2x_part_P_Tac__protein_RNAP_forward__complex_part_P_Tet_protein_RNAP_forward__part_UTR1_forward_part_SrpR_forward_part_t16_forward_;
  r62: ordered_polymer_complex_complex_LacI_2x_part_P_Tac__protein_RNAP_forward__complex_part_P_Tet_protein_RNAP_forward__part_UTR1_forward_part_SrpR_forward_part_t16_forward_ => ordered_polymer_complex_LacI_2x_part_P_Tac_forward__complex_part_P_Tet_protein_RNAP_forward__part_UTR1_forward_part_SrpR_forward_part_t16_forward_ + rna_part_P_Tet_forward_part_UTR1_forward_part_SrpR_forward_part_t16_forward_ + protein_RNAP; ktx__transcription_mm*ordered_polymer_complex_complex_LacI_2x_part_P_Tac__protein_RNAP_forward__complex_part_P_Tet_protein_RNAP_forward__part_UTR1_forward_part_SrpR_forward_part_t16_forward_;
  r63: ordered_polymer_part_P_Tac_forward_complex_complex_TetR_2x_part_P_Tet__protein_RNAP_forward__part_UTR1_forward_part_SrpR_forward_part_t16_forward_ + protein_RNAP => ordered_polymer_complex_part_P_Tac_protein_RNAP_forward__complex_complex_TetR_2x_part_P_Tet__protein_RNAP_forward__part_UTR1_forward_part_SrpR_forward_part_t16_forward_; kb_P_Tac_leak_transcription_mm*ordered_polymer_part_P_Tac_forward_complex_complex_TetR_2x_part_P_Tet__protein_RNAP_forward__part_UTR1_forward_part_SrpR_forward_part_t16_forward_*protein_RNAP;
  r63rev: ordered_polymer_complex_part_P_Tac_protein_RNAP_forward__complex_complex_TetR_2x_part_P_Tet__protein_RNAP_forward__part_UTR1_forward_part_SrpR_forward_part_t16_forward_ => ordered_polymer_part_P_Tac_forward_complex_complex_TetR_2x_part_P_Tet__protein_RNAP_forward__part_UTR1_forward_part_SrpR_forward_part_t16_forward_ + protein_RNAP; ku_P_Tac_leak_transcription_mm*ordered_polymer_complex_part_P_Tac_protein_RNAP_forward__complex_complex_TetR_2x_part_P_Tet__protein_RNAP_forward__part_UTR1_forward_part_SrpR_forward_part_t16_forward_;
  r64: ordered_polymer_complex_part_P_Tac_protein_RNAP_forward__complex_complex_TetR_2x_part_P_Tet__protein_RNAP_forward__part_UTR1_forward_part_SrpR_forward_part_t16_forward_ => ordered_polymer_part_P_Tac_forward_complex_complex_TetR_2x_part_P_Tet__protein_RNAP_forward__part_UTR1_forward_part_SrpR_forward_part_t16_forward_ + rna_part_P_Tet_forward_part_UTR1_forward_part_SrpR_forward_part_t16_forward_ + protein_RNAP; ktx_P_Tac_leak_transcription_mm*ordered_polymer_complex_part_P_Tac_protein_RNAP_forward__complex_complex_TetR_2x_part_P_Tet__protein_RNAP_forward__part_UTR1_forward_part_SrpR_forward_part_t16_forward_;
  r65: 2 LacI + ordered_polymer_part_P_Tac_forward_complex_complex_TetR_2x_part_P_Tet__protein_RNAP_forward__part_UTR1_forward_part_SrpR_forward_part_t16_forward_ => ordered_polymer_complex_LacI_2x_part_P_Tac_forward__complex_complex_TetR_2x_part_P_Tet__protein_RNAP_forward__part_UTR1_forward_part_SrpR_forward_part_t16_forward_; kb__one_step_cooperative_binding*LacI^2*ordered_polymer_part_P_Tac_forward_complex_complex_TetR_2x_part_P_Tet__protein_RNAP_forward__part_UTR1_forward_part_SrpR_forward_part_t16_forward_;
  r65rev: ordered_polymer_complex_LacI_2x_part_P_Tac_forward__complex_complex_TetR_2x_part_P_Tet__protein_RNAP_forward__part_UTR1_forward_part_SrpR_forward_part_t16_forward_ => 2 LacI + ordered_polymer_part_P_Tac_forward_complex_complex_TetR_2x_part_P_Tet__protein_RNAP_forward__part_UTR1_forward_part_SrpR_forward_part_t16_forward_; ku__one_step_cooperative_binding*ordered_polymer_complex_LacI_2x_part_P_Tac_forward__complex_complex_TetR_2x_part_P_Tet__protein_RNAP_forward__part_UTR1_forward_part_SrpR_forward_part_t16_forward_;
  r66: ordered_polymer_complex_LacI_2x_part_P_Tac_forward__complex_complex_TetR_2x_part_P_Tet__protein_RNAP_forward__part_UTR1_forward_part_SrpR_forward_part_t16_forward_ + protein_RNAP => ordered_polymer_complex_complex_LacI_2x_part_P_Tac__protein_RNAP_forward__complex_complex_TetR_2x_part_P_Tet__protein_RNAP_forward__part_UTR1_forward_part_SrpR_forward_part_t16_forward_; kb__transcription_mm*ordered_polymer_complex_LacI_2x_part_P_Tac_forward__complex_complex_TetR_2x_part_P_Tet__protein_RNAP_forward__part_UTR1_forward_part_SrpR_forward_part_t16_forward_*protein_RNAP;
  r66rev: ordered_polymer_complex_complex_LacI_2x_part_P_Tac__protein_RNAP_forward__complex_complex_TetR_2x_part_P_Tet__protein_RNAP_forward__part_UTR1_forward_part_SrpR_forward_part_t16_forward_ => ordered_polymer_complex_LacI_2x_part_P_Tac_forward__complex_complex_TetR_2x_part_P_Tet__protein_RNAP_forward__part_UTR1_forward_part_SrpR_forward_part_t16_forward_ + protein_RNAP; ku__transcription_mm*ordered_polymer_complex_complex_LacI_2x_part_P_Tac__protein_RNAP_forward__complex_complex_TetR_2x_part_P_Tet__protein_RNAP_forward__part_UTR1_forward_part_SrpR_forward_part_t16_forward_;
  r67: ordered_polymer_complex_complex_LacI_2x_part_P_Tac__protein_RNAP_forward__complex_complex_TetR_2x_part_P_Tet__protein_RNAP_forward__part_UTR1_forward_part_SrpR_forward_part_t16_forward_ => ordered_polymer_complex_LacI_2x_part_P_Tac_forward__complex_complex_TetR_2x_part_P_Tet__protein_RNAP_forward__part_UTR1_forward_part_SrpR_forward_part_t16_forward_ + rna_part_P_Tet_forward_part_UTR1_forward_part_SrpR_forward_part_t16_forward_ + protein_RNAP; ktx__transcription_mm*ordered_polymer_complex_complex_LacI_2x_part_P_Tac__protein_RNAP_forward__complex_complex_TetR_2x_part_P_Tet__protein_RNAP_forward__part_UTR1_forward_part_SrpR_forward_part_t16_forward_;
  r68: ordered_polymer_part_P_Tac_forward_complex_TetR_2x_part_P_Tet_forward__part_UTR1_forward_part_SrpR_forward_part_t16_forward_ + protein_RNAP => ordered_polymer_complex_part_P_Tac_protein_RNAP_forward__complex_TetR_2x_part_P_Tet_forward__part_UTR1_forward_part_SrpR_forward_part_t16_forward_; kb_P_Tac_leak_transcription_mm*ordered_polymer_part_P_Tac_forward_complex_TetR_2x_part_P_Tet_forward__part_UTR1_forward_part_SrpR_forward_part_t16_forward_*protein_RNAP;
  r68rev: ordered_polymer_complex_part_P_Tac_protein_RNAP_forward__complex_TetR_2x_part_P_Tet_forward__part_UTR1_forward_part_SrpR_forward_part_t16_forward_ => ordered_polymer_part_P_Tac_forward_complex_TetR_2x_part_P_Tet_forward__part_UTR1_forward_part_SrpR_forward_part_t16_forward_ + protein_RNAP; ku_P_Tac_leak_transcription_mm*ordered_polymer_complex_part_P_Tac_protein_RNAP_forward__complex_TetR_2x_part_P_Tet_forward__part_UTR1_forward_part_SrpR_forward_part_t16_forward_;
  r69: ordered_polymer_complex_part_P_Tac_protein_RNAP_forward__complex_TetR_2x_part_P_Tet_forward__part_UTR1_forward_part_SrpR_forward_part_t16_forward_ => ordered_polymer_part_P_Tac_forward_complex_TetR_2x_part_P_Tet_forward__part_UTR1_forward_part_SrpR_forward_part_t16_forward_ + rna_part_P_Tet_forward_part_UTR1_forward_part_SrpR_forward_part_t16_forward_ + protein_RNAP; ktx_P_Tac_leak_transcription_mm*ordered_polymer_complex_part_P_Tac_protein_RNAP_forward__complex_TetR_2x_part_P_Tet_forward__part_UTR1_forward_part_SrpR_forward_part_t16_forward_;
  r70: 2 LacI + ordered_polymer_part_P_Tac_forward_complex_TetR_2x_part_P_Tet_forward__part_UTR1_forward_part_SrpR_forward_part_t16_forward_ => ordered_polymer_complex_LacI_2x_part_P_Tac_forward__complex_TetR_2x_part_P_Tet_forward__part_UTR1_forward_part_SrpR_forward_part_t16_forward_; kb__one_step_cooperative_binding*LacI^2*ordered_polymer_part_P_Tac_forward_complex_TetR_2x_part_P_Tet_forward__part_UTR1_forward_part_SrpR_forward_part_t16_forward_;
  r70rev: ordered_polymer_complex_LacI_2x_part_P_Tac_forward__complex_TetR_2x_part_P_Tet_forward__part_UTR1_forward_part_SrpR_forward_part_t16_forward_ => 2 LacI + ordered_polymer_part_P_Tac_forward_complex_TetR_2x_part_P_Tet_forward__part_UTR1_forward_part_SrpR_forward_part_t16_forward_; ku__one_step_cooperative_binding*ordered_polymer_complex_LacI_2x_part_P_Tac_forward__complex_TetR_2x_part_P_Tet_forward__part_UTR1_forward_part_SrpR_forward_part_t16_forward_;
  r71: ordered_polymer_complex_LacI_2x_part_P_Tac_forward__complex_TetR_2x_part_P_Tet_forward__part_UTR1_forward_part_SrpR_forward_part_t16_forward_ + protein_RNAP => ordered_polymer_complex_complex_LacI_2x_part_P_Tac__protein_RNAP_forward__complex_TetR_2x_part_P_Tet_forward__part_UTR1_forward_part_SrpR_forward_part_t16_forward_; kb__transcription_mm*ordered_polymer_complex_LacI_2x_part_P_Tac_forward__complex_TetR_2x_part_P_Tet_forward__part_UTR1_forward_part_SrpR_forward_part_t16_forward_*protein_RNAP;
  r71rev: ordered_polymer_complex_complex_LacI_2x_part_P_Tac__protein_RNAP_forward__complex_TetR_2x_part_P_Tet_forward__part_UTR1_forward_part_SrpR_forward_part_t16_forward_ => ordered_polymer_complex_LacI_2x_part_P_Tac_forward__complex_TetR_2x_part_P_Tet_forward__part_UTR1_forward_part_SrpR_forward_part_t16_forward_ + protein_RNAP; ku__transcription_mm*ordered_polymer_complex_complex_LacI_2x_part_P_Tac__protein_RNAP_forward__complex_TetR_2x_part_P_Tet_forward__part_UTR1_forward_part_SrpR_forward_part_t16_forward_;
  r72: ordered_polymer_complex_complex_LacI_2x_part_P_Tac__protein_RNAP_forward__complex_TetR_2x_part_P_Tet_forward__part_UTR1_forward_part_SrpR_forward_part_t16_forward_ => ordered_polymer_complex_LacI_2x_part_P_Tac_forward__complex_TetR_2x_part_P_Tet_forward__part_UTR1_forward_part_SrpR_forward_part_t16_forward_ + rna_part_P_Tet_forward_part_UTR1_forward_part_SrpR_forward_part_t16_forward_ + protein_RNAP; ktx__transcription_mm*ordered_polymer_complex_complex_LacI_2x_part_P_Tac__protein_RNAP_forward__complex_TetR_2x_part_P_Tet_forward__part_UTR1_forward_part_SrpR_forward_part_t16_forward_;
  r73: dna_part_P_Tac_forward_part_P_Tet_forward_part_UTR1_forward_part_SrpR_forward_part_t16_forward_ + protein_RNAP => ordered_polymer_complex_part_P_Tac_protein_RNAP_forward__part_P_Tet_forward_part_UTR1_forward_part_SrpR_forward_part_t16_forward_; kb_P_Tac_leak_transcription_mm*dna_part_P_Tac_forward_part_P_Tet_forward_part_UTR1_forward_part_SrpR_forward_part_t16_forward_*protein_RNAP;
  r73rev: ordered_polymer_complex_part_P_Tac_protein_RNAP_forward__part_P_Tet_forward_part_UTR1_forward_part_SrpR_forward_part_t16_forward_ => dna_part_P_Tac_forward_part_P_Tet_forward_part_UTR1_forward_part_SrpR_forward_part_t16_forward_ + protein_RNAP; ku_P_Tac_leak_transcription_mm*ordered_polymer_complex_part_P_Tac_protein_RNAP_forward__part_P_Tet_forward_part_UTR1_forward_part_SrpR_forward_part_t16_forward_;
  r74: ordered_polymer_complex_part_P_Tac_protein_RNAP_forward__part_P_Tet_forward_part_UTR1_forward_part_SrpR_forward_part_t16_forward_ => dna_part_P_Tac_forward_part_P_Tet_forward_part_UTR1_forward_part_SrpR_forward_part_t16_forward_ + rna_part_P_Tet_forward_part_UTR1_forward_part_SrpR_forward_part_t16_forward_ + protein_RNAP; ktx_P_Tac_leak_transcription_mm*ordered_polymer_complex_part_P_Tac_protein_RNAP_forward__part_P_Tet_forward_part_UTR1_forward_part_SrpR_forward_part_t16_forward_;
  r75: 2 LacI + dna_part_P_Tac_forward_part_P_Tet_forward_part_UTR1_forward_part_SrpR_forward_part_t16_forward_ => ordered_polymer_complex_LacI_2x_part_P_Tac_forward__part_P_Tet_forward_part_UTR1_forward_part_SrpR_forward_part_t16_forward_; kb__one_step_cooperative_binding*LacI^2*dna_part_P_Tac_forward_part_P_Tet_forward_part_UTR1_forward_part_SrpR_forward_part_t16_forward_;
  r75rev: ordered_polymer_complex_LacI_2x_part_P_Tac_forward__part_P_Tet_forward_part_UTR1_forward_part_SrpR_forward_part_t16_forward_ => 2 LacI + dna_part_P_Tac_forward_part_P_Tet_forward_part_UTR1_forward_part_SrpR_forward_part_t16_forward_; ku__one_step_cooperative_binding*ordered_polymer_complex_LacI_2x_part_P_Tac_forward__part_P_Tet_forward_part_UTR1_forward_part_SrpR_forward_part_t16_forward_;
  r76: ordered_polymer_complex_LacI_2x_part_P_Tac_forward__part_P_Tet_forward_part_UTR1_forward_part_SrpR_forward_part_t16_forward_ + protein_RNAP => ordered_polymer_complex_complex_LacI_2x_part_P_Tac__protein_RNAP_forward__part_P_Tet_forward_part_UTR1_forward_part_SrpR_forward_part_t16_forward_; kb__transcription_mm*ordered_polymer_complex_LacI_2x_part_P_Tac_forward__part_P_Tet_forward_part_UTR1_forward_part_SrpR_forward_part_t16_forward_*protein_RNAP;
  r76rev: ordered_polymer_complex_complex_LacI_2x_part_P_Tac__protein_RNAP_forward__part_P_Tet_forward_part_UTR1_forward_part_SrpR_forward_part_t16_forward_ => ordered_polymer_complex_LacI_2x_part_P_Tac_forward__part_P_Tet_forward_part_UTR1_forward_part_SrpR_forward_part_t16_forward_ + protein_RNAP; ku__transcription_mm*ordered_polymer_complex_complex_LacI_2x_part_P_Tac__protein_RNAP_forward__part_P_Tet_forward_part_UTR1_forward_part_SrpR_forward_part_t16_forward_;
  r77: ordered_polymer_complex_complex_LacI_2x_part_P_Tac__protein_RNAP_forward__part_P_Tet_forward_part_UTR1_forward_part_SrpR_forward_part_t16_forward_ => ordered_polymer_complex_LacI_2x_part_P_Tac_forward__part_P_Tet_forward_part_UTR1_forward_part_SrpR_forward_part_t16_forward_ + rna_part_P_Tet_forward_part_UTR1_forward_part_SrpR_forward_part_t16_forward_ + protein_RNAP; ktx__transcription_mm*ordered_polymer_complex_complex_LacI_2x_part_P_Tac__protein_RNAP_forward__part_P_Tet_forward_part_UTR1_forward_part_SrpR_forward_part_t16_forward_;
  r78: dna_part_P_Tac_forward_part_P_Tet_forward_part_UTR1_forward_part_SrpR_forward_part_t16_forward_ + protein_RNAP => ordered_polymer_part_P_Tac_forward_complex_part_P_Tet_protein_RNAP_forward__part_UTR1_forward_part_SrpR_forward_part_t16_forward_; kb_P_Tet_leak_transcription_mm*dna_part_P_Tac_forward_part_P_Tet_forward_part_UTR1_forward_part_SrpR_forward_part_t16_forward_*protein_RNAP;
  r78rev: ordered_polymer_part_P_Tac_forward_complex_part_P_Tet_protein_RNAP_forward__part_UTR1_forward_part_SrpR_forward_part_t16_forward_ => dna_part_P_Tac_forward_part_P_Tet_forward_part_UTR1_forward_part_SrpR_forward_part_t16_forward_ + protein_RNAP; ku_P_Tet_leak_transcription_mm*ordered_polymer_part_P_Tac_forward_complex_part_P_Tet_protein_RNAP_forward__part_UTR1_forward_part_SrpR_forward_part_t16_forward_;
  r79: ordered_polymer_part_P_Tac_forward_complex_part_P_Tet_protein_RNAP_forward__part_UTR1_forward_part_SrpR_forward_part_t16_forward_ => dna_part_P_Tac_forward_part_P_Tet_forward_part_UTR1_forward_part_SrpR_forward_part_t16_forward_ + rna_part_UTR1_forward_part_SrpR_forward_part_t16_forward_ + protein_RNAP; ktx_P_Tet_leak_transcription_mm*ordered_polymer_part_P_Tac_forward_complex_part_P_Tet_protein_RNAP_forward__part_UTR1_forward_part_SrpR_forward_part_t16_forward_;
  r80: 2 TetR + dna_part_P_Tac_forward_part_P_Tet_forward_part_UTR1_forward_part_SrpR_forward_part_t16_forward_ => ordered_polymer_part_P_Tac_forward_complex_TetR_2x_part_P_Tet_forward__part_UTR1_forward_part_SrpR_forward_part_t16_forward_; kb__one_step_cooperative_binding*TetR^2*dna_part_P_Tac_forward_part_P_Tet_forward_part_UTR1_forward_part_SrpR_forward_part_t16_forward_;
  r80rev: ordered_polymer_part_P_Tac_forward_complex_TetR_2x_part_P_Tet_forward__part_UTR1_forward_part_SrpR_forward_part_t16_forward_ => 2 TetR + dna_part_P_Tac_forward_part_P_Tet_forward_part_UTR1_forward_part_SrpR_forward_part_t16_forward_; ku__one_step_cooperative_binding*ordered_polymer_part_P_Tac_forward_complex_TetR_2x_part_P_Tet_forward__part_UTR1_forward_part_SrpR_forward_part_t16_forward_;
  r81: ordered_polymer_part_P_Tac_forward_complex_TetR_2x_part_P_Tet_forward__part_UTR1_forward_part_SrpR_forward_part_t16_forward_ + protein_RNAP => ordered_polymer_part_P_Tac_forward_complex_complex_TetR_2x_part_P_Tet__protein_RNAP_forward__part_UTR1_forward_part_SrpR_forward_part_t16_forward_; kb__transcription_mm*ordered_polymer_part_P_Tac_forward_complex_TetR_2x_part_P_Tet_forward__part_UTR1_forward_part_SrpR_forward_part_t16_forward_*protein_RNAP;
  r81rev: ordered_polymer_part_P_Tac_forward_complex_complex_TetR_2x_part_P_Tet__protein_RNAP_forward__part_UTR1_forward_part_SrpR_forward_part_t16_forward_ => ordered_polymer_part_P_Tac_forward_complex_TetR_2x_part_P_Tet_forward__part_UTR1_forward_part_SrpR_forward_part_t16_forward_ + protein_RNAP; ku__transcription_mm*ordered_polymer_part_P_Tac_forward_complex_complex_TetR_2x_part_P_Tet__protein_RNAP_forward__part_UTR1_forward_part_SrpR_forward_part_t16_forward_;
  r82: ordered_polymer_part_P_Tac_forward_complex_complex_TetR_2x_part_P_Tet__protein_RNAP_forward__part_UTR1_forward_part_SrpR_forward_part_t16_forward_ => ordered_polymer_part_P_Tac_forward_complex_TetR_2x_part_P_Tet_forward__part_UTR1_forward_part_SrpR_forward_part_t16_forward_ + rna_part_UTR1_forward_part_SrpR_forward_part_t16_forward_ + protein_RNAP; ktx__transcription_mm*ordered_polymer_part_P_Tac_forward_complex_complex_TetR_2x_part_P_Tet__protein_RNAP_forward__part_UTR1_forward_part_SrpR_forward_part_t16_forward_;
  r83: ordered_polymer_complex_complex_part_P_HlyIIR_protein_HlyIIR_degtagged_2x__protein_RNAP_forward__part_P_AmeR_forward_part_UTR1_forward_part_BetI_forward_part_t16_forward_ + protein_RNAP => ordered_polymer_complex_complex_part_P_HlyIIR_protein_HlyIIR_degtagged_2x__protein_RNAP_forward__complex_part_P_AmeR_protein_RNAP_forward__part_UTR1_forward_part_BetI_forward_part_t16_forward_; kb_P_AmeR_leak_transcription_mm*ordered_polymer_complex_complex_part_P_HlyIIR_protein_HlyIIR_degtagged_2x__protein_RNAP_forward__part_P_AmeR_forward_part_UTR1_forward_part_BetI_forward_part_t16_forward_*protein_RNAP;
  r83rev: ordered_polymer_complex_complex_part_P_HlyIIR_protein_HlyIIR_degtagged_2x__protein_RNAP_forward__complex_part_P_AmeR_protein_RNAP_forward__part_UTR1_forward_part_BetI_forward_part_t16_forward_ => ordered_polymer_complex_complex_part_P_HlyIIR_protein_HlyIIR_degtagged_2x__protein_RNAP_forward__part_P_AmeR_forward_part_UTR1_forward_part_BetI_forward_part_t16_forward_ + protein_RNAP; ku_P_AmeR_leak_transcription_mm*ordered_polymer_complex_complex_part_P_HlyIIR_protein_HlyIIR_degtagged_2x__protein_RNAP_forward__complex_part_P_AmeR_protein_RNAP_forward__part_UTR1_forward_part_BetI_forward_part_t16_forward_;
  r84: ordered_polymer_complex_complex_part_P_HlyIIR_protein_HlyIIR_degtagged_2x__protein_RNAP_forward__complex_part_P_AmeR_protein_RNAP_forward__part_UTR1_forward_part_BetI_forward_part_t16_forward_ => ordered_polymer_complex_complex_part_P_HlyIIR_protein_HlyIIR_degtagged_2x__protein_RNAP_forward__part_P_AmeR_forward_part_UTR1_forward_part_BetI_forward_part_t16_forward_ + rna_part_UTR1_forward_part_BetI_forward_part_t16_forward_ + protein_RNAP; ktx_P_AmeR_leak_transcription_mm*ordered_polymer_complex_complex_part_P_HlyIIR_protein_HlyIIR_degtagged_2x__protein_RNAP_forward__complex_part_P_AmeR_protein_RNAP_forward__part_UTR1_forward_part_BetI_forward_part_t16_forward_;
  r85: 2 protein_AmeR_degtagged + ordered_polymer_complex_complex_part_P_HlyIIR_protein_HlyIIR_degtagged_2x__protein_RNAP_forward__part_P_AmeR_forward_part_UTR1_forward_part_BetI_forward_part_t16_forward_ => ordered_polymer_complex_complex_part_P_HlyIIR_protein_HlyIIR_degtagged_2x__protein_RNAP_forward__complex_part_P_AmeR_protein_AmeR_degtagged_2x_forward__part_UTR1_forward_part_BetI_forward_part_t16_forward_; kb__one_step_cooperative_binding*protein_AmeR_degtagged^2*ordered_polymer_complex_complex_part_P_HlyIIR_protein_HlyIIR_degtagged_2x__protein_RNAP_forward__part_P_AmeR_forward_part_UTR1_forward_part_BetI_forward_part_t16_forward_;
  r85rev: ordered_polymer_complex_complex_part_P_HlyIIR_protein_HlyIIR_degtagged_2x__protein_RNAP_forward__complex_part_P_AmeR_protein_AmeR_degtagged_2x_forward__part_UTR1_forward_part_BetI_forward_part_t16_forward_ => 2 protein_AmeR_degtagged + ordered_polymer_complex_complex_part_P_HlyIIR_protein_HlyIIR_degtagged_2x__protein_RNAP_forward__part_P_AmeR_forward_part_UTR1_forward_part_BetI_forward_part_t16_forward_; ku__one_step_cooperative_binding*ordered_polymer_complex_complex_part_P_HlyIIR_protein_HlyIIR_degtagged_2x__protein_RNAP_forward__complex_part_P_AmeR_protein_AmeR_degtagged_2x_forward__part_UTR1_forward_part_BetI_forward_part_t16_forward_;
  r86: ordered_polymer_complex_complex_part_P_HlyIIR_protein_HlyIIR_degtagged_2x__protein_RNAP_forward__complex_part_P_AmeR_protein_AmeR_degtagged_2x_forward__part_UTR1_forward_part_BetI_forward_part_t16_forward_ + protein_RNAP => ordered_polymer_complex_complex_part_P_HlyIIR_protein_HlyIIR_degtagged_2x__protein_RNAP_forward__complex_complex_part_P_AmeR_protein_AmeR_degtagged_2x__protein_RNAP_forward__part_UTR1_forward_part_BetI_forward_part_t16_forward_; kb__transcription_mm*ordered_polymer_complex_complex_part_P_HlyIIR_protein_HlyIIR_degtagged_2x__protein_RNAP_forward__complex_part_P_AmeR_protein_AmeR_degtagged_2x_forward__part_UTR1_forward_part_BetI_forward_part_t16_forward_*protein_RNAP;
  r86rev: ordered_polymer_complex_complex_part_P_HlyIIR_protein_HlyIIR_degtagged_2x__protein_RNAP_forward__complex_complex_part_P_AmeR_protein_AmeR_degtagged_2x__protein_RNAP_forward__part_UTR1_forward_part_BetI_forward_part_t16_forward_ => ordered_polymer_complex_complex_part_P_HlyIIR_protein_HlyIIR_degtagged_2x__protein_RNAP_forward__complex_part_P_AmeR_protein_AmeR_degtagged_2x_forward__part_UTR1_forward_part_BetI_forward_part_t16_forward_ + protein_RNAP; ku__transcription_mm*ordered_polymer_complex_complex_part_P_HlyIIR_protein_HlyIIR_degtagged_2x__protein_RNAP_forward__complex_complex_part_P_AmeR_protein_AmeR_degtagged_2x__protein_RNAP_forward__part_UTR1_forward_part_BetI_forward_part_t16_forward_;
  r87: ordered_polymer_complex_complex_part_P_HlyIIR_protein_HlyIIR_degtagged_2x__protein_RNAP_forward__complex_complex_part_P_AmeR_protein_AmeR_degtagged_2x__protein_RNAP_forward__part_UTR1_forward_part_BetI_forward_part_t16_forward_ => ordered_polymer_complex_complex_part_P_HlyIIR_protein_HlyIIR_degtagged_2x__protein_RNAP_forward__complex_part_P_AmeR_protein_AmeR_degtagged_2x_forward__part_UTR1_forward_part_BetI_forward_part_t16_forward_ + rna_part_UTR1_forward_part_BetI_forward_part_t16_forward_ + protein_RNAP; ktx__transcription_mm*ordered_polymer_complex_complex_part_P_HlyIIR_protein_HlyIIR_degtagged_2x__protein_RNAP_forward__complex_complex_part_P_AmeR_protein_AmeR_degtagged_2x__protein_RNAP_forward__part_UTR1_forward_part_BetI_forward_part_t16_forward_;
  r88: ordered_polymer_complex_part_P_HlyIIR_protein_HlyIIR_degtagged_2x_forward__part_P_AmeR_forward_part_UTR1_forward_part_BetI_forward_part_t16_forward_ + protein_RNAP => ordered_polymer_complex_part_P_HlyIIR_protein_HlyIIR_degtagged_2x_forward__complex_part_P_AmeR_protein_RNAP_forward__part_UTR1_forward_part_BetI_forward_part_t16_forward_; kb_P_AmeR_leak_transcription_mm*ordered_polymer_complex_part_P_HlyIIR_protein_HlyIIR_degtagged_2x_forward__part_P_AmeR_forward_part_UTR1_forward_part_BetI_forward_part_t16_forward_*protein_RNAP;
  r88rev: ordered_polymer_complex_part_P_HlyIIR_protein_HlyIIR_degtagged_2x_forward__complex_part_P_AmeR_protein_RNAP_forward__part_UTR1_forward_part_BetI_forward_part_t16_forward_ => ordered_polymer_complex_part_P_HlyIIR_protein_HlyIIR_degtagged_2x_forward__part_P_AmeR_forward_part_UTR1_forward_part_BetI_forward_part_t16_forward_ + protein_RNAP; ku_P_AmeR_leak_transcription_mm*ordered_polymer_complex_part_P_HlyIIR_protein_HlyIIR_degtagged_2x_forward__complex_part_P_AmeR_protein_RNAP_forward__part_UTR1_forward_part_BetI_forward_part_t16_forward_;
  r89: ordered_polymer_complex_part_P_HlyIIR_protein_HlyIIR_degtagged_2x_forward__complex_part_P_AmeR_protein_RNAP_forward__part_UTR1_forward_part_BetI_forward_part_t16_forward_ => ordered_polymer_complex_part_P_HlyIIR_protein_HlyIIR_degtagged_2x_forward__part_P_AmeR_forward_part_UTR1_forward_part_BetI_forward_part_t16_forward_ + rna_part_UTR1_forward_part_BetI_forward_part_t16_forward_ + protein_RNAP; ktx_P_AmeR_leak_transcription_mm*ordered_polymer_complex_part_P_HlyIIR_protein_HlyIIR_degtagged_2x_forward__complex_part_P_AmeR_protein_RNAP_forward__part_UTR1_forward_part_BetI_forward_part_t16_forward_;
  r90: 2 protein_AmeR_degtagged + ordered_polymer_complex_part_P_HlyIIR_protein_HlyIIR_degtagged_2x_forward__part_P_AmeR_forward_part_UTR1_forward_part_BetI_forward_part_t16_forward_ => ordered_polymer_complex_part_P_HlyIIR_protein_HlyIIR_degtagged_2x_forward__complex_part_P_AmeR_protein_AmeR_degtagged_2x_forward__part_UTR1_forward_part_BetI_forward_part_t16_forward_; kb__one_step_cooperative_binding*protein_AmeR_degtagged^2*ordered_polymer_complex_part_P_HlyIIR_protein_HlyIIR_degtagged_2x_forward__part_P_AmeR_forward_part_UTR1_forward_part_BetI_forward_part_t16_forward_;
  r90rev: ordered_polymer_complex_part_P_HlyIIR_protein_HlyIIR_degtagged_2x_forward__complex_part_P_AmeR_protein_AmeR_degtagged_2x_forward__part_UTR1_forward_part_BetI_forward_part_t16_forward_ => 2 protein_AmeR_degtagged + ordered_polymer_complex_part_P_HlyIIR_protein_HlyIIR_degtagged_2x_forward__part_P_AmeR_forward_part_UTR1_forward_part_BetI_forward_part_t16_forward_; ku__one_step_cooperative_binding*ordered_polymer_complex_part_P_HlyIIR_protein_HlyIIR_degtagged_2x_forward__complex_part_P_AmeR_protein_AmeR_degtagged_2x_forward__part_UTR1_forward_part_BetI_forward_part_t16_forward_;
  r91: ordered_polymer_complex_part_P_HlyIIR_protein_HlyIIR_degtagged_2x_forward__complex_part_P_AmeR_protein_AmeR_degtagged_2x_forward__part_UTR1_forward_part_BetI_forward_part_t16_forward_ + protein_RNAP => ordered_polymer_complex_part_P_HlyIIR_protein_HlyIIR_degtagged_2x_forward__complex_complex_part_P_AmeR_protein_AmeR_degtagged_2x__protein_RNAP_forward__part_UTR1_forward_part_BetI_forward_part_t16_forward_; kb__transcription_mm*ordered_polymer_complex_part_P_HlyIIR_protein_HlyIIR_degtagged_2x_forward__complex_part_P_AmeR_protein_AmeR_degtagged_2x_forward__part_UTR1_forward_part_BetI_forward_part_t16_forward_*protein_RNAP;
  r91rev: ordered_polymer_complex_part_P_HlyIIR_protein_HlyIIR_degtagged_2x_forward__complex_complex_part_P_AmeR_protein_AmeR_degtagged_2x__protein_RNAP_forward__part_UTR1_forward_part_BetI_forward_part_t16_forward_ => ordered_polymer_complex_part_P_HlyIIR_protein_HlyIIR_degtagged_2x_forward__complex_part_P_AmeR_protein_AmeR_degtagged_2x_forward__part_UTR1_forward_part_BetI_forward_part_t16_forward_ + protein_RNAP; ku__transcription_mm*ordered_polymer_complex_part_P_HlyIIR_protein_HlyIIR_degtagged_2x_forward__complex_complex_part_P_AmeR_protein_AmeR_degtagged_2x__protein_RNAP_forward__part_UTR1_forward_part_BetI_forward_part_t16_forward_;
  r92: ordered_polymer_complex_part_P_HlyIIR_protein_HlyIIR_degtagged_2x_forward__complex_complex_part_P_AmeR_protein_AmeR_degtagged_2x__protein_RNAP_forward__part_UTR1_forward_part_BetI_forward_part_t16_forward_ => ordered_polymer_complex_part_P_HlyIIR_protein_HlyIIR_degtagged_2x_forward__complex_part_P_AmeR_protein_AmeR_degtagged_2x_forward__part_UTR1_forward_part_BetI_forward_part_t16_forward_ + rna_part_UTR1_forward_part_BetI_forward_part_t16_forward_ + protein_RNAP; ktx__transcription_mm*ordered_polymer_complex_part_P_HlyIIR_protein_HlyIIR_degtagged_2x_forward__complex_complex_part_P_AmeR_protein_AmeR_degtagged_2x__protein_RNAP_forward__part_UTR1_forward_part_BetI_forward_part_t16_forward_;
  r93: ordered_polymer_complex_part_P_HlyIIR_protein_RNAP_forward__part_P_AmeR_forward_part_UTR1_forward_part_BetI_forward_part_t16_forward_ + protein_RNAP => ordered_polymer_complex_part_P_HlyIIR_protein_RNAP_forward__complex_part_P_AmeR_protein_RNAP_forward__part_UTR1_forward_part_BetI_forward_part_t16_forward_; kb_P_AmeR_leak_transcription_mm*ordered_polymer_complex_part_P_HlyIIR_protein_RNAP_forward__part_P_AmeR_forward_part_UTR1_forward_part_BetI_forward_part_t16_forward_*protein_RNAP;
  r93rev: ordered_polymer_complex_part_P_HlyIIR_protein_RNAP_forward__complex_part_P_AmeR_protein_RNAP_forward__part_UTR1_forward_part_BetI_forward_part_t16_forward_ => ordered_polymer_complex_part_P_HlyIIR_protein_RNAP_forward__part_P_AmeR_forward_part_UTR1_forward_part_BetI_forward_part_t16_forward_ + protein_RNAP; ku_P_AmeR_leak_transcription_mm*ordered_polymer_complex_part_P_HlyIIR_protein_RNAP_forward__complex_part_P_AmeR_protein_RNAP_forward__part_UTR1_forward_part_BetI_forward_part_t16_forward_;
  r94: ordered_polymer_complex_part_P_HlyIIR_protein_RNAP_forward__complex_part_P_AmeR_protein_RNAP_forward__part_UTR1_forward_part_BetI_forward_part_t16_forward_ => ordered_polymer_complex_part_P_HlyIIR_protein_RNAP_forward__part_P_AmeR_forward_part_UTR1_forward_part_BetI_forward_part_t16_forward_ + rna_part_UTR1_forward_part_BetI_forward_part_t16_forward_ + protein_RNAP; ktx_P_AmeR_leak_transcription_mm*ordered_polymer_complex_part_P_HlyIIR_protein_RNAP_forward__complex_part_P_AmeR_protein_RNAP_forward__part_UTR1_forward_part_BetI_forward_part_t16_forward_;
  r95: 2 protein_AmeR_degtagged + ordered_polymer_complex_part_P_HlyIIR_protein_RNAP_forward__part_P_AmeR_forward_part_UTR1_forward_part_BetI_forward_part_t16_forward_ => ordered_polymer_complex_part_P_HlyIIR_protein_RNAP_forward__complex_part_P_AmeR_protein_AmeR_degtagged_2x_forward__part_UTR1_forward_part_BetI_forward_part_t16_forward_; kb__one_step_cooperative_binding*protein_AmeR_degtagged^2*ordered_polymer_complex_part_P_HlyIIR_protein_RNAP_forward__part_P_AmeR_forward_part_UTR1_forward_part_BetI_forward_part_t16_forward_;
  r95rev: ordered_polymer_complex_part_P_HlyIIR_protein_RNAP_forward__complex_part_P_AmeR_protein_AmeR_degtagged_2x_forward__part_UTR1_forward_part_BetI_forward_part_t16_forward_ => 2 protein_AmeR_degtagged + ordered_polymer_complex_part_P_HlyIIR_protein_RNAP_forward__part_P_AmeR_forward_part_UTR1_forward_part_BetI_forward_part_t16_forward_; ku__one_step_cooperative_binding*ordered_polymer_complex_part_P_HlyIIR_protein_RNAP_forward__complex_part_P_AmeR_protein_AmeR_degtagged_2x_forward__part_UTR1_forward_part_BetI_forward_part_t16_forward_;
  r96: ordered_polymer_complex_part_P_HlyIIR_protein_RNAP_forward__complex_part_P_AmeR_protein_AmeR_degtagged_2x_forward__part_UTR1_forward_part_BetI_forward_part_t16_forward_ + protein_RNAP => ordered_polymer_complex_part_P_HlyIIR_protein_RNAP_forward__complex_complex_part_P_AmeR_protein_AmeR_degtagged_2x__protein_RNAP_forward__part_UTR1_forward_part_BetI_forward_part_t16_forward_; kb__transcription_mm*ordered_polymer_complex_part_P_HlyIIR_protein_RNAP_forward__complex_part_P_AmeR_protein_AmeR_degtagged_2x_forward__part_UTR1_forward_part_BetI_forward_part_t16_forward_*protein_RNAP;
  r96rev: ordered_polymer_complex_part_P_HlyIIR_protein_RNAP_forward__complex_complex_part_P_AmeR_protein_AmeR_degtagged_2x__protein_RNAP_forward__part_UTR1_forward_part_BetI_forward_part_t16_forward_ => ordered_polymer_complex_part_P_HlyIIR_protein_RNAP_forward__complex_part_P_AmeR_protein_AmeR_degtagged_2x_forward__part_UTR1_forward_part_BetI_forward_part_t16_forward_ + protein_RNAP; ku__transcription_mm*ordered_polymer_complex_part_P_HlyIIR_protein_RNAP_forward__complex_complex_part_P_AmeR_protein_AmeR_degtagged_2x__protein_RNAP_forward__part_UTR1_forward_part_BetI_forward_part_t16_forward_;
  r97: ordered_polymer_complex_part_P_HlyIIR_protein_RNAP_forward__complex_complex_part_P_AmeR_protein_AmeR_degtagged_2x__protein_RNAP_forward__part_UTR1_forward_part_BetI_forward_part_t16_forward_ => ordered_polymer_complex_part_P_HlyIIR_protein_RNAP_forward__complex_part_P_AmeR_protein_AmeR_degtagged_2x_forward__part_UTR1_forward_part_BetI_forward_part_t16_forward_ + rna_part_UTR1_forward_part_BetI_forward_part_t16_forward_ + protein_RNAP; ktx__transcription_mm*ordered_polymer_complex_part_P_HlyIIR_protein_RNAP_forward__complex_complex_part_P_AmeR_protein_AmeR_degtagged_2x__protein_RNAP_forward__part_UTR1_forward_part_BetI_forward_part_t16_forward_;
  r98: ordered_polymer_part_P_HlyIIR_forward_complex_part_P_AmeR_protein_AmeR_degtagged_2x_forward__part_UTR1_forward_part_BetI_forward_part_t16_forward_ + protein_RNAP => ordered_polymer_complex_part_P_HlyIIR_protein_RNAP_forward__complex_part_P_AmeR_protein_AmeR_degtagged_2x_forward__part_UTR1_forward_part_BetI_forward_part_t16_forward_; kb_P_HlyIIR_leak_transcription_mm*ordered_polymer_part_P_HlyIIR_forward_complex_part_P_AmeR_protein_AmeR_degtagged_2x_forward__part_UTR1_forward_part_BetI_forward_part_t16_forward_*protein_RNAP;
  r98rev: ordered_polymer_complex_part_P_HlyIIR_protein_RNAP_forward__complex_part_P_AmeR_protein_AmeR_degtagged_2x_forward__part_UTR1_forward_part_BetI_forward_part_t16_forward_ => ordered_polymer_part_P_HlyIIR_forward_complex_part_P_AmeR_protein_AmeR_degtagged_2x_forward__part_UTR1_forward_part_BetI_forward_part_t16_forward_ + protein_RNAP; ku_P_HlyIIR_leak_transcription_mm*ordered_polymer_complex_part_P_HlyIIR_protein_RNAP_forward__complex_part_P_AmeR_protein_AmeR_degtagged_2x_forward__part_UTR1_forward_part_BetI_forward_part_t16_forward_;
  r99: ordered_polymer_complex_part_P_HlyIIR_protein_RNAP_forward__complex_part_P_AmeR_protein_AmeR_degtagged_2x_forward__part_UTR1_forward_part_BetI_forward_part_t16_forward_ => ordered_polymer_part_P_HlyIIR_forward_complex_part_P_AmeR_protein_AmeR_degtagged_2x_forward__part_UTR1_forward_part_BetI_forward_part_t16_forward_ + rna_part_P_AmeR_forward_part_UTR1_forward_part_BetI_forward_part_t16_forward_ + protein_RNAP; ktx_P_HlyIIR_leak_transcription_mm*ordered_polymer_complex_part_P_HlyIIR_protein_RNAP_forward__complex_part_P_AmeR_protein_AmeR_degtagged_2x_forward__part_UTR1_forward_part_BetI_forward_part_t16_forward_;
  r100: 2 protein_HlyIIR_degtagged + ordered_polymer_part_P_HlyIIR_forward_complex_part_P_AmeR_protein_AmeR_degtagged_2x_forward__part_UTR1_forward_part_BetI_forward_part_t16_forward_ => ordered_polymer_complex_part_P_HlyIIR_protein_HlyIIR_degtagged_2x_forward__complex_part_P_AmeR_protein_AmeR_degtagged_2x_forward__part_UTR1_forward_part_BetI_forward_part_t16_forward_; kb__one_step_cooperative_binding*protein_HlyIIR_degtagged^2*ordered_polymer_part_P_HlyIIR_forward_complex_part_P_AmeR_protein_AmeR_degtagged_2x_forward__part_UTR1_forward_part_BetI_forward_part_t16_forward_;
  r100rev: ordered_polymer_complex_part_P_HlyIIR_protein_HlyIIR_degtagged_2x_forward__complex_part_P_AmeR_protein_AmeR_degtagged_2x_forward__part_UTR1_forward_part_BetI_forward_part_t16_forward_ => 2 protein_HlyIIR_degtagged + ordered_polymer_part_P_HlyIIR_forward_complex_part_P_AmeR_protein_AmeR_degtagged_2x_forward__part_UTR1_forward_part_BetI_forward_part_t16_forward_; ku__one_step_cooperative_binding*ordered_polymer_complex_part_P_HlyIIR_protein_HlyIIR_degtagged_2x_forward__complex_part_P_AmeR_protein_AmeR_degtagged_2x_forward__part_UTR1_forward_part_BetI_forward_part_t16_forward_;
  r101: ordered_polymer_complex_part_P_HlyIIR_protein_HlyIIR_degtagged_2x_forward__complex_part_P_AmeR_protein_AmeR_degtagged_2x_forward__part_UTR1_forward_part_BetI_forward_part_t16_forward_ + protein_RNAP => ordered_polymer_complex_complex_part_P_HlyIIR_protein_HlyIIR_degtagged_2x__protein_RNAP_forward__complex_part_P_AmeR_protein_AmeR_degtagged_2x_forward__part_UTR1_forward_part_BetI_forward_part_t16_forward_; kb__transcription_mm*ordered_polymer_complex_part_P_HlyIIR_protein_HlyIIR_degtagged_2x_forward__complex_part_P_AmeR_protein_AmeR_degtagged_2x_forward__part_UTR1_forward_part_BetI_forward_part_t16_forward_*protein_RNAP;
  r101rev: ordered_polymer_complex_complex_part_P_HlyIIR_protein_HlyIIR_degtagged_2x__protein_RNAP_forward__complex_part_P_AmeR_protein_AmeR_degtagged_2x_forward__part_UTR1_forward_part_BetI_forward_part_t16_forward_ => ordered_polymer_complex_part_P_HlyIIR_protein_HlyIIR_degtagged_2x_forward__complex_part_P_AmeR_protein_AmeR_degtagged_2x_forward__part_UTR1_forward_part_BetI_forward_part_t16_forward_ + protein_RNAP; ku__transcription_mm*ordered_polymer_complex_complex_part_P_HlyIIR_protein_HlyIIR_degtagged_2x__protein_RNAP_forward__complex_part_P_AmeR_protein_AmeR_degtagged_2x_forward__part_UTR1_forward_part_BetI_forward_part_t16_forward_;
  r102: ordered_polymer_complex_complex_part_P_HlyIIR_protein_HlyIIR_degtagged_2x__protein_RNAP_forward__complex_part_P_AmeR_protein_AmeR_degtagged_2x_forward__part_UTR1_forward_part_BetI_forward_part_t16_forward_ => ordered_polymer_complex_part_P_HlyIIR_protein_HlyIIR_degtagged_2x_forward__complex_part_P_AmeR_protein_AmeR_degtagged_2x_forward__part_UTR1_forward_part_BetI_forward_part_t16_forward_ + rna_part_P_AmeR_forward_part_UTR1_forward_part_BetI_forward_part_t16_forward_ + protein_RNAP; ktx__transcription_mm*ordered_polymer_complex_complex_part_P_HlyIIR_protein_HlyIIR_degtagged_2x__protein_RNAP_forward__complex_part_P_AmeR_protein_AmeR_degtagged_2x_forward__part_UTR1_forward_part_BetI_forward_part_t16_forward_;
  r103: ordered_polymer_part_P_HlyIIR_forward_complex_part_P_AmeR_protein_RNAP_forward__part_UTR1_forward_part_BetI_forward_part_t16_forward_ + protein_RNAP => ordered_polymer_complex_part_P_HlyIIR_protein_RNAP_forward__complex_part_P_AmeR_protein_RNAP_forward__part_UTR1_forward_part_BetI_forward_part_t16_forward_; kb_P_HlyIIR_leak_transcription_mm*ordered_polymer_part_P_HlyIIR_forward_complex_part_P_AmeR_protein_RNAP_forward__part_UTR1_forward_part_BetI_forward_part_t16_forward_*protein_RNAP;
  r103rev: ordered_polymer_complex_part_P_HlyIIR_protein_RNAP_forward__complex_part_P_AmeR_protein_RNAP_forward__part_UTR1_forward_part_BetI_forward_part_t16_forward_ => ordered_polymer_part_P_HlyIIR_forward_complex_part_P_AmeR_protein_RNAP_forward__part_UTR1_forward_part_BetI_forward_part_t16_forward_ + protein_RNAP; ku_P_HlyIIR_leak_transcription_mm*ordered_polymer_complex_part_P_HlyIIR_protein_RNAP_forward__complex_part_P_AmeR_protein_RNAP_forward__part_UTR1_forward_part_BetI_forward_part_t16_forward_;
  r104: ordered_polymer_complex_part_P_HlyIIR_protein_RNAP_forward__complex_part_P_AmeR_protein_RNAP_forward__part_UTR1_forward_part_BetI_forward_part_t16_forward_ => ordered_polymer_part_P_HlyIIR_forward_complex_part_P_AmeR_protein_RNAP_forward__part_UTR1_forward_part_BetI_forward_part_t16_forward_ + rna_part_P_AmeR_forward_part_UTR1_forward_part_BetI_forward_part_t16_forward_ + protein_RNAP; ktx_P_HlyIIR_leak_transcription_mm*ordered_polymer_complex_part_P_HlyIIR_protein_RNAP_forward__complex_part_P_AmeR_protein_RNAP_forward__part_UTR1_forward_part_BetI_forward_part_t16_forward_;
  r105: 2 protein_HlyIIR_degtagged + ordered_polymer_part_P_HlyIIR_forward_complex_part_P_AmeR_protein_RNAP_forward__part_UTR1_forward_part_BetI_forward_part_t16_forward_ => ordered_polymer_complex_part_P_HlyIIR_protein_HlyIIR_degtagged_2x_forward__complex_part_P_AmeR_protein_RNAP_forward__part_UTR1_forward_part_BetI_forward_part_t16_forward_; kb__one_step_cooperative_binding*protein_HlyIIR_degtagged^2*ordered_polymer_part_P_HlyIIR_forward_complex_part_P_AmeR_protein_RNAP_forward__part_UTR1_forward_part_BetI_forward_part_t16_forward_;
  r105rev: ordered_polymer_complex_part_P_HlyIIR_protein_HlyIIR_degtagged_2x_forward__complex_part_P_AmeR_protein_RNAP_forward__part_UTR1_forward_part_BetI_forward_part_t16_forward_ => 2 protein_HlyIIR_degtagged + ordered_polymer_part_P_HlyIIR_forward_complex_part_P_AmeR_protein_RNAP_forward__part_UTR1_forward_part_BetI_forward_part_t16_forward_; ku__one_step_cooperative_binding*ordered_polymer_complex_part_P_HlyIIR_protein_HlyIIR_degtagged_2x_forward__complex_part_P_AmeR_protein_RNAP_forward__part_UTR1_forward_part_BetI_forward_part_t16_forward_;
  r106: ordered_polymer_complex_part_P_HlyIIR_protein_HlyIIR_degtagged_2x_forward__complex_part_P_AmeR_protein_RNAP_forward__part_UTR1_forward_part_BetI_forward_part_t16_forward_ + protein_RNAP => ordered_polymer_complex_complex_part_P_HlyIIR_protein_HlyIIR_degtagged_2x__protein_RNAP_forward__complex_part_P_AmeR_protein_RNAP_forward__part_UTR1_forward_part_BetI_forward_part_t16_forward_; kb__transcription_mm*ordered_polymer_complex_part_P_HlyIIR_protein_HlyIIR_degtagged_2x_forward__complex_part_P_AmeR_protein_RNAP_forward__part_UTR1_forward_part_BetI_forward_part_t16_forward_*protein_RNAP;
  r106rev: ordered_polymer_complex_complex_part_P_HlyIIR_protein_HlyIIR_degtagged_2x__protein_RNAP_forward__complex_part_P_AmeR_protein_RNAP_forward__part_UTR1_forward_part_BetI_forward_part_t16_forward_ => ordered_polymer_complex_part_P_HlyIIR_protein_HlyIIR_degtagged_2x_forward__complex_part_P_AmeR_protein_RNAP_forward__part_UTR1_forward_part_BetI_forward_part_t16_forward_ + protein_RNAP; ku__transcription_mm*ordered_polymer_complex_complex_part_P_HlyIIR_protein_HlyIIR_degtagged_2x__protein_RNAP_forward__complex_part_P_AmeR_protein_RNAP_forward__part_UTR1_forward_part_BetI_forward_part_t16_forward_;
  r107: ordered_polymer_complex_complex_part_P_HlyIIR_protein_HlyIIR_degtagged_2x__protein_RNAP_forward__complex_part_P_AmeR_protein_RNAP_forward__part_UTR1_forward_part_BetI_forward_part_t16_forward_ => ordered_polymer_complex_part_P_HlyIIR_protein_HlyIIR_degtagged_2x_forward__complex_part_P_AmeR_protein_RNAP_forward__part_UTR1_forward_part_BetI_forward_part_t16_forward_ + rna_part_P_AmeR_forward_part_UTR1_forward_part_BetI_forward_part_t16_forward_ + protein_RNAP; ktx__transcription_mm*ordered_polymer_complex_complex_part_P_HlyIIR_protein_HlyIIR_degtagged_2x__protein_RNAP_forward__complex_part_P_AmeR_protein_RNAP_forward__part_UTR1_forward_part_BetI_forward_part_t16_forward_;
  r108: ordered_polymer_part_P_HlyIIR_forward_complex_complex_part_P_AmeR_protein_AmeR_degtagged_2x__protein_RNAP_forward__part_UTR1_forward_part_BetI_forward_part_t16_forward_ + protein_RNAP => ordered_polymer_complex_part_P_HlyIIR_protein_RNAP_forward__complex_complex_part_P_AmeR_protein_AmeR_degtagged_2x__protein_RNAP_forward__part_UTR1_forward_part_BetI_forward_part_t16_forward_; kb_P_HlyIIR_leak_transcription_mm*ordered_polymer_part_P_HlyIIR_forward_complex_complex_part_P_AmeR_protein_AmeR_degtagged_2x__protein_RNAP_forward__part_UTR1_forward_part_BetI_forward_part_t16_forward_*protein_RNAP;
  r108rev: ordered_polymer_complex_part_P_HlyIIR_protein_RNAP_forward__complex_complex_part_P_AmeR_protein_AmeR_degtagged_2x__protein_RNAP_forward__part_UTR1_forward_part_BetI_forward_part_t16_forward_ => ordered_polymer_part_P_HlyIIR_forward_complex_complex_part_P_AmeR_protein_AmeR_degtagged_2x__protein_RNAP_forward__part_UTR1_forward_part_BetI_forward_part_t16_forward_ + protein_RNAP; ku_P_HlyIIR_leak_transcription_mm*ordered_polymer_complex_part_P_HlyIIR_protein_RNAP_forward__complex_complex_part_P_AmeR_protein_AmeR_degtagged_2x__protein_RNAP_forward__part_UTR1_forward_part_BetI_forward_part_t16_forward_;
  r109: ordered_polymer_complex_part_P_HlyIIR_protein_RNAP_forward__complex_complex_part_P_AmeR_protein_AmeR_degtagged_2x__protein_RNAP_forward__part_UTR1_forward_part_BetI_forward_part_t16_forward_ => ordered_polymer_part_P_HlyIIR_forward_complex_complex_part_P_AmeR_protein_AmeR_degtagged_2x__protein_RNAP_forward__part_UTR1_forward_part_BetI_forward_part_t16_forward_ + rna_part_P_AmeR_forward_part_UTR1_forward_part_BetI_forward_part_t16_forward_ + protein_RNAP; ktx_P_HlyIIR_leak_transcription_mm*ordered_polymer_complex_part_P_HlyIIR_protein_RNAP_forward__complex_complex_part_P_AmeR_protein_AmeR_degtagged_2x__protein_RNAP_forward__part_UTR1_forward_part_BetI_forward_part_t16_forward_;
  r110: 2 protein_HlyIIR_degtagged + ordered_polymer_part_P_HlyIIR_forward_complex_complex_part_P_AmeR_protein_AmeR_degtagged_2x__protein_RNAP_forward__part_UTR1_forward_part_BetI_forward_part_t16_forward_ => ordered_polymer_complex_part_P_HlyIIR_protein_HlyIIR_degtagged_2x_forward__complex_complex_part_P_AmeR_protein_AmeR_degtagged_2x__protein_RNAP_forward__part_UTR1_forward_part_BetI_forward_part_t16_forward_; kb__one_step_cooperative_binding*protein_HlyIIR_degtagged^2*ordered_polymer_part_P_HlyIIR_forward_complex_complex_part_P_AmeR_protein_AmeR_degtagged_2x__protein_RNAP_forward__part_UTR1_forward_part_BetI_forward_part_t16_forward_;
  r110rev: ordered_polymer_complex_part_P_HlyIIR_protein_HlyIIR_degtagged_2x_forward__complex_complex_part_P_AmeR_protein_AmeR_degtagged_2x__protein_RNAP_forward__part_UTR1_forward_part_BetI_forward_part_t16_forward_ => 2 protein_HlyIIR_degtagged + ordered_polymer_part_P_HlyIIR_forward_complex_complex_part_P_AmeR_protein_AmeR_degtagged_2x__protein_RNAP_forward__part_UTR1_forward_part_BetI_forward_part_t16_forward_; ku__one_step_cooperative_binding*ordered_polymer_complex_part_P_HlyIIR_protein_HlyIIR_degtagged_2x_forward__complex_complex_part_P_AmeR_protein_AmeR_degtagged_2x__protein_RNAP_forward__part_UTR1_forward_part_BetI_forward_part_t16_forward_;
  r111: ordered_polymer_complex_part_P_HlyIIR_protein_HlyIIR_degtagged_2x_forward__complex_complex_part_P_AmeR_protein_AmeR_degtagged_2x__protein_RNAP_forward__part_UTR1_forward_part_BetI_forward_part_t16_forward_ + protein_RNAP => ordered_polymer_complex_complex_part_P_HlyIIR_protein_HlyIIR_degtagged_2x__protein_RNAP_forward__complex_complex_part_P_AmeR_protein_AmeR_degtagged_2x__protein_RNAP_forward__part_UTR1_forward_part_BetI_forward_part_t16_forward_; kb__transcription_mm*ordered_polymer_complex_part_P_HlyIIR_protein_HlyIIR_degtagged_2x_forward__complex_complex_part_P_AmeR_protein_AmeR_degtagged_2x__protein_RNAP_forward__part_UTR1_forward_part_BetI_forward_part_t16_forward_*protein_RNAP;
  r111rev: ordered_polymer_complex_complex_part_P_HlyIIR_protein_HlyIIR_degtagged_2x__protein_RNAP_forward__complex_complex_part_P_AmeR_protein_AmeR_degtagged_2x__protein_RNAP_forward__part_UTR1_forward_part_BetI_forward_part_t16_forward_ => ordered_polymer_complex_part_P_HlyIIR_protein_HlyIIR_degtagged_2x_forward__complex_complex_part_P_AmeR_protein_AmeR_degtagged_2x__protein_RNAP_forward__part_UTR1_forward_part_BetI_forward_part_t16_forward_ + protein_RNAP; ku__transcription_mm*ordered_polymer_complex_complex_part_P_HlyIIR_protein_HlyIIR_degtagged_2x__protein_RNAP_forward__complex_complex_part_P_AmeR_protein_AmeR_degtagged_2x__protein_RNAP_forward__part_UTR1_forward_part_BetI_forward_part_t16_forward_;
  r112: ordered_polymer_complex_complex_part_P_HlyIIR_protein_HlyIIR_degtagged_2x__protein_RNAP_forward__complex_complex_part_P_AmeR_protein_AmeR_degtagged_2x__protein_RNAP_forward__part_UTR1_forward_part_BetI_forward_part_t16_forward_ => ordered_polymer_complex_part_P_HlyIIR_protein_HlyIIR_degtagged_2x_forward__complex_complex_part_P_AmeR_protein_AmeR_degtagged_2x__protein_RNAP_forward__part_UTR1_forward_part_BetI_forward_part_t16_forward_ + rna_part_P_AmeR_forward_part_UTR1_forward_part_BetI_forward_part_t16_forward_ + protein_RNAP; ktx__transcription_mm*ordered_polymer_complex_complex_part_P_HlyIIR_protein_HlyIIR_degtagged_2x__protein_RNAP_forward__complex_complex_part_P_AmeR_protein_AmeR_degtagged_2x__protein_RNAP_forward__part_UTR1_forward_part_BetI_forward_part_t16_forward_;
  r113: dna_part_P_HlyIIR_forward_part_P_AmeR_forward_part_UTR1_forward_part_BetI_forward_part_t16_forward_ + protein_RNAP => ordered_polymer_complex_part_P_HlyIIR_protein_RNAP_forward__part_P_AmeR_forward_part_UTR1_forward_part_BetI_forward_part_t16_forward_; kb_P_HlyIIR_leak_transcription_mm*dna_part_P_HlyIIR_forward_part_P_AmeR_forward_part_UTR1_forward_part_BetI_forward_part_t16_forward_*protein_RNAP;
  r113rev: ordered_polymer_complex_part_P_HlyIIR_protein_RNAP_forward__part_P_AmeR_forward_part_UTR1_forward_part_BetI_forward_part_t16_forward_ => dna_part_P_HlyIIR_forward_part_P_AmeR_forward_part_UTR1_forward_part_BetI_forward_part_t16_forward_ + protein_RNAP; ku_P_HlyIIR_leak_transcription_mm*ordered_polymer_complex_part_P_HlyIIR_protein_RNAP_forward__part_P_AmeR_forward_part_UTR1_forward_part_BetI_forward_part_t16_forward_;
  r114: ordered_polymer_complex_part_P_HlyIIR_protein_RNAP_forward__part_P_AmeR_forward_part_UTR1_forward_part_BetI_forward_part_t16_forward_ => dna_part_P_HlyIIR_forward_part_P_AmeR_forward_part_UTR1_forward_part_BetI_forward_part_t16_forward_ + rna_part_P_AmeR_forward_part_UTR1_forward_part_BetI_forward_part_t16_forward_ + protein_RNAP; ktx_P_HlyIIR_leak_transcription_mm*ordered_polymer_complex_part_P_HlyIIR_protein_RNAP_forward__part_P_AmeR_forward_part_UTR1_forward_part_BetI_forward_part_t16_forward_;
  r115: 2 protein_HlyIIR_degtagged + dna_part_P_HlyIIR_forward_part_P_AmeR_forward_part_UTR1_forward_part_BetI_forward_part_t16_forward_ => ordered_polymer_complex_part_P_HlyIIR_protein_HlyIIR_degtagged_2x_forward__part_P_AmeR_forward_part_UTR1_forward_part_BetI_forward_part_t16_forward_; kb__one_step_cooperative_binding*protein_HlyIIR_degtagged^2*dna_part_P_HlyIIR_forward_part_P_AmeR_forward_part_UTR1_forward_part_BetI_forward_part_t16_forward_;
  r115rev: ordered_polymer_complex_part_P_HlyIIR_protein_HlyIIR_degtagged_2x_forward__part_P_AmeR_forward_part_UTR1_forward_part_BetI_forward_part_t16_forward_ => 2 protein_HlyIIR_degtagged + dna_part_P_HlyIIR_forward_part_P_AmeR_forward_part_UTR1_forward_part_BetI_forward_part_t16_forward_; ku__one_step_cooperative_binding*ordered_polymer_complex_part_P_HlyIIR_protein_HlyIIR_degtagged_2x_forward__part_P_AmeR_forward_part_UTR1_forward_part_BetI_forward_part_t16_forward_;
  r116: ordered_polymer_complex_part_P_HlyIIR_protein_HlyIIR_degtagged_2x_forward__part_P_AmeR_forward_part_UTR1_forward_part_BetI_forward_part_t16_forward_ + protein_RNAP => ordered_polymer_complex_complex_part_P_HlyIIR_protein_HlyIIR_degtagged_2x__protein_RNAP_forward__part_P_AmeR_forward_part_UTR1_forward_part_BetI_forward_part_t16_forward_; kb__transcription_mm*ordered_polymer_complex_part_P_HlyIIR_protein_HlyIIR_degtagged_2x_forward__part_P_AmeR_forward_part_UTR1_forward_part_BetI_forward_part_t16_forward_*protein_RNAP;
  r116rev: ordered_polymer_complex_complex_part_P_HlyIIR_protein_HlyIIR_degtagged_2x__protein_RNAP_forward__part_P_AmeR_forward_part_UTR1_forward_part_BetI_forward_part_t16_forward_ => ordered_polymer_complex_part_P_HlyIIR_protein_HlyIIR_degtagged_2x_forward__part_P_AmeR_forward_part_UTR1_forward_part_BetI_forward_part_t16_forward_ + protein_RNAP; ku__transcription_mm*ordered_polymer_complex_complex_part_P_HlyIIR_protein_HlyIIR_degtagged_2x__protein_RNAP_forward__part_P_AmeR_forward_part_UTR1_forward_part_BetI_forward_part_t16_forward_;
  r117: ordered_polymer_complex_complex_part_P_HlyIIR_protein_HlyIIR_degtagged_2x__protein_RNAP_forward__part_P_AmeR_forward_part_UTR1_forward_part_BetI_forward_part_t16_forward_ => ordered_polymer_complex_part_P_HlyIIR_protein_HlyIIR_degtagged_2x_forward__part_P_AmeR_forward_part_UTR1_forward_part_BetI_forward_part_t16_forward_ + rna_part_P_AmeR_forward_part_UTR1_forward_part_BetI_forward_part_t16_forward_ + protein_RNAP; ktx__transcription_mm*ordered_polymer_complex_complex_part_P_HlyIIR_protein_HlyIIR_degtagged_2x__protein_RNAP_forward__part_P_AmeR_forward_part_UTR1_forward_part_BetI_forward_part_t16_forward_;
  r118: dna_part_P_HlyIIR_forward_part_P_AmeR_forward_part_UTR1_forward_part_BetI_forward_part_t16_forward_ + protein_RNAP => ordered_polymer_part_P_HlyIIR_forward_complex_part_P_AmeR_protein_RNAP_forward__part_UTR1_forward_part_BetI_forward_part_t16_forward_; kb_P_AmeR_leak_transcription_mm*dna_part_P_HlyIIR_forward_part_P_AmeR_forward_part_UTR1_forward_part_BetI_forward_part_t16_forward_*protein_RNAP;
  r118rev: ordered_polymer_part_P_HlyIIR_forward_complex_part_P_AmeR_protein_RNAP_forward__part_UTR1_forward_part_BetI_forward_part_t16_forward_ => dna_part_P_HlyIIR_forward_part_P_AmeR_forward_part_UTR1_forward_part_BetI_forward_part_t16_forward_ + protein_RNAP; ku_P_AmeR_leak_transcription_mm*ordered_polymer_part_P_HlyIIR_forward_complex_part_P_AmeR_protein_RNAP_forward__part_UTR1_forward_part_BetI_forward_part_t16_forward_;
  r119: ordered_polymer_part_P_HlyIIR_forward_complex_part_P_AmeR_protein_RNAP_forward__part_UTR1_forward_part_BetI_forward_part_t16_forward_ => dna_part_P_HlyIIR_forward_part_P_AmeR_forward_part_UTR1_forward_part_BetI_forward_part_t16_forward_ + rna_part_UTR1_forward_part_BetI_forward_part_t16_forward_ + protein_RNAP; ktx_P_AmeR_leak_transcription_mm*ordered_polymer_part_P_HlyIIR_forward_complex_part_P_AmeR_protein_RNAP_forward__part_UTR1_forward_part_BetI_forward_part_t16_forward_;
  r120: 2 protein_AmeR_degtagged + dna_part_P_HlyIIR_forward_part_P_AmeR_forward_part_UTR1_forward_part_BetI_forward_part_t16_forward_ => ordered_polymer_part_P_HlyIIR_forward_complex_part_P_AmeR_protein_AmeR_degtagged_2x_forward__part_UTR1_forward_part_BetI_forward_part_t16_forward_; kb__one_step_cooperative_binding*protein_AmeR_degtagged^2*dna_part_P_HlyIIR_forward_part_P_AmeR_forward_part_UTR1_forward_part_BetI_forward_part_t16_forward_;
  r120rev: ordered_polymer_part_P_HlyIIR_forward_complex_part_P_AmeR_protein_AmeR_degtagged_2x_forward__part_UTR1_forward_part_BetI_forward_part_t16_forward_ => 2 protein_AmeR_degtagged + dna_part_P_HlyIIR_forward_part_P_AmeR_forward_part_UTR1_forward_part_BetI_forward_part_t16_forward_; ku__one_step_cooperative_binding*ordered_polymer_part_P_HlyIIR_forward_complex_part_P_AmeR_protein_AmeR_degtagged_2x_forward__part_UTR1_forward_part_BetI_forward_part_t16_forward_;
  r121: ordered_polymer_part_P_HlyIIR_forward_complex_part_P_AmeR_protein_AmeR_degtagged_2x_forward__part_UTR1_forward_part_BetI_forward_part_t16_forward_ + protein_RNAP => ordered_polymer_part_P_HlyIIR_forward_complex_complex_part_P_AmeR_protein_AmeR_degtagged_2x__protein_RNAP_forward__part_UTR1_forward_part_BetI_forward_part_t16_forward_; kb__transcription_mm*ordered_polymer_part_P_HlyIIR_forward_complex_part_P_AmeR_protein_AmeR_degtagged_2x_forward__part_UTR1_forward_part_BetI_forward_part_t16_forward_*protein_RNAP;
  r121rev: ordered_polymer_part_P_HlyIIR_forward_complex_complex_part_P_AmeR_protein_AmeR_degtagged_2x__protein_RNAP_forward__part_UTR1_forward_part_BetI_forward_part_t16_forward_ => ordered_polymer_part_P_HlyIIR_forward_complex_part_P_AmeR_protein_AmeR_degtagged_2x_forward__part_UTR1_forward_part_BetI_forward_part_t16_forward_ + protein_RNAP; ku__transcription_mm*ordered_polymer_part_P_HlyIIR_forward_complex_complex_part_P_AmeR_protein_AmeR_degtagged_2x__protein_RNAP_forward__part_UTR1_forward_part_BetI_forward_part_t16_forward_;
  r122: ordered_polymer_part_P_HlyIIR_forward_complex_complex_part_P_AmeR_protein_AmeR_degtagged_2x__protein_RNAP_forward__part_UTR1_forward_part_BetI_forward_part_t16_forward_ => ordered_polymer_part_P_HlyIIR_forward_complex_part_P_AmeR_protein_AmeR_degtagged_2x_forward__part_UTR1_forward_part_BetI_forward_part_t16_forward_ + rna_part_UTR1_forward_part_BetI_forward_part_t16_forward_ + protein_RNAP; ktx__transcription_mm*ordered_polymer_part_P_HlyIIR_forward_complex_complex_part_P_AmeR_protein_AmeR_degtagged_2x__protein_RNAP_forward__part_UTR1_forward_part_BetI_forward_part_t16_forward_;
  r123: dna_part_P_Tet_forward_part_UTR1_forward_part_AmeR_forward_part_t16_forward_ + protein_RNAP => ordered_polymer_complex_part_P_Tet_protein_RNAP_forward__part_UTR1_forward_part_AmeR_forward_part_t16_forward_; kb_P_Tet_leak_transcription_mm*dna_part_P_Tet_forward_part_UTR1_forward_part_AmeR_forward_part_t16_forward_*protein_RNAP;
  r123rev: ordered_polymer_complex_part_P_Tet_protein_RNAP_forward__part_UTR1_forward_part_AmeR_forward_part_t16_forward_ => dna_part_P_Tet_forward_part_UTR1_forward_part_AmeR_forward_part_t16_forward_ + protein_RNAP; ku_P_Tet_leak_transcription_mm*ordered_polymer_complex_part_P_Tet_protein_RNAP_forward__part_UTR1_forward_part_AmeR_forward_part_t16_forward_;
  r124: ordered_polymer_complex_part_P_Tet_protein_RNAP_forward__part_UTR1_forward_part_AmeR_forward_part_t16_forward_ => dna_part_P_Tet_forward_part_UTR1_forward_part_AmeR_forward_part_t16_forward_ + rna_part_UTR1_forward_part_AmeR_forward_part_t16_forward_ + protein_RNAP; ktx_P_Tet_leak_transcription_mm*ordered_polymer_complex_part_P_Tet_protein_RNAP_forward__part_UTR1_forward_part_AmeR_forward_part_t16_forward_;
  r125: 2 TetR + dna_part_P_Tet_forward_part_UTR1_forward_part_AmeR_forward_part_t16_forward_ => ordered_polymer_complex_TetR_2x_part_P_Tet_forward__part_UTR1_forward_part_AmeR_forward_part_t16_forward_; kb__one_step_cooperative_binding*TetR^2*dna_part_P_Tet_forward_part_UTR1_forward_part_AmeR_forward_part_t16_forward_;
  r125rev: ordered_polymer_complex_TetR_2x_part_P_Tet_forward__part_UTR1_forward_part_AmeR_forward_part_t16_forward_ => 2 TetR + dna_part_P_Tet_forward_part_UTR1_forward_part_AmeR_forward_part_t16_forward_; ku__one_step_cooperative_binding*ordered_polymer_complex_TetR_2x_part_P_Tet_forward__part_UTR1_forward_part_AmeR_forward_part_t16_forward_;
  r126: ordered_polymer_complex_TetR_2x_part_P_Tet_forward__part_UTR1_forward_part_AmeR_forward_part_t16_forward_ + protein_RNAP => ordered_polymer_complex_complex_TetR_2x_part_P_Tet__protein_RNAP_forward__part_UTR1_forward_part_AmeR_forward_part_t16_forward_; kb__transcription_mm*ordered_polymer_complex_TetR_2x_part_P_Tet_forward__part_UTR1_forward_part_AmeR_forward_part_t16_forward_*protein_RNAP;
  r126rev: ordered_polymer_complex_complex_TetR_2x_part_P_Tet__protein_RNAP_forward__part_UTR1_forward_part_AmeR_forward_part_t16_forward_ => ordered_polymer_complex_TetR_2x_part_P_Tet_forward__part_UTR1_forward_part_AmeR_forward_part_t16_forward_ + protein_RNAP; ku__transcription_mm*ordered_polymer_complex_complex_TetR_2x_part_P_Tet__protein_RNAP_forward__part_UTR1_forward_part_AmeR_forward_part_t16_forward_;
  r127: ordered_polymer_complex_complex_TetR_2x_part_P_Tet__protein_RNAP_forward__part_UTR1_forward_part_AmeR_forward_part_t16_forward_ => ordered_polymer_complex_TetR_2x_part_P_Tet_forward__part_UTR1_forward_part_AmeR_forward_part_t16_forward_ + rna_part_UTR1_forward_part_AmeR_forward_part_t16_forward_ + protein_RNAP; ktx__transcription_mm*ordered_polymer_complex_complex_TetR_2x_part_P_Tet__protein_RNAP_forward__part_UTR1_forward_part_AmeR_forward_part_t16_forward_;
  r128: dna_part_P_Tac_forward_part_UTR1_forward_part_HlyIIR_forward_part_t16_forward_ + protein_RNAP => ordered_polymer_complex_part_P_Tac_protein_RNAP_forward__part_UTR1_forward_part_HlyIIR_forward_part_t16_forward_; kb_P_Tac_leak_transcription_mm*dna_part_P_Tac_forward_part_UTR1_forward_part_HlyIIR_forward_part_t16_forward_*protein_RNAP;
  r128rev: ordered_polymer_complex_part_P_Tac_protein_RNAP_forward__part_UTR1_forward_part_HlyIIR_forward_part_t16_forward_ => dna_part_P_Tac_forward_part_UTR1_forward_part_HlyIIR_forward_part_t16_forward_ + protein_RNAP; ku_P_Tac_leak_transcription_mm*ordered_polymer_complex_part_P_Tac_protein_RNAP_forward__part_UTR1_forward_part_HlyIIR_forward_part_t16_forward_;
  r129: ordered_polymer_complex_part_P_Tac_protein_RNAP_forward__part_UTR1_forward_part_HlyIIR_forward_part_t16_forward_ => dna_part_P_Tac_forward_part_UTR1_forward_part_HlyIIR_forward_part_t16_forward_ + rna_part_UTR1_forward_part_HlyIIR_forward_part_t16_forward_ + protein_RNAP; ktx_P_Tac_leak_transcription_mm*ordered_polymer_complex_part_P_Tac_protein_RNAP_forward__part_UTR1_forward_part_HlyIIR_forward_part_t16_forward_;
  r130: 2 LacI + dna_part_P_Tac_forward_part_UTR1_forward_part_HlyIIR_forward_part_t16_forward_ => ordered_polymer_complex_LacI_2x_part_P_Tac_forward__part_UTR1_forward_part_HlyIIR_forward_part_t16_forward_; kb__one_step_cooperative_binding*LacI^2*dna_part_P_Tac_forward_part_UTR1_forward_part_HlyIIR_forward_part_t16_forward_;
  r130rev: ordered_polymer_complex_LacI_2x_part_P_Tac_forward__part_UTR1_forward_part_HlyIIR_forward_part_t16_forward_ => 2 LacI + dna_part_P_Tac_forward_part_UTR1_forward_part_HlyIIR_forward_part_t16_forward_; ku__one_step_cooperative_binding*ordered_polymer_complex_LacI_2x_part_P_Tac_forward__part_UTR1_forward_part_HlyIIR_forward_part_t16_forward_;
  r131: ordered_polymer_complex_LacI_2x_part_P_Tac_forward__part_UTR1_forward_part_HlyIIR_forward_part_t16_forward_ + protein_RNAP => ordered_polymer_complex_complex_LacI_2x_part_P_Tac__protein_RNAP_forward__part_UTR1_forward_part_HlyIIR_forward_part_t16_forward_; kb__transcription_mm*ordered_polymer_complex_LacI_2x_part_P_Tac_forward__part_UTR1_forward_part_HlyIIR_forward_part_t16_forward_*protein_RNAP;
  r131rev: ordered_polymer_complex_complex_LacI_2x_part_P_Tac__protein_RNAP_forward__part_UTR1_forward_part_HlyIIR_forward_part_t16_forward_ => ordered_polymer_complex_LacI_2x_part_P_Tac_forward__part_UTR1_forward_part_HlyIIR_forward_part_t16_forward_ + protein_RNAP; ku__transcription_mm*ordered_polymer_complex_complex_LacI_2x_part_P_Tac__protein_RNAP_forward__part_UTR1_forward_part_HlyIIR_forward_part_t16_forward_;
  r132: ordered_polymer_complex_complex_LacI_2x_part_P_Tac__protein_RNAP_forward__part_UTR1_forward_part_HlyIIR_forward_part_t16_forward_ => ordered_polymer_complex_LacI_2x_part_P_Tac_forward__part_UTR1_forward_part_HlyIIR_forward_part_t16_forward_ + rna_part_UTR1_forward_part_HlyIIR_forward_part_t16_forward_ + protein_RNAP; ktx__transcription_mm*ordered_polymer_complex_complex_LacI_2x_part_P_Tac__protein_RNAP_forward__part_UTR1_forward_part_HlyIIR_forward_part_t16_forward_;
  r133: dna_part_P_BAD_forward_part_UTR1_forward_part_AmtR_forward_part_t16_forward_ + protein_RNAP => ordered_polymer_complex_part_P_BAD_protein_RNAP_forward__part_UTR1_forward_part_AmtR_forward_part_t16_forward_; kb_P_BAD_leak_transcription_mm*dna_part_P_BAD_forward_part_UTR1_forward_part_AmtR_forward_part_t16_forward_*protein_RNAP;
  r133rev: ordered_polymer_complex_part_P_BAD_protein_RNAP_forward__part_UTR1_forward_part_AmtR_forward_part_t16_forward_ => dna_part_P_BAD_forward_part_UTR1_forward_part_AmtR_forward_part_t16_forward_ + protein_RNAP; ku_P_BAD_leak_transcription_mm*ordered_polymer_complex_part_P_BAD_protein_RNAP_forward__part_UTR1_forward_part_AmtR_forward_part_t16_forward_;
  r134: ordered_polymer_complex_part_P_BAD_protein_RNAP_forward__part_UTR1_forward_part_AmtR_forward_part_t16_forward_ => dna_part_P_BAD_forward_part_UTR1_forward_part_AmtR_forward_part_t16_forward_ + rna_part_UTR1_forward_part_AmtR_forward_part_t16_forward_ + protein_RNAP; ktx_P_BAD_leak_transcription_mm*ordered_polymer_complex_part_P_BAD_protein_RNAP_forward__part_UTR1_forward_part_AmtR_forward_part_t16_forward_;
  r135: 2 complex_Ara_2x_AraC_2x_ + dna_part_P_BAD_forward_part_UTR1_forward_part_AmtR_forward_part_t16_forward_ => ordered_polymer_complex_complex_Ara_2x_AraC_2x__2x_part_P_BAD_forward__part_UTR1_forward_part_AmtR_forward_part_t16_forward_; kb__one_step_cooperative_binding*complex_Ara_2x_AraC_2x_^2*dna_part_P_BAD_forward_part_UTR1_forward_part_AmtR_forward_part_t16_forward_;
  r135rev: ordered_polymer_complex_complex_Ara_2x_AraC_2x__2x_part_P_BAD_forward__part_UTR1_forward_part_AmtR_forward_part_t16_forward_ => 2 complex_Ara_2x_AraC_2x_ + dna_part_P_BAD_forward_part_UTR1_forward_part_AmtR_forward_part_t16_forward_; ku__one_step_cooperative_binding*ordered_polymer_complex_complex_Ara_2x_AraC_2x__2x_part_P_BAD_forward__part_UTR1_forward_part_AmtR_forward_part_t16_forward_;
  r136: ordered_polymer_complex_complex_Ara_2x_AraC_2x__2x_part_P_BAD_forward__part_UTR1_forward_part_AmtR_forward_part_t16_forward_ + protein_RNAP => ordered_polymer_complex_complex_complex_Ara_2x_AraC_2x__2x_part_P_BAD__protein_RNAP_forward__part_UTR1_forward_part_AmtR_forward_part_t16_forward_; kb_P_BAD_Ara_2x_AraC_2x_transcription_mm*ordered_polymer_complex_complex_Ara_2x_AraC_2x__2x_part_P_BAD_forward__part_UTR1_forward_part_AmtR_forward_part_t16_forward_*protein_RNAP;
  r136rev: ordered_polymer_complex_complex_complex_Ara_2x_AraC_2x__2x_part_P_BAD__protein_RNAP_forward__part_UTR1_forward_part_AmtR_forward_part_t16_forward_ => ordered_polymer_complex_complex_Ara_2x_AraC_2x__2x_part_P_BAD_forward__part_UTR1_forward_part_AmtR_forward_part_t16_forward_ + protein_RNAP; ku_P_BAD_Ara_2x_AraC_2x_transcription_mm*ordered_polymer_complex_complex_complex_Ara_2x_AraC_2x__2x_part_P_BAD__protein_RNAP_forward__part_UTR1_forward_part_AmtR_forward_part_t16_forward_;
  r137: ordered_polymer_complex_complex_complex_Ara_2x_AraC_2x__2x_part_P_BAD__protein_RNAP_forward__part_UTR1_forward_part_AmtR_forward_part_t16_forward_ => ordered_polymer_complex_complex_Ara_2x_AraC_2x__2x_part_P_BAD_forward__part_UTR1_forward_part_AmtR_forward_part_t16_forward_ + rna_part_UTR1_forward_part_AmtR_forward_part_t16_forward_ + protein_RNAP; ktx_P_BAD_Ara_2x_AraC_2x_transcription_mm*ordered_polymer_complex_complex_complex_Ara_2x_AraC_2x__2x_part_P_BAD__protein_RNAP_forward__part_UTR1_forward_part_AmtR_forward_part_t16_forward_;
  r138: ordered_polymer_complex_complex_part_P_PhlF_protein_PhlF_degtagged_2x__protein_RNAP_forward__part_P_AmtR_forward_part_UTR1_forward_part_YFP_forward_part_t16_forward_ + protein_RNAP => ordered_polymer_complex_complex_part_P_PhlF_protein_PhlF_degtagged_2x__protein_RNAP_forward__complex_part_P_AmtR_protein_RNAP_forward__part_UTR1_forward_part_YFP_forward_part_t16_forward_; kb_P_AmtR_leak_transcription_mm*ordered_polymer_complex_complex_part_P_PhlF_protein_PhlF_degtagged_2x__protein_RNAP_forward__part_P_AmtR_forward_part_UTR1_forward_part_YFP_forward_part_t16_forward_*protein_RNAP;
  r138rev: ordered_polymer_complex_complex_part_P_PhlF_protein_PhlF_degtagged_2x__protein_RNAP_forward__complex_part_P_AmtR_protein_RNAP_forward__part_UTR1_forward_part_YFP_forward_part_t16_forward_ => ordered_polymer_complex_complex_part_P_PhlF_protein_PhlF_degtagged_2x__protein_RNAP_forward__part_P_AmtR_forward_part_UTR1_forward_part_YFP_forward_part_t16_forward_ + protein_RNAP; ku_P_AmtR_leak_transcription_mm*ordered_polymer_complex_complex_part_P_PhlF_protein_PhlF_degtagged_2x__protein_RNAP_forward__complex_part_P_AmtR_protein_RNAP_forward__part_UTR1_forward_part_YFP_forward_part_t16_forward_;
  r139: ordered_polymer_complex_complex_part_P_PhlF_protein_PhlF_degtagged_2x__protein_RNAP_forward__complex_part_P_AmtR_protein_RNAP_forward__part_UTR1_forward_part_YFP_forward_part_t16_forward_ => ordered_polymer_complex_complex_part_P_PhlF_protein_PhlF_degtagged_2x__protein_RNAP_forward__part_P_AmtR_forward_part_UTR1_forward_part_YFP_forward_part_t16_forward_ + rna_part_UTR1_forward_part_YFP_forward_part_t16_forward_ + protein_RNAP; ktx_P_AmtR_leak_transcription_mm*ordered_polymer_complex_complex_part_P_PhlF_protein_PhlF_degtagged_2x__protein_RNAP_forward__complex_part_P_AmtR_protein_RNAP_forward__part_UTR1_forward_part_YFP_forward_part_t16_forward_;
  r140: 2 protein_AmtR_degtagged + ordered_polymer_complex_complex_part_P_PhlF_protein_PhlF_degtagged_2x__protein_RNAP_forward__part_P_AmtR_forward_part_UTR1_forward_part_YFP_forward_part_t16_forward_ => ordered_polymer_complex_complex_part_P_PhlF_protein_PhlF_degtagged_2x__protein_RNAP_forward__complex_part_P_AmtR_protein_AmtR_degtagged_2x_forward__part_UTR1_forward_part_YFP_forward_part_t16_forward_; kb__one_step_cooperative_binding*protein_AmtR_degtagged^2*ordered_polymer_complex_complex_part_P_PhlF_protein_PhlF_degtagged_2x__protein_RNAP_forward__part_P_AmtR_forward_part_UTR1_forward_part_YFP_forward_part_t16_forward_;
  r140rev: ordered_polymer_complex_complex_part_P_PhlF_protein_PhlF_degtagged_2x__protein_RNAP_forward__complex_part_P_AmtR_protein_AmtR_degtagged_2x_forward__part_UTR1_forward_part_YFP_forward_part_t16_forward_ => 2 protein_AmtR_degtagged + ordered_polymer_complex_complex_part_P_PhlF_protein_PhlF_degtagged_2x__protein_RNAP_forward__part_P_AmtR_forward_part_UTR1_forward_part_YFP_forward_part_t16_forward_; ku__one_step_cooperative_binding*ordered_polymer_complex_complex_part_P_PhlF_protein_PhlF_degtagged_2x__protein_RNAP_forward__complex_part_P_AmtR_protein_AmtR_degtagged_2x_forward__part_UTR1_forward_part_YFP_forward_part_t16_forward_;
  r141: ordered_polymer_complex_complex_part_P_PhlF_protein_PhlF_degtagged_2x__protein_RNAP_forward__complex_part_P_AmtR_protein_AmtR_degtagged_2x_forward__part_UTR1_forward_part_YFP_forward_part_t16_forward_ + protein_RNAP => ordered_polymer_complex_complex_part_P_PhlF_protein_PhlF_degtagged_2x__protein_RNAP_forward__complex_complex_part_P_AmtR_protein_AmtR_degtagged_2x__protein_RNAP_forward__part_UTR1_forward_part_YFP_forward_part_t16_forward_; kb__transcription_mm*ordered_polymer_complex_complex_part_P_PhlF_protein_PhlF_degtagged_2x__protein_RNAP_forward__complex_part_P_AmtR_protein_AmtR_degtagged_2x_forward__part_UTR1_forward_part_YFP_forward_part_t16_forward_*protein_RNAP;
  r141rev: ordered_polymer_complex_complex_part_P_PhlF_protein_PhlF_degtagged_2x__protein_RNAP_forward__complex_complex_part_P_AmtR_protein_AmtR_degtagged_2x__protein_RNAP_forward__part_UTR1_forward_part_YFP_forward_part_t16_forward_ => ordered_polymer_complex_complex_part_P_PhlF_protein_PhlF_degtagged_2x__protein_RNAP_forward__complex_part_P_AmtR_protein_AmtR_degtagged_2x_forward__part_UTR1_forward_part_YFP_forward_part_t16_forward_ + protein_RNAP; ku__transcription_mm*ordered_polymer_complex_complex_part_P_PhlF_protein_PhlF_degtagged_2x__protein_RNAP_forward__complex_complex_part_P_AmtR_protein_AmtR_degtagged_2x__protein_RNAP_forward__part_UTR1_forward_part_YFP_forward_part_t16_forward_;
  r142: ordered_polymer_complex_complex_part_P_PhlF_protein_PhlF_degtagged_2x__protein_RNAP_forward__complex_complex_part_P_AmtR_protein_AmtR_degtagged_2x__protein_RNAP_forward__part_UTR1_forward_part_YFP_forward_part_t16_forward_ => ordered_polymer_complex_complex_part_P_PhlF_protein_PhlF_degtagged_2x__protein_RNAP_forward__complex_part_P_AmtR_protein_AmtR_degtagged_2x_forward__part_UTR1_forward_part_YFP_forward_part_t16_forward_ + rna_part_UTR1_forward_part_YFP_forward_part_t16_forward_ + protein_RNAP; ktx__transcription_mm*ordered_polymer_complex_complex_part_P_PhlF_protein_PhlF_degtagged_2x__protein_RNAP_forward__complex_complex_part_P_AmtR_protein_AmtR_degtagged_2x__protein_RNAP_forward__part_UTR1_forward_part_YFP_forward_part_t16_forward_;
  r143: ordered_polymer_complex_part_P_PhlF_protein_PhlF_degtagged_2x_forward__part_P_AmtR_forward_part_UTR1_forward_part_YFP_forward_part_t16_forward_ + protein_RNAP => ordered_polymer_complex_part_P_PhlF_protein_PhlF_degtagged_2x_forward__complex_part_P_AmtR_protein_RNAP_forward__part_UTR1_forward_part_YFP_forward_part_t16_forward_; kb_P_AmtR_leak_transcription_mm*ordered_polymer_complex_part_P_PhlF_protein_PhlF_degtagged_2x_forward__part_P_AmtR_forward_part_UTR1_forward_part_YFP_forward_part_t16_forward_*protein_RNAP;
  r143rev: ordered_polymer_complex_part_P_PhlF_protein_PhlF_degtagged_2x_forward__complex_part_P_AmtR_protein_RNAP_forward__part_UTR1_forward_part_YFP_forward_part_t16_forward_ => ordered_polymer_complex_part_P_PhlF_protein_PhlF_degtagged_2x_forward__part_P_AmtR_forward_part_UTR1_forward_part_YFP_forward_part_t16_forward_ + protein_RNAP; ku_P_AmtR_leak_transcription_mm*ordered_polymer_complex_part_P_PhlF_protein_PhlF_degtagged_2x_forward__complex_part_P_AmtR_protein_RNAP_forward__part_UTR1_forward_part_YFP_forward_part_t16_forward_;
  r144: ordered_polymer_complex_part_P_PhlF_protein_PhlF_degtagged_2x_forward__complex_part_P_AmtR_protein_RNAP_forward__part_UTR1_forward_part_YFP_forward_part_t16_forward_ => ordered_polymer_complex_part_P_PhlF_protein_PhlF_degtagged_2x_forward__part_P_AmtR_forward_part_UTR1_forward_part_YFP_forward_part_t16_forward_ + rna_part_UTR1_forward_part_YFP_forward_part_t16_forward_ + protein_RNAP; ktx_P_AmtR_leak_transcription_mm*ordered_polymer_complex_part_P_PhlF_protein_PhlF_degtagged_2x_forward__complex_part_P_AmtR_protein_RNAP_forward__part_UTR1_forward_part_YFP_forward_part_t16_forward_;
  r145: 2 protein_AmtR_degtagged + ordered_polymer_complex_part_P_PhlF_protein_PhlF_degtagged_2x_forward__part_P_AmtR_forward_part_UTR1_forward_part_YFP_forward_part_t16_forward_ => ordered_polymer_complex_part_P_PhlF_protein_PhlF_degtagged_2x_forward__complex_part_P_AmtR_protein_AmtR_degtagged_2x_forward__part_UTR1_forward_part_YFP_forward_part_t16_forward_; kb__one_step_cooperative_binding*protein_AmtR_degtagged^2*ordered_polymer_complex_part_P_PhlF_protein_PhlF_degtagged_2x_forward__part_P_AmtR_forward_part_UTR1_forward_part_YFP_forward_part_t16_forward_;
  r145rev: ordered_polymer_complex_part_P_PhlF_protein_PhlF_degtagged_2x_forward__complex_part_P_AmtR_protein_AmtR_degtagged_2x_forward__part_UTR1_forward_part_YFP_forward_part_t16_forward_ => 2 protein_AmtR_degtagged + ordered_polymer_complex_part_P_PhlF_protein_PhlF_degtagged_2x_forward__part_P_AmtR_forward_part_UTR1_forward_part_YFP_forward_part_t16_forward_; ku__one_step_cooperative_binding*ordered_polymer_complex_part_P_PhlF_protein_PhlF_degtagged_2x_forward__complex_part_P_AmtR_protein_AmtR_degtagged_2x_forward__part_UTR1_forward_part_YFP_forward_part_t16_forward_;
  r146: ordered_polymer_complex_part_P_PhlF_protein_PhlF_degtagged_2x_forward__complex_part_P_AmtR_protein_AmtR_degtagged_2x_forward__part_UTR1_forward_part_YFP_forward_part_t16_forward_ + protein_RNAP => ordered_polymer_complex_part_P_PhlF_protein_PhlF_degtagged_2x_forward__complex_complex_part_P_AmtR_protein_AmtR_degtagged_2x__protein_RNAP_forward__part_UTR1_forward_part_YFP_forward_part_t16_forward_; kb__transcription_mm*ordered_polymer_complex_part_P_PhlF_protein_PhlF_degtagged_2x_forward__complex_part_P_AmtR_protein_AmtR_degtagged_2x_forward__part_UTR1_forward_part_YFP_forward_part_t16_forward_*protein_RNAP;
  r146rev: ordered_polymer_complex_part_P_PhlF_protein_PhlF_degtagged_2x_forward__complex_complex_part_P_AmtR_protein_AmtR_degtagged_2x__protein_RNAP_forward__part_UTR1_forward_part_YFP_forward_part_t16_forward_ => ordered_polymer_complex_part_P_PhlF_protein_PhlF_degtagged_2x_forward__complex_part_P_AmtR_protein_AmtR_degtagged_2x_forward__part_UTR1_forward_part_YFP_forward_part_t16_forward_ + protein_RNAP; ku__transcription_mm*ordered_polymer_complex_part_P_PhlF_protein_PhlF_degtagged_2x_forward__complex_complex_part_P_AmtR_protein_AmtR_degtagged_2x__protein_RNAP_forward__part_UTR1_forward_part_YFP_forward_part_t16_forward_;
  r147: ordered_polymer_complex_part_P_PhlF_protein_PhlF_degtagged_2x_forward__complex_complex_part_P_AmtR_protein_AmtR_degtagged_2x__protein_RNAP_forward__part_UTR1_forward_part_YFP_forward_part_t16_forward_ => ordered_polymer_complex_part_P_PhlF_protein_PhlF_degtagged_2x_forward__complex_part_P_AmtR_protein_AmtR_degtagged_2x_forward__part_UTR1_forward_part_YFP_forward_part_t16_forward_ + rna_part_UTR1_forward_part_YFP_forward_part_t16_forward_ + protein_RNAP; ktx__transcription_mm*ordered_polymer_complex_part_P_PhlF_protein_PhlF_degtagged_2x_forward__complex_complex_part_P_AmtR_protein_AmtR_degtagged_2x__protein_RNAP_forward__part_UTR1_forward_part_YFP_forward_part_t16_forward_;
  r148: ordered_polymer_complex_part_P_PhlF_protein_RNAP_forward__part_P_AmtR_forward_part_UTR1_forward_part_YFP_forward_part_t16_forward_ + protein_RNAP => ordered_polymer_complex_part_P_PhlF_protein_RNAP_forward__complex_part_P_AmtR_protein_RNAP_forward__part_UTR1_forward_part_YFP_forward_part_t16_forward_; kb_P_AmtR_leak_transcription_mm*ordered_polymer_complex_part_P_PhlF_protein_RNAP_forward__part_P_AmtR_forward_part_UTR1_forward_part_YFP_forward_part_t16_forward_*protein_RNAP;
  r148rev: ordered_polymer_complex_part_P_PhlF_protein_RNAP_forward__complex_part_P_AmtR_protein_RNAP_forward__part_UTR1_forward_part_YFP_forward_part_t16_forward_ => ordered_polymer_complex_part_P_PhlF_protein_RNAP_forward__part_P_AmtR_forward_part_UTR1_forward_part_YFP_forward_part_t16_forward_ + protein_RNAP; ku_P_AmtR_leak_transcription_mm*ordered_polymer_complex_part_P_PhlF_protein_RNAP_forward__complex_part_P_AmtR_protein_RNAP_forward__part_UTR1_forward_part_YFP_forward_part_t16_forward_;
  r149: ordered_polymer_complex_part_P_PhlF_protein_RNAP_forward__complex_part_P_AmtR_protein_RNAP_forward__part_UTR1_forward_part_YFP_forward_part_t16_forward_ => ordered_polymer_complex_part_P_PhlF_protein_RNAP_forward__part_P_AmtR_forward_part_UTR1_forward_part_YFP_forward_part_t16_forward_ + rna_part_UTR1_forward_part_YFP_forward_part_t16_forward_ + protein_RNAP; ktx_P_AmtR_leak_transcription_mm*ordered_polymer_complex_part_P_PhlF_protein_RNAP_forward__complex_part_P_AmtR_protein_RNAP_forward__part_UTR1_forward_part_YFP_forward_part_t16_forward_;
  r150: 2 protein_AmtR_degtagged + ordered_polymer_complex_part_P_PhlF_protein_RNAP_forward__part_P_AmtR_forward_part_UTR1_forward_part_YFP_forward_part_t16_forward_ => ordered_polymer_complex_part_P_PhlF_protein_RNAP_forward__complex_part_P_AmtR_protein_AmtR_degtagged_2x_forward__part_UTR1_forward_part_YFP_forward_part_t16_forward_; kb__one_step_cooperative_binding*protein_AmtR_degtagged^2*ordered_polymer_complex_part_P_PhlF_protein_RNAP_forward__part_P_AmtR_forward_part_UTR1_forward_part_YFP_forward_part_t16_forward_;
  r150rev: ordered_polymer_complex_part_P_PhlF_protein_RNAP_forward__complex_part_P_AmtR_protein_AmtR_degtagged_2x_forward__part_UTR1_forward_part_YFP_forward_part_t16_forward_ => 2 protein_AmtR_degtagged + ordered_polymer_complex_part_P_PhlF_protein_RNAP_forward__part_P_AmtR_forward_part_UTR1_forward_part_YFP_forward_part_t16_forward_; ku__one_step_cooperative_binding*ordered_polymer_complex_part_P_PhlF_protein_RNAP_forward__complex_part_P_AmtR_protein_AmtR_degtagged_2x_forward__part_UTR1_forward_part_YFP_forward_part_t16_forward_;
  r151: ordered_polymer_complex_part_P_PhlF_protein_RNAP_forward__complex_part_P_AmtR_protein_AmtR_degtagged_2x_forward__part_UTR1_forward_part_YFP_forward_part_t16_forward_ + protein_RNAP => ordered_polymer_complex_part_P_PhlF_protein_RNAP_forward__complex_complex_part_P_AmtR_protein_AmtR_degtagged_2x__protein_RNAP_forward__part_UTR1_forward_part_YFP_forward_part_t16_forward_; kb__transcription_mm*ordered_polymer_complex_part_P_PhlF_protein_RNAP_forward__complex_part_P_AmtR_protein_AmtR_degtagged_2x_forward__part_UTR1_forward_part_YFP_forward_part_t16_forward_*protein_RNAP;
  r151rev: ordered_polymer_complex_part_P_PhlF_protein_RNAP_forward__complex_complex_part_P_AmtR_protein_AmtR_degtagged_2x__protein_RNAP_forward__part_UTR1_forward_part_YFP_forward_part_t16_forward_ => ordered_polymer_complex_part_P_PhlF_protein_RNAP_forward__complex_part_P_AmtR_protein_AmtR_degtagged_2x_forward__part_UTR1_forward_part_YFP_forward_part_t16_forward_ + protein_RNAP; ku__transcription_mm*ordered_polymer_complex_part_P_PhlF_protein_RNAP_forward__complex_complex_part_P_AmtR_protein_AmtR_degtagged_2x__protein_RNAP_forward__part_UTR1_forward_part_YFP_forward_part_t16_forward_;
  r152: ordered_polymer_complex_part_P_PhlF_protein_RNAP_forward__complex_complex_part_P_AmtR_protein_AmtR_degtagged_2x__protein_RNAP_forward__part_UTR1_forward_part_YFP_forward_part_t16_forward_ => ordered_polymer_complex_part_P_PhlF_protein_RNAP_forward__complex_part_P_AmtR_protein_AmtR_degtagged_2x_forward__part_UTR1_forward_part_YFP_forward_part_t16_forward_ + rna_part_UTR1_forward_part_YFP_forward_part_t16_forward_ + protein_RNAP; ktx__transcription_mm*ordered_polymer_complex_part_P_PhlF_protein_RNAP_forward__complex_complex_part_P_AmtR_protein_AmtR_degtagged_2x__protein_RNAP_forward__part_UTR1_forward_part_YFP_forward_part_t16_forward_;
  r153: ordered_polymer_part_P_PhlF_forward_complex_complex_part_P_AmtR_protein_AmtR_degtagged_2x__protein_RNAP_forward__part_UTR1_forward_part_YFP_forward_part_t16_forward_ + protein_RNAP => ordered_polymer_complex_part_P_PhlF_protein_RNAP_forward__complex_complex_part_P_AmtR_protein_AmtR_degtagged_2x__protein_RNAP_forward__part_UTR1_forward_part_YFP_forward_part_t16_forward_; kb_P_PhlF_leak_transcription_mm*ordered_polymer_part_P_PhlF_forward_complex_complex_part_P_AmtR_protein_AmtR_degtagged_2x__protein_RNAP_forward__part_UTR1_forward_part_YFP_forward_part_t16_forward_*protein_RNAP;
  r153rev: ordered_polymer_complex_part_P_PhlF_protein_RNAP_forward__complex_complex_part_P_AmtR_protein_AmtR_degtagged_2x__protein_RNAP_forward__part_UTR1_forward_part_YFP_forward_part_t16_forward_ => ordered_polymer_part_P_PhlF_forward_complex_complex_part_P_AmtR_protein_AmtR_degtagged_2x__protein_RNAP_forward__part_UTR1_forward_part_YFP_forward_part_t16_forward_ + protein_RNAP; ku_P_PhlF_leak_transcription_mm*ordered_polymer_complex_part_P_PhlF_protein_RNAP_forward__complex_complex_part_P_AmtR_protein_AmtR_degtagged_2x__protein_RNAP_forward__part_UTR1_forward_part_YFP_forward_part_t16_forward_;
  r154: ordered_polymer_complex_part_P_PhlF_protein_RNAP_forward__complex_complex_part_P_AmtR_protein_AmtR_degtagged_2x__protein_RNAP_forward__part_UTR1_forward_part_YFP_forward_part_t16_forward_ => ordered_polymer_part_P_PhlF_forward_complex_complex_part_P_AmtR_protein_AmtR_degtagged_2x__protein_RNAP_forward__part_UTR1_forward_part_YFP_forward_part_t16_forward_ + rna_part_P_AmtR_forward_part_UTR1_forward_part_YFP_forward_part_t16_forward_ + protein_RNAP; ktx_P_PhlF_leak_transcription_mm*ordered_polymer_complex_part_P_PhlF_protein_RNAP_forward__complex_complex_part_P_AmtR_protein_AmtR_degtagged_2x__protein_RNAP_forward__part_UTR1_forward_part_YFP_forward_part_t16_forward_;
  r155: 2 protein_PhlF_degtagged + ordered_polymer_part_P_PhlF_forward_complex_complex_part_P_AmtR_protein_AmtR_degtagged_2x__protein_RNAP_forward__part_UTR1_forward_part_YFP_forward_part_t16_forward_ => ordered_polymer_complex_part_P_PhlF_protein_PhlF_degtagged_2x_forward__complex_complex_part_P_AmtR_protein_AmtR_degtagged_2x__protein_RNAP_forward__part_UTR1_forward_part_YFP_forward_part_t16_forward_; kb__one_step_cooperative_binding*protein_PhlF_degtagged^2*ordered_polymer_part_P_PhlF_forward_complex_complex_part_P_AmtR_protein_AmtR_degtagged_2x__protein_RNAP_forward__part_UTR1_forward_part_YFP_forward_part_t16_forward_;
  r155rev: ordered_polymer_complex_part_P_PhlF_protein_PhlF_degtagged_2x_forward__complex_complex_part_P_AmtR_protein_AmtR_degtagged_2x__protein_RNAP_forward__part_UTR1_forward_part_YFP_forward_part_t16_forward_ => 2 protein_PhlF_degtagged + ordered_polymer_part_P_PhlF_forward_complex_complex_part_P_AmtR_protein_AmtR_degtagged_2x__protein_RNAP_forward__part_UTR1_forward_part_YFP_forward_part_t16_forward_; ku__one_step_cooperative_binding*ordered_polymer_complex_part_P_PhlF_protein_PhlF_degtagged_2x_forward__complex_complex_part_P_AmtR_protein_AmtR_degtagged_2x__protein_RNAP_forward__part_UTR1_forward_part_YFP_forward_part_t16_forward_;
  r156: ordered_polymer_complex_part_P_PhlF_protein_PhlF_degtagged_2x_forward__complex_complex_part_P_AmtR_protein_AmtR_degtagged_2x__protein_RNAP_forward__part_UTR1_forward_part_YFP_forward_part_t16_forward_ + protein_RNAP => ordered_polymer_complex_complex_part_P_PhlF_protein_PhlF_degtagged_2x__protein_RNAP_forward__complex_complex_part_P_AmtR_protein_AmtR_degtagged_2x__protein_RNAP_forward__part_UTR1_forward_part_YFP_forward_part_t16_forward_; kb__transcription_mm*ordered_polymer_complex_part_P_PhlF_protein_PhlF_degtagged_2x_forward__complex_complex_part_P_AmtR_protein_AmtR_degtagged_2x__protein_RNAP_forward__part_UTR1_forward_part_YFP_forward_part_t16_forward_*protein_RNAP;
  r156rev: ordered_polymer_complex_complex_part_P_PhlF_protein_PhlF_degtagged_2x__protein_RNAP_forward__complex_complex_part_P_AmtR_protein_AmtR_degtagged_2x__protein_RNAP_forward__part_UTR1_forward_part_YFP_forward_part_t16_forward_ => ordered_polymer_complex_part_P_PhlF_protein_PhlF_degtagged_2x_forward__complex_complex_part_P_AmtR_protein_AmtR_degtagged_2x__protein_RNAP_forward__part_UTR1_forward_part_YFP_forward_part_t16_forward_ + protein_RNAP; ku__transcription_mm*ordered_polymer_complex_complex_part_P_PhlF_protein_PhlF_degtagged_2x__protein_RNAP_forward__complex_complex_part_P_AmtR_protein_AmtR_degtagged_2x__protein_RNAP_forward__part_UTR1_forward_part_YFP_forward_part_t16_forward_;
  r157: ordered_polymer_complex_complex_part_P_PhlF_protein_PhlF_degtagged_2x__protein_RNAP_forward__complex_complex_part_P_AmtR_protein_AmtR_degtagged_2x__protein_RNAP_forward__part_UTR1_forward_part_YFP_forward_part_t16_forward_ => ordered_polymer_complex_part_P_PhlF_protein_PhlF_degtagged_2x_forward__complex_complex_part_P_AmtR_protein_AmtR_degtagged_2x__protein_RNAP_forward__part_UTR1_forward_part_YFP_forward_part_t16_forward_ + rna_part_P_AmtR_forward_part_UTR1_forward_part_YFP_forward_part_t16_forward_ + protein_RNAP; ktx__transcription_mm*ordered_polymer_complex_complex_part_P_PhlF_protein_PhlF_degtagged_2x__protein_RNAP_forward__complex_complex_part_P_AmtR_protein_AmtR_degtagged_2x__protein_RNAP_forward__part_UTR1_forward_part_YFP_forward_part_t16_forward_;
  r158: ordered_polymer_part_P_PhlF_forward_complex_part_P_AmtR_protein_AmtR_degtagged_2x_forward__part_UTR1_forward_part_YFP_forward_part_t16_forward_ + protein_RNAP => ordered_polymer_complex_part_P_PhlF_protein_RNAP_forward__complex_part_P_AmtR_protein_AmtR_degtagged_2x_forward__part_UTR1_forward_part_YFP_forward_part_t16_forward_; kb_P_PhlF_leak_transcription_mm*ordered_polymer_part_P_PhlF_forward_complex_part_P_AmtR_protein_AmtR_degtagged_2x_forward__part_UTR1_forward_part_YFP_forward_part_t16_forward_*protein_RNAP;
  r158rev: ordered_polymer_complex_part_P_PhlF_protein_RNAP_forward__complex_part_P_AmtR_protein_AmtR_degtagged_2x_forward__part_UTR1_forward_part_YFP_forward_part_t16_forward_ => ordered_polymer_part_P_PhlF_forward_complex_part_P_AmtR_protein_AmtR_degtagged_2x_forward__part_UTR1_forward_part_YFP_forward_part_t16_forward_ + protein_RNAP; ku_P_PhlF_leak_transcription_mm*ordered_polymer_complex_part_P_PhlF_protein_RNAP_forward__complex_part_P_AmtR_protein_AmtR_degtagged_2x_forward__part_UTR1_forward_part_YFP_forward_part_t16_forward_;
  r159: ordered_polymer_complex_part_P_PhlF_protein_RNAP_forward__complex_part_P_AmtR_protein_AmtR_degtagged_2x_forward__part_UTR1_forward_part_YFP_forward_part_t16_forward_ => ordered_polymer_part_P_PhlF_forward_complex_part_P_AmtR_protein_AmtR_degtagged_2x_forward__part_UTR1_forward_part_YFP_forward_part_t16_forward_ + rna_part_P_AmtR_forward_part_UTR1_forward_part_YFP_forward_part_t16_forward_ + protein_RNAP; ktx_P_PhlF_leak_transcription_mm*ordered_polymer_complex_part_P_PhlF_protein_RNAP_forward__complex_part_P_AmtR_protein_AmtR_degtagged_2x_forward__part_UTR1_forward_part_YFP_forward_part_t16_forward_;
  r160: 2 protein_PhlF_degtagged + ordered_polymer_part_P_PhlF_forward_complex_part_P_AmtR_protein_AmtR_degtagged_2x_forward__part_UTR1_forward_part_YFP_forward_part_t16_forward_ => ordered_polymer_complex_part_P_PhlF_protein_PhlF_degtagged_2x_forward__complex_part_P_AmtR_protein_AmtR_degtagged_2x_forward__part_UTR1_forward_part_YFP_forward_part_t16_forward_; kb__one_step_cooperative_binding*protein_PhlF_degtagged^2*ordered_polymer_part_P_PhlF_forward_complex_part_P_AmtR_protein_AmtR_degtagged_2x_forward__part_UTR1_forward_part_YFP_forward_part_t16_forward_;
  r160rev: ordered_polymer_complex_part_P_PhlF_protein_PhlF_degtagged_2x_forward__complex_part_P_AmtR_protein_AmtR_degtagged_2x_forward__part_UTR1_forward_part_YFP_forward_part_t16_forward_ => 2 protein_PhlF_degtagged + ordered_polymer_part_P_PhlF_forward_complex_part_P_AmtR_protein_AmtR_degtagged_2x_forward__part_UTR1_forward_part_YFP_forward_part_t16_forward_; ku__one_step_cooperative_binding*ordered_polymer_complex_part_P_PhlF_protein_PhlF_degtagged_2x_forward__complex_part_P_AmtR_protein_AmtR_degtagged_2x_forward__part_UTR1_forward_part_YFP_forward_part_t16_forward_;
  r161: ordered_polymer_complex_part_P_PhlF_protein_PhlF_degtagged_2x_forward__complex_part_P_AmtR_protein_AmtR_degtagged_2x_forward__part_UTR1_forward_part_YFP_forward_part_t16_forward_ + protein_RNAP => ordered_polymer_complex_complex_part_P_PhlF_protein_PhlF_degtagged_2x__protein_RNAP_forward__complex_part_P_AmtR_protein_AmtR_degtagged_2x_forward__part_UTR1_forward_part_YFP_forward_part_t16_forward_; kb__transcription_mm*ordered_polymer_complex_part_P_PhlF_protein_PhlF_degtagged_2x_forward__complex_part_P_AmtR_protein_AmtR_degtagged_2x_forward__part_UTR1_forward_part_YFP_forward_part_t16_forward_*protein_RNAP;
  r161rev: ordered_polymer_complex_complex_part_P_PhlF_protein_PhlF_degtagged_2x__protein_RNAP_forward__complex_part_P_AmtR_protein_AmtR_degtagged_2x_forward__part_UTR1_forward_part_YFP_forward_part_t16_forward_ => ordered_polymer_complex_part_P_PhlF_protein_PhlF_degtagged_2x_forward__complex_part_P_AmtR_protein_AmtR_degtagged_2x_forward__part_UTR1_forward_part_YFP_forward_part_t16_forward_ + protein_RNAP; ku__transcription_mm*ordered_polymer_complex_complex_part_P_PhlF_protein_PhlF_degtagged_2x__protein_RNAP_forward__complex_part_P_AmtR_protein_AmtR_degtagged_2x_forward__part_UTR1_forward_part_YFP_forward_part_t16_forward_;
  r162: ordered_polymer_complex_complex_part_P_PhlF_protein_PhlF_degtagged_2x__protein_RNAP_forward__complex_part_P_AmtR_protein_AmtR_degtagged_2x_forward__part_UTR1_forward_part_YFP_forward_part_t16_forward_ => ordered_polymer_complex_part_P_PhlF_protein_PhlF_degtagged_2x_forward__complex_part_P_AmtR_protein_AmtR_degtagged_2x_forward__part_UTR1_forward_part_YFP_forward_part_t16_forward_ + rna_part_P_AmtR_forward_part_UTR1_forward_part_YFP_forward_part_t16_forward_ + protein_RNAP; ktx__transcription_mm*ordered_polymer_complex_complex_part_P_PhlF_protein_PhlF_degtagged_2x__protein_RNAP_forward__complex_part_P_AmtR_protein_AmtR_degtagged_2x_forward__part_UTR1_forward_part_YFP_forward_part_t16_forward_;
  r163: ordered_polymer_part_P_PhlF_forward_complex_part_P_AmtR_protein_RNAP_forward__part_UTR1_forward_part_YFP_forward_part_t16_forward_ + protein_RNAP => ordered_polymer_complex_part_P_PhlF_protein_RNAP_forward__complex_part_P_AmtR_protein_RNAP_forward__part_UTR1_forward_part_YFP_forward_part_t16_forward_; kb_P_PhlF_leak_transcription_mm*ordered_polymer_part_P_PhlF_forward_complex_part_P_AmtR_protein_RNAP_forward__part_UTR1_forward_part_YFP_forward_part_t16_forward_*protein_RNAP;
  r163rev: ordered_polymer_complex_part_P_PhlF_protein_RNAP_forward__complex_part_P_AmtR_protein_RNAP_forward__part_UTR1_forward_part_YFP_forward_part_t16_forward_ => ordered_polymer_part_P_PhlF_forward_complex_part_P_AmtR_protein_RNAP_forward__part_UTR1_forward_part_YFP_forward_part_t16_forward_ + protein_RNAP; ku_P_PhlF_leak_transcription_mm*ordered_polymer_complex_part_P_PhlF_protein_RNAP_forward__complex_part_P_AmtR_protein_RNAP_forward__part_UTR1_forward_part_YFP_forward_part_t16_forward_;
  r164: ordered_polymer_complex_part_P_PhlF_protein_RNAP_forward__complex_part_P_AmtR_protein_RNAP_forward__part_UTR1_forward_part_YFP_forward_part_t16_forward_ => ordered_polymer_part_P_PhlF_forward_complex_part_P_AmtR_protein_RNAP_forward__part_UTR1_forward_part_YFP_forward_part_t16_forward_ + rna_part_P_AmtR_forward_part_UTR1_forward_part_YFP_forward_part_t16_forward_ + protein_RNAP; ktx_P_PhlF_leak_transcription_mm*ordered_polymer_complex_part_P_PhlF_protein_RNAP_forward__complex_part_P_AmtR_protein_RNAP_forward__part_UTR1_forward_part_YFP_forward_part_t16_forward_;
  r165: 2 protein_PhlF_degtagged + ordered_polymer_part_P_PhlF_forward_complex_part_P_AmtR_protein_RNAP_forward__part_UTR1_forward_part_YFP_forward_part_t16_forward_ => ordered_polymer_complex_part_P_PhlF_protein_PhlF_degtagged_2x_forward__complex_part_P_AmtR_protein_RNAP_forward__part_UTR1_forward_part_YFP_forward_part_t16_forward_; kb__one_step_cooperative_binding*protein_PhlF_degtagged^2*ordered_polymer_part_P_PhlF_forward_complex_part_P_AmtR_protein_RNAP_forward__part_UTR1_forward_part_YFP_forward_part_t16_forward_;
  r165rev: ordered_polymer_complex_part_P_PhlF_protein_PhlF_degtagged_2x_forward__complex_part_P_AmtR_protein_RNAP_forward__part_UTR1_forward_part_YFP_forward_part_t16_forward_ => 2 protein_PhlF_degtagged + ordered_polymer_part_P_PhlF_forward_complex_part_P_AmtR_protein_RNAP_forward__part_UTR1_forward_part_YFP_forward_part_t16_forward_; ku__one_step_cooperative_binding*ordered_polymer_complex_part_P_PhlF_protein_PhlF_degtagged_2x_forward__complex_part_P_AmtR_protein_RNAP_forward__part_UTR1_forward_part_YFP_forward_part_t16_forward_;
  r166: ordered_polymer_complex_part_P_PhlF_protein_PhlF_degtagged_2x_forward__complex_part_P_AmtR_protein_RNAP_forward__part_UTR1_forward_part_YFP_forward_part_t16_forward_ + protein_RNAP => ordered_polymer_complex_complex_part_P_PhlF_protein_PhlF_degtagged_2x__protein_RNAP_forward__complex_part_P_AmtR_protein_RNAP_forward__part_UTR1_forward_part_YFP_forward_part_t16_forward_; kb__transcription_mm*ordered_polymer_complex_part_P_PhlF_protein_PhlF_degtagged_2x_forward__complex_part_P_AmtR_protein_RNAP_forward__part_UTR1_forward_part_YFP_forward_part_t16_forward_*protein_RNAP;
  r166rev: ordered_polymer_complex_complex_part_P_PhlF_protein_PhlF_degtagged_2x__protein_RNAP_forward__complex_part_P_AmtR_protein_RNAP_forward__part_UTR1_forward_part_YFP_forward_part_t16_forward_ => ordered_polymer_complex_part_P_PhlF_protein_PhlF_degtagged_2x_forward__complex_part_P_AmtR_protein_RNAP_forward__part_UTR1_forward_part_YFP_forward_part_t16_forward_ + protein_RNAP; ku__transcription_mm*ordered_polymer_complex_complex_part_P_PhlF_protein_PhlF_degtagged_2x__protein_RNAP_forward__complex_part_P_AmtR_protein_RNAP_forward__part_UTR1_forward_part_YFP_forward_part_t16_forward_;
  r167: ordered_polymer_complex_complex_part_P_PhlF_protein_PhlF_degtagged_2x__protein_RNAP_forward__complex_part_P_AmtR_protein_RNAP_forward__part_UTR1_forward_part_YFP_forward_part_t16_forward_ => ordered_polymer_complex_part_P_PhlF_protein_PhlF_degtagged_2x_forward__complex_part_P_AmtR_protein_RNAP_forward__part_UTR1_forward_part_YFP_forward_part_t16_forward_ + rna_part_P_AmtR_forward_part_UTR1_forward_part_YFP_forward_part_t16_forward_ + protein_RNAP; ktx__transcription_mm*ordered_polymer_complex_complex_part_P_PhlF_protein_PhlF_degtagged_2x__protein_RNAP_forward__complex_part_P_AmtR_protein_RNAP_forward__part_UTR1_forward_part_YFP_forward_part_t16_forward_;
  r168: dna_part_P_PhlF_forward_part_P_AmtR_forward_part_UTR1_forward_part_YFP_forward_part_t16_forward_ + protein_RNAP => ordered_polymer_complex_part_P_PhlF_protein_RNAP_forward__part_P_AmtR_forward_part_UTR1_forward_part_YFP_forward_part_t16_forward_; kb_P_PhlF_leak_transcription_mm*dna_part_P_PhlF_forward_part_P_AmtR_forward_part_UTR1_forward_part_YFP_forward_part_t16_forward_*protein_RNAP;
  r168rev: ordered_polymer_complex_part_P_PhlF_protein_RNAP_forward__part_P_AmtR_forward_part_UTR1_forward_part_YFP_forward_part_t16_forward_ => dna_part_P_PhlF_forward_part_P_AmtR_forward_part_UTR1_forward_part_YFP_forward_part_t16_forward_ + protein_RNAP; ku_P_PhlF_leak_transcription_mm*ordered_polymer_complex_part_P_PhlF_protein_RNAP_forward__part_P_AmtR_forward_part_UTR1_forward_part_YFP_forward_part_t16_forward_;
  r169: ordered_polymer_complex_part_P_PhlF_protein_RNAP_forward__part_P_AmtR_forward_part_UTR1_forward_part_YFP_forward_part_t16_forward_ => dna_part_P_PhlF_forward_part_P_AmtR_forward_part_UTR1_forward_part_YFP_forward_part_t16_forward_ + rna_part_P_AmtR_forward_part_UTR1_forward_part_YFP_forward_part_t16_forward_ + protein_RNAP; ktx_P_PhlF_leak_transcription_mm*ordered_polymer_complex_part_P_PhlF_protein_RNAP_forward__part_P_AmtR_forward_part_UTR1_forward_part_YFP_forward_part_t16_forward_;
  r170: 2 protein_PhlF_degtagged + dna_part_P_PhlF_forward_part_P_AmtR_forward_part_UTR1_forward_part_YFP_forward_part_t16_forward_ => ordered_polymer_complex_part_P_PhlF_protein_PhlF_degtagged_2x_forward__part_P_AmtR_forward_part_UTR1_forward_part_YFP_forward_part_t16_forward_; kb__one_step_cooperative_binding*protein_PhlF_degtagged^2*dna_part_P_PhlF_forward_part_P_AmtR_forward_part_UTR1_forward_part_YFP_forward_part_t16_forward_;
  r170rev: ordered_polymer_complex_part_P_PhlF_protein_PhlF_degtagged_2x_forward__part_P_AmtR_forward_part_UTR1_forward_part_YFP_forward_part_t16_forward_ => 2 protein_PhlF_degtagged + dna_part_P_PhlF_forward_part_P_AmtR_forward_part_UTR1_forward_part_YFP_forward_part_t16_forward_; ku__one_step_cooperative_binding*ordered_polymer_complex_part_P_PhlF_protein_PhlF_degtagged_2x_forward__part_P_AmtR_forward_part_UTR1_forward_part_YFP_forward_part_t16_forward_;
  r171: ordered_polymer_complex_part_P_PhlF_protein_PhlF_degtagged_2x_forward__part_P_AmtR_forward_part_UTR1_forward_part_YFP_forward_part_t16_forward_ + protein_RNAP => ordered_polymer_complex_complex_part_P_PhlF_protein_PhlF_degtagged_2x__protein_RNAP_forward__part_P_AmtR_forward_part_UTR1_forward_part_YFP_forward_part_t16_forward_; kb__transcription_mm*ordered_polymer_complex_part_P_PhlF_protein_PhlF_degtagged_2x_forward__part_P_AmtR_forward_part_UTR1_forward_part_YFP_forward_part_t16_forward_*protein_RNAP;
  r171rev: ordered_polymer_complex_complex_part_P_PhlF_protein_PhlF_degtagged_2x__protein_RNAP_forward__part_P_AmtR_forward_part_UTR1_forward_part_YFP_forward_part_t16_forward_ => ordered_polymer_complex_part_P_PhlF_protein_PhlF_degtagged_2x_forward__part_P_AmtR_forward_part_UTR1_forward_part_YFP_forward_part_t16_forward_ + protein_RNAP; ku__transcription_mm*ordered_polymer_complex_complex_part_P_PhlF_protein_PhlF_degtagged_2x__protein_RNAP_forward__part_P_AmtR_forward_part_UTR1_forward_part_YFP_forward_part_t16_forward_;
  r172: ordered_polymer_complex_complex_part_P_PhlF_protein_PhlF_degtagged_2x__protein_RNAP_forward__part_P_AmtR_forward_part_UTR1_forward_part_YFP_forward_part_t16_forward_ => ordered_polymer_complex_part_P_PhlF_protein_PhlF_degtagged_2x_forward__part_P_AmtR_forward_part_UTR1_forward_part_YFP_forward_part_t16_forward_ + rna_part_P_AmtR_forward_part_UTR1_forward_part_YFP_forward_part_t16_forward_ + protein_RNAP; ktx__transcription_mm*ordered_polymer_complex_complex_part_P_PhlF_protein_PhlF_degtagged_2x__protein_RNAP_forward__part_P_AmtR_forward_part_UTR1_forward_part_YFP_forward_part_t16_forward_;
  r173: dna_part_P_PhlF_forward_part_P_AmtR_forward_part_UTR1_forward_part_YFP_forward_part_t16_forward_ + protein_RNAP => ordered_polymer_part_P_PhlF_forward_complex_part_P_AmtR_protein_RNAP_forward__part_UTR1_forward_part_YFP_forward_part_t16_forward_; kb_P_AmtR_leak_transcription_mm*dna_part_P_PhlF_forward_part_P_AmtR_forward_part_UTR1_forward_part_YFP_forward_part_t16_forward_*protein_RNAP;
  r173rev: ordered_polymer_part_P_PhlF_forward_complex_part_P_AmtR_protein_RNAP_forward__part_UTR1_forward_part_YFP_forward_part_t16_forward_ => dna_part_P_PhlF_forward_part_P_AmtR_forward_part_UTR1_forward_part_YFP_forward_part_t16_forward_ + protein_RNAP; ku_P_AmtR_leak_transcription_mm*ordered_polymer_part_P_PhlF_forward_complex_part_P_AmtR_protein_RNAP_forward__part_UTR1_forward_part_YFP_forward_part_t16_forward_;
  r174: ordered_polymer_part_P_PhlF_forward_complex_part_P_AmtR_protein_RNAP_forward__part_UTR1_forward_part_YFP_forward_part_t16_forward_ => dna_part_P_PhlF_forward_part_P_AmtR_forward_part_UTR1_forward_part_YFP_forward_part_t16_forward_ + rna_part_UTR1_forward_part_YFP_forward_part_t16_forward_ + protein_RNAP; ktx_P_AmtR_leak_transcription_mm*ordered_polymer_part_P_PhlF_forward_complex_part_P_AmtR_protein_RNAP_forward__part_UTR1_forward_part_YFP_forward_part_t16_forward_;
  r175: 2 protein_AmtR_degtagged + dna_part_P_PhlF_forward_part_P_AmtR_forward_part_UTR1_forward_part_YFP_forward_part_t16_forward_ => ordered_polymer_part_P_PhlF_forward_complex_part_P_AmtR_protein_AmtR_degtagged_2x_forward__part_UTR1_forward_part_YFP_forward_part_t16_forward_; kb__one_step_cooperative_binding*protein_AmtR_degtagged^2*dna_part_P_PhlF_forward_part_P_AmtR_forward_part_UTR1_forward_part_YFP_forward_part_t16_forward_;
  r175rev: ordered_polymer_part_P_PhlF_forward_complex_part_P_AmtR_protein_AmtR_degtagged_2x_forward__part_UTR1_forward_part_YFP_forward_part_t16_forward_ => 2 protein_AmtR_degtagged + dna_part_P_PhlF_forward_part_P_AmtR_forward_part_UTR1_forward_part_YFP_forward_part_t16_forward_; ku__one_step_cooperative_binding*ordered_polymer_part_P_PhlF_forward_complex_part_P_AmtR_protein_AmtR_degtagged_2x_forward__part_UTR1_forward_part_YFP_forward_part_t16_forward_;
  r176: ordered_polymer_part_P_PhlF_forward_complex_part_P_AmtR_protein_AmtR_degtagged_2x_forward__part_UTR1_forward_part_YFP_forward_part_t16_forward_ + protein_RNAP => ordered_polymer_part_P_PhlF_forward_complex_complex_part_P_AmtR_protein_AmtR_degtagged_2x__protein_RNAP_forward__part_UTR1_forward_part_YFP_forward_part_t16_forward_; kb__transcription_mm*ordered_polymer_part_P_PhlF_forward_complex_part_P_AmtR_protein_AmtR_degtagged_2x_forward__part_UTR1_forward_part_YFP_forward_part_t16_forward_*protein_RNAP;
  r176rev: ordered_polymer_part_P_PhlF_forward_complex_complex_part_P_AmtR_protein_AmtR_degtagged_2x__protein_RNAP_forward__part_UTR1_forward_part_YFP_forward_part_t16_forward_ => ordered_polymer_part_P_PhlF_forward_complex_part_P_AmtR_protein_AmtR_degtagged_2x_forward__part_UTR1_forward_part_YFP_forward_part_t16_forward_ + protein_RNAP; ku__transcription_mm*ordered_polymer_part_P_PhlF_forward_complex_complex_part_P_AmtR_protein_AmtR_degtagged_2x__protein_RNAP_forward__part_UTR1_forward_part_YFP_forward_part_t16_forward_;
  r177: ordered_polymer_part_P_PhlF_forward_complex_complex_part_P_AmtR_protein_AmtR_degtagged_2x__protein_RNAP_forward__part_UTR1_forward_part_YFP_forward_part_t16_forward_ => ordered_polymer_part_P_PhlF_forward_complex_part_P_AmtR_protein_AmtR_degtagged_2x_forward__part_UTR1_forward_part_YFP_forward_part_t16_forward_ + rna_part_UTR1_forward_part_YFP_forward_part_t16_forward_ + protein_RNAP; ktx__transcription_mm*ordered_polymer_part_P_PhlF_forward_complex_complex_part_P_AmtR_protein_AmtR_degtagged_2x__protein_RNAP_forward__part_UTR1_forward_part_YFP_forward_part_t16_forward_;
  r178: rna_part_P_BetI_forward_part_UTR1_forward_part_PhlF_forward_part_t16_forward_ + protein_Ribo => ordered_polymer_part_P_BetI_forward_complex_part_UTR1_protein_Ribo_forward__part_PhlF_forward_part_t16_forward_; kb__*rna_part_P_BetI_forward_part_UTR1_forward_part_PhlF_forward_part_t16_forward_*protein_Ribo;
  r178rev: ordered_polymer_part_P_BetI_forward_complex_part_UTR1_protein_Ribo_forward__part_PhlF_forward_part_t16_forward_ => rna_part_P_BetI_forward_part_UTR1_forward_part_PhlF_forward_part_t16_forward_ + protein_Ribo; ku__*ordered_polymer_part_P_BetI_forward_complex_part_UTR1_protein_Ribo_forward__part_PhlF_forward_part_t16_forward_;
  r179: ordered_polymer_part_P_BetI_forward_complex_part_UTR1_protein_Ribo_forward__part_PhlF_forward_part_t16_forward_ => rna_part_P_BetI_forward_part_UTR1_forward_part_PhlF_forward_part_t16_forward_ + protein_PhlF_degtagged + protein_Ribo; ktl__*ordered_polymer_part_P_BetI_forward_complex_part_UTR1_protein_Ribo_forward__part_PhlF_forward_part_t16_forward_;
  r180: rna_part_UTR1_forward_part_PhlF_forward_part_t16_forward_ + protein_Ribo => ordered_polymer_complex_part_UTR1_protein_Ribo_forward__part_PhlF_forward_part_t16_forward_; kb__*rna_part_UTR1_forward_part_PhlF_forward_part_t16_forward_*protein_Ribo;
  r180rev: ordered_polymer_complex_part_UTR1_protein_Ribo_forward__part_PhlF_forward_part_t16_forward_ => rna_part_UTR1_forward_part_PhlF_forward_part_t16_forward_ + protein_Ribo; ku__*ordered_polymer_complex_part_UTR1_protein_Ribo_forward__part_PhlF_forward_part_t16_forward_;
  r181: ordered_polymer_complex_part_UTR1_protein_Ribo_forward__part_PhlF_forward_part_t16_forward_ => rna_part_UTR1_forward_part_PhlF_forward_part_t16_forward_ + protein_PhlF_degtagged + protein_Ribo; ktl__*ordered_polymer_complex_part_UTR1_protein_Ribo_forward__part_PhlF_forward_part_t16_forward_;
  r182: rna_part_P_Tet_forward_part_UTR1_forward_part_SrpR_forward_part_t16_forward_ + protein_Ribo => ordered_polymer_part_P_Tet_forward_complex_part_UTR1_protein_Ribo_forward__part_SrpR_forward_part_t16_forward_; kb__*rna_part_P_Tet_forward_part_UTR1_forward_part_SrpR_forward_part_t16_forward_*protein_Ribo;
  r182rev: ordered_polymer_part_P_Tet_forward_complex_part_UTR1_protein_Ribo_forward__part_SrpR_forward_part_t16_forward_ => rna_part_P_Tet_forward_part_UTR1_forward_part_SrpR_forward_part_t16_forward_ + protein_Ribo; ku__*ordered_polymer_part_P_Tet_forward_complex_part_UTR1_protein_Ribo_forward__part_SrpR_forward_part_t16_forward_;
  r183: ordered_polymer_part_P_Tet_forward_complex_part_UTR1_protein_Ribo_forward__part_SrpR_forward_part_t16_forward_ => rna_part_P_Tet_forward_part_UTR1_forward_part_SrpR_forward_part_t16_forward_ + protein_SrpR_degtagged + protein_Ribo; ktl__*ordered_polymer_part_P_Tet_forward_complex_part_UTR1_protein_Ribo_forward__part_SrpR_forward_part_t16_forward_;
  r184: rna_part_UTR1_forward_part_SrpR_forward_part_t16_forward_ + protein_Ribo => ordered_polymer_complex_part_UTR1_protein_Ribo_forward__part_SrpR_forward_part_t16_forward_; kb__*rna_part_UTR1_forward_part_SrpR_forward_part_t16_forward_*protein_Ribo;
  r184rev: ordered_polymer_complex_part_UTR1_protein_Ribo_forward__part_SrpR_forward_part_t16_forward_ => rna_part_UTR1_forward_part_SrpR_forward_part_t16_forward_ + protein_Ribo; ku__*ordered_polymer_complex_part_UTR1_protein_Ribo_forward__part_SrpR_forward_part_t16_forward_;
  r185: ordered_polymer_complex_part_UTR1_protein_Ribo_forward__part_SrpR_forward_part_t16_forward_ => rna_part_UTR1_forward_part_SrpR_forward_part_t16_forward_ + protein_SrpR_degtagged + protein_Ribo; ktl__*ordered_polymer_complex_part_UTR1_protein_Ribo_forward__part_SrpR_forward_part_t16_forward_;
  r186: rna_part_P_AmeR_forward_part_UTR1_forward_part_BetI_forward_part_t16_forward_ + protein_Ribo => ordered_polymer_part_P_AmeR_forward_complex_part_UTR1_protein_Ribo_forward__part_BetI_forward_part_t16_forward_; kb__*rna_part_P_AmeR_forward_part_UTR1_forward_part_BetI_forward_part_t16_forward_*protein_Ribo;
  r186rev: ordered_polymer_part_P_AmeR_forward_complex_part_UTR1_protein_Ribo_forward__part_BetI_forward_part_t16_forward_ => rna_part_P_AmeR_forward_part_UTR1_forward_part_BetI_forward_part_t16_forward_ + protein_Ribo; ku__*ordered_polymer_part_P_AmeR_forward_complex_part_UTR1_protein_Ribo_forward__part_BetI_forward_part_t16_forward_;
  r187: ordered_polymer_part_P_AmeR_forward_complex_part_UTR1_protein_Ribo_forward__part_BetI_forward_part_t16_forward_ => rna_part_P_AmeR_forward_part_UTR1_forward_part_BetI_forward_part_t16_forward_ + protein_BetI_degtagged + protein_Ribo; ktl__*ordered_polymer_part_P_AmeR_forward_complex_part_UTR1_protein_Ribo_forward__part_BetI_forward_part_t16_forward_;
  r188: rna_part_UTR1_forward_part_BetI_forward_part_t16_forward_ + protein_Ribo => ordered_polymer_complex_part_UTR1_protein_Ribo_forward__part_BetI_forward_part_t16_forward_; kb__*rna_part_UTR1_forward_part_BetI_forward_part_t16_forward_*protein_Ribo;
  r188rev: ordered_polymer_complex_part_UTR1_protein_Ribo_forward__part_BetI_forward_part_t16_forward_ => rna_part_UTR1_forward_part_BetI_forward_part_t16_forward_ + protein_Ribo; ku__*ordered_polymer_complex_part_UTR1_protein_Ribo_forward__part_BetI_forward_part_t16_forward_;
  r189: ordered_polymer_complex_part_UTR1_protein_Ribo_forward__part_BetI_forward_part_t16_forward_ => rna_part_UTR1_forward_part_BetI_forward_part_t16_forward_ + protein_BetI_degtagged + protein_Ribo; ktl__*ordered_polymer_complex_part_UTR1_protein_Ribo_forward__part_BetI_forward_part_t16_forward_;
  r190: rna_part_UTR1_forward_part_AmeR_forward_part_t16_forward_ + protein_Ribo => ordered_polymer_complex_part_UTR1_protein_Ribo_forward__part_AmeR_forward_part_t16_forward_; kb__*rna_part_UTR1_forward_part_AmeR_forward_part_t16_forward_*protein_Ribo;
  r190rev: ordered_polymer_complex_part_UTR1_protein_Ribo_forward__part_AmeR_forward_part_t16_forward_ => rna_part_UTR1_forward_part_AmeR_forward_part_t16_forward_ + protein_Ribo; ku__*ordered_polymer_complex_part_UTR1_protein_Ribo_forward__part_AmeR_forward_part_t16_forward_;
  r191: ordered_polymer_complex_part_UTR1_protein_Ribo_forward__part_AmeR_forward_part_t16_forward_ => rna_part_UTR1_forward_part_AmeR_forward_part_t16_forward_ + protein_AmeR_degtagged + protein_Ribo; ktl__*ordered_polymer_complex_part_UTR1_protein_Ribo_forward__part_AmeR_forward_part_t16_forward_;
  r192: rna_part_UTR1_forward_part_HlyIIR_forward_part_t16_forward_ + protein_Ribo => ordered_polymer_complex_part_UTR1_protein_Ribo_forward__part_HlyIIR_forward_part_t16_forward_; kb__*rna_part_UTR1_forward_part_HlyIIR_forward_part_t16_forward_*protein_Ribo;
  r192rev: ordered_polymer_complex_part_UTR1_protein_Ribo_forward__part_HlyIIR_forward_part_t16_forward_ => rna_part_UTR1_forward_part_HlyIIR_forward_part_t16_forward_ + protein_Ribo; ku__*ordered_polymer_complex_part_UTR1_protein_Ribo_forward__part_HlyIIR_forward_part_t16_forward_;
  r193: ordered_polymer_complex_part_UTR1_protein_Ribo_forward__part_HlyIIR_forward_part_t16_forward_ => rna_part_UTR1_forward_part_HlyIIR_forward_part_t16_forward_ + protein_HlyIIR_degtagged + protein_Ribo; ktl__*ordered_polymer_complex_part_UTR1_protein_Ribo_forward__part_HlyIIR_forward_part_t16_forward_;
  r194: rna_part_UTR1_forward_part_AmtR_forward_part_t16_forward_ + protein_Ribo => ordered_polymer_complex_part_UTR1_protein_Ribo_forward__part_AmtR_forward_part_t16_forward_; kb__*rna_part_UTR1_forward_part_AmtR_forward_part_t16_forward_*protein_Ribo;
  r194rev: ordered_polymer_complex_part_UTR1_protein_Ribo_forward__part_AmtR_forward_part_t16_forward_ => rna_part_UTR1_forward_part_AmtR_forward_part_t16_forward_ + protein_Ribo; ku__*ordered_polymer_complex_part_UTR1_protein_Ribo_forward__part_AmtR_forward_part_t16_forward_;
  r195: ordered_polymer_complex_part_UTR1_protein_Ribo_forward__part_AmtR_forward_part_t16_forward_ => rna_part_UTR1_forward_part_AmtR_forward_part_t16_forward_ + protein_AmtR_degtagged + protein_Ribo; ktl__*ordered_polymer_complex_part_UTR1_protein_Ribo_forward__part_AmtR_forward_part_t16_forward_;
  r196: rna_part_P_AmtR_forward_part_UTR1_forward_part_YFP_forward_part_t16_forward_ + protein_Ribo => ordered_polymer_part_P_AmtR_forward_complex_part_UTR1_protein_Ribo_forward__part_YFP_forward_part_t16_forward_; kb__*rna_part_P_AmtR_forward_part_UTR1_forward_part_YFP_forward_part_t16_forward_*protein_Ribo;
  r196rev: ordered_polymer_part_P_AmtR_forward_complex_part_UTR1_protein_Ribo_forward__part_YFP_forward_part_t16_forward_ => rna_part_P_AmtR_forward_part_UTR1_forward_part_YFP_forward_part_t16_forward_ + protein_Ribo; ku__*ordered_polymer_part_P_AmtR_forward_complex_part_UTR1_protein_Ribo_forward__part_YFP_forward_part_t16_forward_;
  r197: ordered_polymer_part_P_AmtR_forward_complex_part_UTR1_protein_Ribo_forward__part_YFP_forward_part_t16_forward_ => rna_part_P_AmtR_forward_part_UTR1_forward_part_YFP_forward_part_t16_forward_ + protein_YFP_degtagged + protein_Ribo; ktl__*ordered_polymer_part_P_AmtR_forward_complex_part_UTR1_protein_Ribo_forward__part_YFP_forward_part_t16_forward_;
  r198: rna_part_UTR1_forward_part_YFP_forward_part_t16_forward_ + protein_Ribo => ordered_polymer_complex_part_UTR1_protein_Ribo_forward__part_YFP_forward_part_t16_forward_; kb__*rna_part_UTR1_forward_part_YFP_forward_part_t16_forward_*protein_Ribo;
  r198rev: ordered_polymer_complex_part_UTR1_protein_Ribo_forward__part_YFP_forward_part_t16_forward_ => rna_part_UTR1_forward_part_YFP_forward_part_t16_forward_ + protein_Ribo; ku__*ordered_polymer_complex_part_UTR1_protein_Ribo_forward__part_YFP_forward_part_t16_forward_;
  r199: ordered_polymer_complex_part_UTR1_protein_Ribo_forward__part_YFP_forward_part_t16_forward_ => rna_part_UTR1_forward_part_YFP_forward_part_t16_forward_ + protein_YFP_degtagged + protein_Ribo; ktl__*ordered_polymer_complex_part_UTR1_protein_Ribo_forward__part_YFP_forward_part_t16_forward_;
  r200: protein_PhlF_degtagged + protease => complex_protease_protein_PhlF_degtagged_; kb__*protein_PhlF_degtagged*protease;
  r200rev: complex_protease_protein_PhlF_degtagged_ => protein_PhlF_degtagged + protease; ku__*complex_protease_protein_PhlF_degtagged_;
  r201: complex_protease_protein_PhlF_degtagged_ => protease; kdeg__*complex_protease_protein_PhlF_degtagged_;
  r202: protein_SrpR_degtagged + protease => complex_protease_protein_SrpR_degtagged_; kb__*protein_SrpR_degtagged*protease;
  r202rev: complex_protease_protein_SrpR_degtagged_ => protein_SrpR_degtagged + protease; ku__*complex_protease_protein_SrpR_degtagged_;
  r203: complex_protease_protein_SrpR_degtagged_ => protease; kdeg__*complex_protease_protein_SrpR_degtagged_;
  r204: protein_BetI_degtagged + protease => complex_protease_protein_BetI_degtagged_; kb__*protein_BetI_degtagged*protease;
  r204rev: complex_protease_protein_BetI_degtagged_ => protein_BetI_degtagged + protease; ku__*complex_protease_protein_BetI_degtagged_;
  r205: complex_protease_protein_BetI_degtagged_ => protease; kdeg__*complex_protease_protein_BetI_degtagged_;
  r206: protein_AmeR_degtagged + protease => complex_protease_protein_AmeR_degtagged_; kb__*protein_AmeR_degtagged*protease;
  r206rev: complex_protease_protein_AmeR_degtagged_ => protein_AmeR_degtagged + protease; ku__*complex_protease_protein_AmeR_degtagged_;
  r207: complex_protease_protein_AmeR_degtagged_ => protease; kdeg__*complex_protease_protein_AmeR_degtagged_;
  r208: protein_HlyIIR_degtagged + protease => complex_protease_protein_HlyIIR_degtagged_; kb__*protein_HlyIIR_degtagged*protease;
  r208rev: complex_protease_protein_HlyIIR_degtagged_ => protein_HlyIIR_degtagged + protease; ku__*complex_protease_protein_HlyIIR_degtagged_;
  r209: complex_protease_protein_HlyIIR_degtagged_ => protease; kdeg__*complex_protease_protein_HlyIIR_degtagged_;
  r210: protein_AmtR_degtagged + protease => complex_protease_protein_AmtR_degtagged_; kb__*protein_AmtR_degtagged*protease;
  r210rev: complex_protease_protein_AmtR_degtagged_ => protein_AmtR_degtagged + protease; ku__*complex_protease_protein_AmtR_degtagged_;
  r211: complex_protease_protein_AmtR_degtagged_ => protease; kdeg__*complex_protease_protein_AmtR_degtagged_;
  r212: protein_YFP_degtagged + protease => complex_protease_protein_YFP_degtagged_; kb__*protein_YFP_degtagged*protease;
  r212rev: complex_protease_protein_YFP_degtagged_ => protein_YFP_degtagged + protease; ku__*complex_protease_protein_YFP_degtagged_;
  r213: complex_protease_protein_YFP_degtagged_ => protease; kdeg__*complex_protease_protein_YFP_degtagged_;
  r214: rna_part_UTR1_forward_part_PhlF_forward_part_t16_forward_ + protein_RNAase => complex_protein_RNAase_rna_part_UTR1_forward_part_PhlF_forward_part_t16_forward__; kb__*rna_part_UTR1_forward_part_PhlF_forward_part_t16_forward_*protein_RNAase;
  r214rev: complex_protein_RNAase_rna_part_UTR1_forward_part_PhlF_forward_part_t16_forward__ => rna_part_UTR1_forward_part_PhlF_forward_part_t16_forward_ + protein_RNAase; ku__*complex_protein_RNAase_rna_part_UTR1_forward_part_PhlF_forward_part_t16_forward__;
  r215: complex_protein_RNAase_rna_part_UTR1_forward_part_PhlF_forward_part_t16_forward__ => protein_RNAase; kdeg__*complex_protein_RNAase_rna_part_UTR1_forward_part_PhlF_forward_part_t16_forward__;
  r216: rna_part_P_BetI_forward_part_UTR1_forward_part_PhlF_forward_part_t16_forward_ + protein_RNAase => complex_protein_RNAase_rna_part_P_BetI_forward_part_UTR1_forward_part_PhlF_forward_part_t16_forward__; kb__*rna_part_P_BetI_forward_part_UTR1_forward_part_PhlF_forward_part_t16_forward_*protein_RNAase;
  r216rev: complex_protein_RNAase_rna_part_P_BetI_forward_part_UTR1_forward_part_PhlF_forward_part_t16_forward__ => rna_part_P_BetI_forward_part_UTR1_forward_part_PhlF_forward_part_t16_forward_ + protein_RNAase; ku__*complex_protein_RNAase_rna_part_P_BetI_forward_part_UTR1_forward_part_PhlF_forward_part_t16_forward__;
  r217: complex_protein_RNAase_rna_part_P_BetI_forward_part_UTR1_forward_part_PhlF_forward_part_t16_forward__ => protein_RNAase; kdeg__*complex_protein_RNAase_rna_part_P_BetI_forward_part_UTR1_forward_part_PhlF_forward_part_t16_forward__;
  r218: rna_part_UTR1_forward_part_SrpR_forward_part_t16_forward_ + protein_RNAase => complex_protein_RNAase_rna_part_UTR1_forward_part_SrpR_forward_part_t16_forward__; kb__*rna_part_UTR1_forward_part_SrpR_forward_part_t16_forward_*protein_RNAase;
  r218rev: complex_protein_RNAase_rna_part_UTR1_forward_part_SrpR_forward_part_t16_forward__ => rna_part_UTR1_forward_part_SrpR_forward_part_t16_forward_ + protein_RNAase; ku__*complex_protein_RNAase_rna_part_UTR1_forward_part_SrpR_forward_part_t16_forward__;
  r219: complex_protein_RNAase_rna_part_UTR1_forward_part_SrpR_forward_part_t16_forward__ => protein_RNAase; kdeg__*complex_protein_RNAase_rna_part_UTR1_forward_part_SrpR_forward_part_t16_forward__;
  r220: rna_part_P_Tet_forward_part_UTR1_forward_part_SrpR_forward_part_t16_forward_ + protein_RNAase => complex_protein_RNAase_rna_part_P_Tet_forward_part_UTR1_forward_part_SrpR_forward_part_t16_forward__; kb__*rna_part_P_Tet_forward_part_UTR1_forward_part_SrpR_forward_part_t16_forward_*protein_RNAase;
  r220rev: complex_protein_RNAase_rna_part_P_Tet_forward_part_UTR1_forward_part_SrpR_forward_part_t16_forward__ => rna_part_P_Tet_forward_part_UTR1_forward_part_SrpR_forward_part_t16_forward_ + protein_RNAase; ku__*complex_protein_RNAase_rna_part_P_Tet_forward_part_UTR1_forward_part_SrpR_forward_part_t16_forward__;
  r221: complex_protein_RNAase_rna_part_P_Tet_forward_part_UTR1_forward_part_SrpR_forward_part_t16_forward__ => protein_RNAase; kdeg__*complex_protein_RNAase_rna_part_P_Tet_forward_part_UTR1_forward_part_SrpR_forward_part_t16_forward__;
  r222: rna_part_UTR1_forward_part_BetI_forward_part_t16_forward_ + protein_RNAase => complex_protein_RNAase_rna_part_UTR1_forward_part_BetI_forward_part_t16_forward__; kb__*rna_part_UTR1_forward_part_BetI_forward_part_t16_forward_*protein_RNAase;
  r222rev: complex_protein_RNAase_rna_part_UTR1_forward_part_BetI_forward_part_t16_forward__ => rna_part_UTR1_forward_part_BetI_forward_part_t16_forward_ + protein_RNAase; ku__*complex_protein_RNAase_rna_part_UTR1_forward_part_BetI_forward_part_t16_forward__;
  r223: complex_protein_RNAase_rna_part_UTR1_forward_part_BetI_forward_part_t16_forward__ => protein_RNAase; kdeg__*complex_protein_RNAase_rna_part_UTR1_forward_part_BetI_forward_part_t16_forward__;
  r224: rna_part_P_AmeR_forward_part_UTR1_forward_part_BetI_forward_part_t16_forward_ + protein_RNAase => complex_protein_RNAase_rna_part_P_AmeR_forward_part_UTR1_forward_part_BetI_forward_part_t16_forward__; kb__*rna_part_P_AmeR_forward_part_UTR1_forward_part_BetI_forward_part_t16_forward_*protein_RNAase;
  r224rev: complex_protein_RNAase_rna_part_P_AmeR_forward_part_UTR1_forward_part_BetI_forward_part_t16_forward__ => rna_part_P_AmeR_forward_part_UTR1_forward_part_BetI_forward_part_t16_forward_ + protein_RNAase; ku__*complex_protein_RNAase_rna_part_P_AmeR_forward_part_UTR1_forward_part_BetI_forward_part_t16_forward__;
  r225: complex_protein_RNAase_rna_part_P_AmeR_forward_part_UTR1_forward_part_BetI_forward_part_t16_forward__ => protein_RNAase; kdeg__*complex_protein_RNAase_rna_part_P_AmeR_forward_part_UTR1_forward_part_BetI_forward_part_t16_forward__;
  r226: rna_part_UTR1_forward_part_AmeR_forward_part_t16_forward_ + protein_RNAase => complex_protein_RNAase_rna_part_UTR1_forward_part_AmeR_forward_part_t16_forward__; kb__*rna_part_UTR1_forward_part_AmeR_forward_part_t16_forward_*protein_RNAase;
  r226rev: complex_protein_RNAase_rna_part_UTR1_forward_part_AmeR_forward_part_t16_forward__ => rna_part_UTR1_forward_part_AmeR_forward_part_t16_forward_ + protein_RNAase; ku__*complex_protein_RNAase_rna_part_UTR1_forward_part_AmeR_forward_part_t16_forward__;
  r227: complex_protein_RNAase_rna_part_UTR1_forward_part_AmeR_forward_part_t16_forward__ => protein_RNAase; kdeg__*complex_protein_RNAase_rna_part_UTR1_forward_part_AmeR_forward_part_t16_forward__;
  r228: rna_part_UTR1_forward_part_HlyIIR_forward_part_t16_forward_ + protein_RNAase => complex_protein_RNAase_rna_part_UTR1_forward_part_HlyIIR_forward_part_t16_forward__; kb__*rna_part_UTR1_forward_part_HlyIIR_forward_part_t16_forward_*protein_RNAase;
  r228rev: complex_protein_RNAase_rna_part_UTR1_forward_part_HlyIIR_forward_part_t16_forward__ => rna_part_UTR1_forward_part_HlyIIR_forward_part_t16_forward_ + protein_RNAase; ku__*complex_protein_RNAase_rna_part_UTR1_forward_part_HlyIIR_forward_part_t16_forward__;
  r229: complex_protein_RNAase_rna_part_UTR1_forward_part_HlyIIR_forward_part_t16_forward__ => protein_RNAase; kdeg__*complex_protein_RNAase_rna_part_UTR1_forward_part_HlyIIR_forward_part_t16_forward__;
  r230: rna_part_UTR1_forward_part_AmtR_forward_part_t16_forward_ + protein_RNAase => complex_protein_RNAase_rna_part_UTR1_forward_part_AmtR_forward_part_t16_forward__; kb__*rna_part_UTR1_forward_part_AmtR_forward_part_t16_forward_*protein_RNAase;
  r230rev: complex_protein_RNAase_rna_part_UTR1_forward_part_AmtR_forward_part_t16_forward__ => rna_part_UTR1_forward_part_AmtR_forward_part_t16_forward_ + protein_RNAase; ku__*complex_protein_RNAase_rna_part_UTR1_forward_part_AmtR_forward_part_t16_forward__;
  r231: complex_protein_RNAase_rna_part_UTR1_forward_part_AmtR_forward_part_t16_forward__ => protein_RNAase; kdeg__*complex_protein_RNAase_rna_part_UTR1_forward_part_AmtR_forward_part_t16_forward__;
  r232: rna_part_UTR1_forward_part_YFP_forward_part_t16_forward_ + protein_RNAase => complex_protein_RNAase_rna_part_UTR1_forward_part_YFP_forward_part_t16_forward__; kb__*rna_part_UTR1_forward_part_YFP_forward_part_t16_forward_*protein_RNAase;
  r232rev: complex_protein_RNAase_rna_part_UTR1_forward_part_YFP_forward_part_t16_forward__ => rna_part_UTR1_forward_part_YFP_forward_part_t16_forward_ + protein_RNAase; ku__*complex_protein_RNAase_rna_part_UTR1_forward_part_YFP_forward_part_t16_forward__;
  r233: complex_protein_RNAase_rna_part_UTR1_forward_part_YFP_forward_part_t16_forward__ => protein_RNAase; kdeg__*complex_protein_RNAase_rna_part_UTR1_forward_part_YFP_forward_part_t16_forward__;
  r234: rna_part_P_AmtR_forward_part_UTR1_forward_part_YFP_forward_part_t16_forward_ + protein_RNAase => complex_protein_RNAase_rna_part_P_AmtR_forward_part_UTR1_forward_part_YFP_forward_part_t16_forward__; kb__*rna_part_P_AmtR_forward_part_UTR1_forward_part_YFP_forward_part_t16_forward_*protein_RNAase;
  r234rev: complex_protein_RNAase_rna_part_P_AmtR_forward_part_UTR1_forward_part_YFP_forward_part_t16_forward__ => rna_part_P_AmtR_forward_part_UTR1_forward_part_YFP_forward_part_t16_forward_ + protein_RNAase; ku__*complex_protein_RNAase_rna_part_P_AmtR_forward_part_UTR1_forward_part_YFP_forward_part_t16_forward__;
  r235: complex_protein_RNAase_rna_part_P_AmtR_forward_part_UTR1_forward_part_YFP_forward_part_t16_forward__ => protein_RNAase; kdeg__*complex_protein_RNAase_rna_part_P_AmtR_forward_part_UTR1_forward_part_YFP_forward_part_t16_forward__;

  // Unit definitions:
  unit square_metre = metre^2;
end
