// SBML level 3 version 2

model biocrnpyler_906368()
  // model units - substance: mole, time: second, volume: litre, area: square_metre, length: metre, extent: mole

  // Compartments:
  compartment default = 1e-6;

  // Species:
  species dna_part_P_BAD_forward_part_UTR1_forward_part_AmtR_forward_part_t16_forward_ in default = 0;
  species dna_part_P_AmtR_forward_part_UTR1_forward_part_YFP_forward_part_t16_forward_ in default = 0;
  species Ara in default = 0;
  species AraC in default = 0;
  species complex_Ara_2x_AraC_2x_ in default = 0;
  species protein_RNAP in default = 0;
  species protein_Ribo in default = 0;
  species protein_RNAase in default = 0;
  species ordered_polymer_complex_complex_Ara_2x_AraC_2x__2x_part_P_BAD_forward__part_UTR1_forward_part_AmtR_forward_part_t16_forward_ in default = 0;
  species rna_part_UTR1_forward_part_AmtR_forward_part_t16_forward_ in default = 0;
  species ordered_polymer_complex_complex_complex_Ara_2x_AraC_2x__2x_part_P_BAD__protein_RNAP_forward__part_UTR1_forward_part_AmtR_forward_part_t16_forward_ in default = 0;
  species rna_part_UTR1_forward_part_YFP_forward_part_t16_forward_ in default = 0;
  species ordered_polymer_complex_part_P_AmtR_protein_RNAP_forward__part_UTR1_forward_part_YFP_forward_part_t16_forward_ in default = 0;
  species AmtR in default = 0;
  species ordered_polymer_complex_AmtR_2x_part_P_AmtR_forward__part_UTR1_forward_part_YFP_forward_part_t16_forward_ in default = 0;
  species ordered_polymer_complex_complex_AmtR_2x_part_P_AmtR__protein_RNAP_forward__part_UTR1_forward_part_YFP_forward_part_t16_forward_ in default = 0;
  species ordered_polymer_complex_part_UTR1_protein_Ribo_forward__part_AmtR_forward_part_t16_forward_ in default = 0;
  species protein_AmtR in default = 0;
  species ordered_polymer_complex_part_UTR1_protein_Ribo_forward__part_YFP_forward_part_t16_forward_ in default = 0;
  species protein_YFP in default = 0;
  species complex_protein_RNAase_rna_part_UTR1_forward_part_AmtR_forward_part_t16_forward__ in default = 0;
  species complex_protein_RNAase_rna_part_UTR1_forward_part_YFP_forward_part_t16_forward__ in default = 0;

  // Parameters:
  kb__ = 100;
  ku__ = 1;
  kb__one_step_cooperative_binding = 100;
  ku__one_step_cooperative_binding = 10;
  kb_P_BAD_Ara_2x_AraC_2x_transcription_mm = 100;
  ku_P_BAD_Ara_2x_AraC_2x_transcription_mm = 10;
  ktx_P_BAD_Ara_2x_AraC_2x_transcription_mm = 0.05;
  kb_P_AmtR_leak_transcription_mm = 100;
  ku_P_AmtR_leak_transcription_mm = 10;
  ktx_P_AmtR_leak_transcription_mm = 0.05;
  kb__transcription_mm = 1;
  ku__transcription_mm = 100;
  ktx__transcription_mm = 0.05;
  ktl__ = 0.2;
  kdeg__ = 2;

  // Reactions:
  r0: 2 Ara + 2 AraC => complex_Ara_2x_AraC_2x_; kb__*Ara^2*AraC^2;
  r0rev: complex_Ara_2x_AraC_2x_ => 2 Ara + 2 AraC; ku__*complex_Ara_2x_AraC_2x_;
  r1: 2 complex_Ara_2x_AraC_2x_ + dna_part_P_BAD_forward_part_UTR1_forward_part_AmtR_forward_part_t16_forward_ => ordered_polymer_complex_complex_Ara_2x_AraC_2x__2x_part_P_BAD_forward__part_UTR1_forward_part_AmtR_forward_part_t16_forward_; kb__one_step_cooperative_binding*complex_Ara_2x_AraC_2x_^2*dna_part_P_BAD_forward_part_UTR1_forward_part_AmtR_forward_part_t16_forward_;
  r1rev: ordered_polymer_complex_complex_Ara_2x_AraC_2x__2x_part_P_BAD_forward__part_UTR1_forward_part_AmtR_forward_part_t16_forward_ => 2 complex_Ara_2x_AraC_2x_ + dna_part_P_BAD_forward_part_UTR1_forward_part_AmtR_forward_part_t16_forward_; ku__one_step_cooperative_binding*ordered_polymer_complex_complex_Ara_2x_AraC_2x__2x_part_P_BAD_forward__part_UTR1_forward_part_AmtR_forward_part_t16_forward_;
  r2: ordered_polymer_complex_complex_Ara_2x_AraC_2x__2x_part_P_BAD_forward__part_UTR1_forward_part_AmtR_forward_part_t16_forward_ + protein_RNAP => ordered_polymer_complex_complex_complex_Ara_2x_AraC_2x__2x_part_P_BAD__protein_RNAP_forward__part_UTR1_forward_part_AmtR_forward_part_t16_forward_; kb_P_BAD_Ara_2x_AraC_2x_transcription_mm*ordered_polymer_complex_complex_Ara_2x_AraC_2x__2x_part_P_BAD_forward__part_UTR1_forward_part_AmtR_forward_part_t16_forward_*protein_RNAP;
  r2rev: ordered_polymer_complex_complex_complex_Ara_2x_AraC_2x__2x_part_P_BAD__protein_RNAP_forward__part_UTR1_forward_part_AmtR_forward_part_t16_forward_ => ordered_polymer_complex_complex_Ara_2x_AraC_2x__2x_part_P_BAD_forward__part_UTR1_forward_part_AmtR_forward_part_t16_forward_ + protein_RNAP; ku_P_BAD_Ara_2x_AraC_2x_transcription_mm*ordered_polymer_complex_complex_complex_Ara_2x_AraC_2x__2x_part_P_BAD__protein_RNAP_forward__part_UTR1_forward_part_AmtR_forward_part_t16_forward_;
  r3: ordered_polymer_complex_complex_complex_Ara_2x_AraC_2x__2x_part_P_BAD__protein_RNAP_forward__part_UTR1_forward_part_AmtR_forward_part_t16_forward_ => ordered_polymer_complex_complex_Ara_2x_AraC_2x__2x_part_P_BAD_forward__part_UTR1_forward_part_AmtR_forward_part_t16_forward_ + rna_part_UTR1_forward_part_AmtR_forward_part_t16_forward_ + protein_RNAP; ktx_P_BAD_Ara_2x_AraC_2x_transcription_mm*ordered_polymer_complex_complex_complex_Ara_2x_AraC_2x__2x_part_P_BAD__protein_RNAP_forward__part_UTR1_forward_part_AmtR_forward_part_t16_forward_;
  r4: dna_part_P_AmtR_forward_part_UTR1_forward_part_YFP_forward_part_t16_forward_ + protein_RNAP => ordered_polymer_complex_part_P_AmtR_protein_RNAP_forward__part_UTR1_forward_part_YFP_forward_part_t16_forward_; kb_P_AmtR_leak_transcription_mm*dna_part_P_AmtR_forward_part_UTR1_forward_part_YFP_forward_part_t16_forward_*protein_RNAP;
  r4rev: ordered_polymer_complex_part_P_AmtR_protein_RNAP_forward__part_UTR1_forward_part_YFP_forward_part_t16_forward_ => dna_part_P_AmtR_forward_part_UTR1_forward_part_YFP_forward_part_t16_forward_ + protein_RNAP; ku_P_AmtR_leak_transcription_mm*ordered_polymer_complex_part_P_AmtR_protein_RNAP_forward__part_UTR1_forward_part_YFP_forward_part_t16_forward_;
  r5: ordered_polymer_complex_part_P_AmtR_protein_RNAP_forward__part_UTR1_forward_part_YFP_forward_part_t16_forward_ => dna_part_P_AmtR_forward_part_UTR1_forward_part_YFP_forward_part_t16_forward_ + rna_part_UTR1_forward_part_YFP_forward_part_t16_forward_ + protein_RNAP; ktx_P_AmtR_leak_transcription_mm*ordered_polymer_complex_part_P_AmtR_protein_RNAP_forward__part_UTR1_forward_part_YFP_forward_part_t16_forward_;
  r6: 2 AmtR + dna_part_P_AmtR_forward_part_UTR1_forward_part_YFP_forward_part_t16_forward_ => ordered_polymer_complex_AmtR_2x_part_P_AmtR_forward__part_UTR1_forward_part_YFP_forward_part_t16_forward_; kb__one_step_cooperative_binding*AmtR^2*dna_part_P_AmtR_forward_part_UTR1_forward_part_YFP_forward_part_t16_forward_;
  r6rev: ordered_polymer_complex_AmtR_2x_part_P_AmtR_forward__part_UTR1_forward_part_YFP_forward_part_t16_forward_ => 2 AmtR + dna_part_P_AmtR_forward_part_UTR1_forward_part_YFP_forward_part_t16_forward_; ku__one_step_cooperative_binding*ordered_polymer_complex_AmtR_2x_part_P_AmtR_forward__part_UTR1_forward_part_YFP_forward_part_t16_forward_;
  r7: ordered_polymer_complex_AmtR_2x_part_P_AmtR_forward__part_UTR1_forward_part_YFP_forward_part_t16_forward_ + protein_RNAP => ordered_polymer_complex_complex_AmtR_2x_part_P_AmtR__protein_RNAP_forward__part_UTR1_forward_part_YFP_forward_part_t16_forward_; kb__transcription_mm*ordered_polymer_complex_AmtR_2x_part_P_AmtR_forward__part_UTR1_forward_part_YFP_forward_part_t16_forward_*protein_RNAP;
  r7rev: ordered_polymer_complex_complex_AmtR_2x_part_P_AmtR__protein_RNAP_forward__part_UTR1_forward_part_YFP_forward_part_t16_forward_ => ordered_polymer_complex_AmtR_2x_part_P_AmtR_forward__part_UTR1_forward_part_YFP_forward_part_t16_forward_ + protein_RNAP; ku__transcription_mm*ordered_polymer_complex_complex_AmtR_2x_part_P_AmtR__protein_RNAP_forward__part_UTR1_forward_part_YFP_forward_part_t16_forward_;
  r8: ordered_polymer_complex_complex_AmtR_2x_part_P_AmtR__protein_RNAP_forward__part_UTR1_forward_part_YFP_forward_part_t16_forward_ => ordered_polymer_complex_AmtR_2x_part_P_AmtR_forward__part_UTR1_forward_part_YFP_forward_part_t16_forward_ + rna_part_UTR1_forward_part_YFP_forward_part_t16_forward_ + protein_RNAP; ktx__transcription_mm*ordered_polymer_complex_complex_AmtR_2x_part_P_AmtR__protein_RNAP_forward__part_UTR1_forward_part_YFP_forward_part_t16_forward_;
  r9: rna_part_UTR1_forward_part_AmtR_forward_part_t16_forward_ + protein_Ribo => ordered_polymer_complex_part_UTR1_protein_Ribo_forward__part_AmtR_forward_part_t16_forward_; kb__*rna_part_UTR1_forward_part_AmtR_forward_part_t16_forward_*protein_Ribo;
  r9rev: ordered_polymer_complex_part_UTR1_protein_Ribo_forward__part_AmtR_forward_part_t16_forward_ => rna_part_UTR1_forward_part_AmtR_forward_part_t16_forward_ + protein_Ribo; ku__*ordered_polymer_complex_part_UTR1_protein_Ribo_forward__part_AmtR_forward_part_t16_forward_;
  r10: ordered_polymer_complex_part_UTR1_protein_Ribo_forward__part_AmtR_forward_part_t16_forward_ => rna_part_UTR1_forward_part_AmtR_forward_part_t16_forward_ + protein_AmtR + protein_Ribo; ktl__*ordered_polymer_complex_part_UTR1_protein_Ribo_forward__part_AmtR_forward_part_t16_forward_;
  r11: rna_part_UTR1_forward_part_YFP_forward_part_t16_forward_ + protein_Ribo => ordered_polymer_complex_part_UTR1_protein_Ribo_forward__part_YFP_forward_part_t16_forward_; kb__*rna_part_UTR1_forward_part_YFP_forward_part_t16_forward_*protein_Ribo;
  r11rev: ordered_polymer_complex_part_UTR1_protein_Ribo_forward__part_YFP_forward_part_t16_forward_ => rna_part_UTR1_forward_part_YFP_forward_part_t16_forward_ + protein_Ribo; ku__*ordered_polymer_complex_part_UTR1_protein_Ribo_forward__part_YFP_forward_part_t16_forward_;
  r12: ordered_polymer_complex_part_UTR1_protein_Ribo_forward__part_YFP_forward_part_t16_forward_ => rna_part_UTR1_forward_part_YFP_forward_part_t16_forward_ + protein_YFP + protein_Ribo; ktl__*ordered_polymer_complex_part_UTR1_protein_Ribo_forward__part_YFP_forward_part_t16_forward_;
  r13: rna_part_UTR1_forward_part_AmtR_forward_part_t16_forward_ + protein_RNAase => complex_protein_RNAase_rna_part_UTR1_forward_part_AmtR_forward_part_t16_forward__; kb__*rna_part_UTR1_forward_part_AmtR_forward_part_t16_forward_*protein_RNAase;
  r13rev: complex_protein_RNAase_rna_part_UTR1_forward_part_AmtR_forward_part_t16_forward__ => rna_part_UTR1_forward_part_AmtR_forward_part_t16_forward_ + protein_RNAase; ku__*complex_protein_RNAase_rna_part_UTR1_forward_part_AmtR_forward_part_t16_forward__;
  r14: complex_protein_RNAase_rna_part_UTR1_forward_part_AmtR_forward_part_t16_forward__ => protein_RNAase; kdeg__*complex_protein_RNAase_rna_part_UTR1_forward_part_AmtR_forward_part_t16_forward__;
  r15: rna_part_UTR1_forward_part_YFP_forward_part_t16_forward_ + protein_RNAase => complex_protein_RNAase_rna_part_UTR1_forward_part_YFP_forward_part_t16_forward__; kb__*rna_part_UTR1_forward_part_YFP_forward_part_t16_forward_*protein_RNAase;
  r15rev: complex_protein_RNAase_rna_part_UTR1_forward_part_YFP_forward_part_t16_forward__ => rna_part_UTR1_forward_part_YFP_forward_part_t16_forward_ + protein_RNAase; ku__*complex_protein_RNAase_rna_part_UTR1_forward_part_YFP_forward_part_t16_forward__;
  r16: complex_protein_RNAase_rna_part_UTR1_forward_part_YFP_forward_part_t16_forward__ => protein_RNAase; kdeg__*complex_protein_RNAase_rna_part_UTR1_forward_part_YFP_forward_part_t16_forward__;

  // Unit definitions:
  unit square_metre = metre^2;
end
