// SBML level 3 version 2

model biocrnpyler_98682()
  // model units - substance: mole, time: second, volume: litre, area: square_metre, length: metre, extent: mole

  // Compartments:
  compartment default = 1e-6;

  // Species:
  species dna_main_assembly in default = 0;
  species complex_Ara_2x_AraC_2x_ in default = 0;
  species rna_main_assembly in default = 0;
  species AmtR in default = 0;
  species dna_reporter_assembly in default = 0;
  species rna_reporter_assembly in default = 0;
  species YFP in default = 0;
  species Ara in default = 0;
  species AraC in default = 0;

  // Parameters:
  k__ = 1;
  K__ = 20;
  n__ = 4;
  kleak__ = 0.01;
  ktl__ = 0.2;
  kb__ = 0.05;
  ku__ = 1;
  kdil__ = 0.001;

  // Reactions:
  r0: dna_main_assembly => dna_main_assembly + rna_main_assembly; k__*dna_main_assembly*complex_Ara_2x_AraC_2x_^n__/(K__^n__ + complex_Ara_2x_AraC_2x_^n__);  // modifiers: complex_Ara_2x_AraC_2x_
  r1: dna_main_assembly => dna_main_assembly + rna_main_assembly; kleak__*dna_main_assembly;
  r2: rna_main_assembly => rna_main_assembly + AmtR; ktl__*rna_main_assembly;
  r3: dna_reporter_assembly => dna_reporter_assembly + rna_reporter_assembly; k__*dna_reporter_assembly/(1 + (AmtR/K__)^n__);  // modifiers: AmtR
  r4: dna_reporter_assembly => dna_reporter_assembly + rna_reporter_assembly; kleak__*dna_reporter_assembly;
  r5: rna_reporter_assembly => rna_reporter_assembly + YFP; ktl__*rna_reporter_assembly;
  r6: 2 Ara + 2 AraC => complex_Ara_2x_AraC_2x_; kb__*Ara^2*AraC^2;
  r6rev: complex_Ara_2x_AraC_2x_ => 2 Ara + 2 AraC; ku__*complex_Ara_2x_AraC_2x_;
  r7: rna_main_assembly => ; kdil__*rna_main_assembly;
  r8: rna_reporter_assembly => ; kdil__*rna_reporter_assembly;

  // Unit definitions:
  unit square_metre = metre^2;
end
