// SBML level 3 version 2

model biocrnpyler_795346()
  // model units - substance: mole, time: second, volume: litre, area: square_metre, length: metre, extent: mole

  // Compartments:
  compartment default = 1e-6;

  // Species:
  species dna_part_P_HlyIIR_forward_part_P_AmeR_forward_part_UTR1_forward_part_BetI_forward_part_t16_forward_ in default = 0;
  species dna_part_P_Tac_forward_part_UTR1_forward_part_HlyIIR_forward_part_t16_forward_ in default = 0;
  species dna_part_P_Tet_forward_part_UTR1_forward_part_AmeR_forward_part_t16_forward_ in default = 0;
  species IPTG_input in default = 0;
  species LacI_repressor in default = 0;
  species complex_IPTG_input_2x_LacI_repressor_2x_ in default = 0;
  species aTc_input in default = 0;
  species TetR_repressor in default = 0;
  species complex_TetR_repressor_2x_aTc_input_2x_ in default = 0;
  species protein_RNAP in default = 0;
  species protein_Ribo in default = 0;
  species protein_RNAase in default = 0;
  species ordered_polymer_complex_complex_part_P_HlyIIR_protein_HlyIIR_degtagged_2x__protein_RNAP_machinery_forward__part_P_AmeR_forward_part_UTR1_forward_part_BetI_forward_part_t16_forward_ in default = 0;
  species protein_RNAP_machinery in default = 0;
  species rna_part_UTR1_forward_part_BetI_forward_part_t16_forward_ in default = 0;
  species ordered_polymer_complex_complex_part_P_HlyIIR_protein_HlyIIR_degtagged_2x__protein_RNAP_machinery_forward__complex_part_P_AmeR_protein_RNAP_machinery_forward__part_UTR1_forward_part_BetI_forward_part_t16_forward_ in default = 0;
  species protein_AmeR_degtagged in default = 0;
  species ordered_polymer_complex_complex_part_P_HlyIIR_protein_HlyIIR_degtagged_2x__protein_RNAP_machinery_forward__complex_part_P_AmeR_protein_AmeR_degtagged_2x_forward__part_UTR1_forward_part_BetI_forward_part_t16_forward_ in default = 0;
  species ordered_polymer_complex_complex_part_P_HlyIIR_protein_HlyIIR_degtagged_2x__protein_RNAP_machinery_forward__complex_complex_part_P_AmeR_protein_AmeR_degtagged_2x__protein_RNAP_machinery_forward__part_UTR1_forward_part_BetI_forward_part_t16_forward_ in default = 0;
  species ordered_polymer_complex_part_P_HlyIIR_protein_RNAP_machinery_forward__part_P_AmeR_forward_part_UTR1_forward_part_BetI_forward_part_t16_forward_ in default = 0;
  species ordered_polymer_complex_part_P_HlyIIR_protein_RNAP_machinery_forward__complex_part_P_AmeR_protein_RNAP_machinery_forward__part_UTR1_forward_part_BetI_forward_part_t16_forward_ in default = 0;
  species ordered_polymer_complex_part_P_HlyIIR_protein_RNAP_machinery_forward__complex_part_P_AmeR_protein_AmeR_degtagged_2x_forward__part_UTR1_forward_part_BetI_forward_part_t16_forward_ in default = 0;
  species ordered_polymer_complex_part_P_HlyIIR_protein_RNAP_machinery_forward__complex_complex_part_P_AmeR_protein_AmeR_degtagged_2x__protein_RNAP_machinery_forward__part_UTR1_forward_part_BetI_forward_part_t16_forward_ in default = 0;
  species ordered_polymer_complex_part_P_HlyIIR_protein_HlyIIR_degtagged_2x_forward__part_P_AmeR_forward_part_UTR1_forward_part_BetI_forward_part_t16_forward_ in default = 0;
  species ordered_polymer_complex_part_P_HlyIIR_protein_HlyIIR_degtagged_2x_forward__complex_part_P_AmeR_protein_RNAP_machinery_forward__part_UTR1_forward_part_BetI_forward_part_t16_forward_ in default = 0;
  species ordered_polymer_complex_part_P_HlyIIR_protein_HlyIIR_degtagged_2x_forward__complex_part_P_AmeR_protein_AmeR_degtagged_2x_forward__part_UTR1_forward_part_BetI_forward_part_t16_forward_ in default = 0;
  species ordered_polymer_complex_part_P_HlyIIR_protein_HlyIIR_degtagged_2x_forward__complex_complex_part_P_AmeR_protein_AmeR_degtagged_2x__protein_RNAP_machinery_forward__part_UTR1_forward_part_BetI_forward_part_t16_forward_ in default = 0;
  species ordered_polymer_part_P_HlyIIR_forward_complex_complex_part_P_AmeR_protein_AmeR_degtagged_2x__protein_RNAP_machinery_forward__part_UTR1_forward_part_BetI_forward_part_t16_forward_ in default = 0;
  species rna_part_P_AmeR_forward_part_UTR1_forward_part_BetI_forward_part_t16_forward_ in default = 0;
  species protein_HlyIIR_degtagged in default = 0;
  species ordered_polymer_part_P_HlyIIR_forward_complex_part_P_AmeR_protein_RNAP_machinery_forward__part_UTR1_forward_part_BetI_forward_part_t16_forward_ in default = 0;
  species ordered_polymer_part_P_HlyIIR_forward_complex_part_P_AmeR_protein_AmeR_degtagged_2x_forward__part_UTR1_forward_part_BetI_forward_part_t16_forward_ in default = 0;
  species rna_part_UTR1_forward_part_HlyIIR_forward_part_t16_forward_ in default = 0;
  species ordered_polymer_complex_part_P_Tac_protein_RNAP_machinery_forward__part_UTR1_forward_part_HlyIIR_forward_part_t16_forward_ in default = 0;
  species ordered_polymer_complex_LacI_repressor_2x_part_P_Tac_forward__part_UTR1_forward_part_HlyIIR_forward_part_t16_forward_ in default = 0;
  species ordered_polymer_complex_complex_LacI_repressor_2x_part_P_Tac__protein_RNAP_machinery_forward__part_UTR1_forward_part_HlyIIR_forward_part_t16_forward_ in default = 0;
  species rna_part_UTR1_forward_part_AmeR_forward_part_t16_forward_ in default = 0;
  species ordered_polymer_complex_part_P_Tet_protein_RNAP_machinery_forward__part_UTR1_forward_part_AmeR_forward_part_t16_forward_ in default = 0;
  species ordered_polymer_complex_TetR_repressor_2x_part_P_Tet_forward__part_UTR1_forward_part_AmeR_forward_part_t16_forward_ in default = 0;
  species ordered_polymer_complex_complex_TetR_repressor_2x_part_P_Tet__protein_RNAP_machinery_forward__part_UTR1_forward_part_AmeR_forward_part_t16_forward_ in default = 0;
  species protein_Ribo_machinery in default = 0;
  species ordered_polymer_part_P_AmeR_forward_complex_part_UTR1_protein_Ribo_machinery_forward__part_BetI_forward_part_t16_forward_ in default = 0;
  species BetI_degtagged in default = 0;
  species ordered_polymer_complex_part_UTR1_protein_Ribo_machinery_forward__part_BetI_forward_part_t16_forward_ in default = 0;
  species ordered_polymer_complex_part_UTR1_protein_Ribo_machinery_forward__part_HlyIIR_forward_part_t16_forward_ in default = 0;
  species HlyIIR_degtagged in default = 0;
  species ordered_polymer_complex_part_UTR1_protein_Ribo_machinery_forward__part_AmeR_forward_part_t16_forward_ in default = 0;
  species AmeR_degtagged in default = 0;
  species protease in default = 0;
  species complex_BetI_degtagged_protease_ in default = 0;
  species complex_HlyIIR_degtagged_protease_ in default = 0;
  species complex_AmeR_degtagged_protease_ in default = 0;
  species complex_protein_RNAase_rna_part_UTR1_forward_part_BetI_forward_part_t16_forward__ in default = 0;
  species complex_protein_RNAase_rna_part_P_AmeR_forward_part_UTR1_forward_part_BetI_forward_part_t16_forward__ in default = 0;
  species complex_protein_RNAase_rna_part_UTR1_forward_part_HlyIIR_forward_part_t16_forward__ in default = 0;
  species complex_protein_RNAase_rna_part_UTR1_forward_part_AmeR_forward_part_t16_forward__ in default = 0;

  // Parameters:
  kb__ = 1;
  ku__ = 0.01;
  kb_P_AmeR_leak_transcription = 100;
  ku_P_AmeR_leak_transcription = 1;
  ktx_P_AmeR_leak_transcription = 1;
  kb__one_step_cooperative_binding = 100;
  ku__one_step_cooperative_binding = 5;
  kb__transcription = 0.001;
  ku__transcription = 100;
  ktx__transcription = 1;
  kb_P_HlyIIR_leak_transcription = 100;
  ku_P_HlyIIR_leak_transcription = 1;
  ktx_P_HlyIIR_leak_transcription = 1;
  kb_P_Tac_leak_transcription = 100;
  ku_P_Tac_leak_transcription = 0.001;
  ktx_P_Tac_leak_transcription = 1;
  kb_P_Tet_leak_transcription = 100;
  ku_P_Tet_leak_transcription = 0.001;
  ktx_P_Tet_leak_transcription = 1;
  ktl__ = 0.2;
  kdeg__ = 2;

  // Reactions:
  r0: 2 IPTG_input + 2 LacI_repressor => complex_IPTG_input_2x_LacI_repressor_2x_; kb__*IPTG_input^2*LacI_repressor^2;
  r0rev: complex_IPTG_input_2x_LacI_repressor_2x_ => 2 IPTG_input + 2 LacI_repressor; ku__*complex_IPTG_input_2x_LacI_repressor_2x_;
  r1: 2 aTc_input + 2 TetR_repressor => complex_TetR_repressor_2x_aTc_input_2x_; kb__*aTc_input^2*TetR_repressor^2;
  r1rev: complex_TetR_repressor_2x_aTc_input_2x_ => 2 aTc_input + 2 TetR_repressor; ku__*complex_TetR_repressor_2x_aTc_input_2x_;
  r2: ordered_polymer_complex_complex_part_P_HlyIIR_protein_HlyIIR_degtagged_2x__protein_RNAP_machinery_forward__part_P_AmeR_forward_part_UTR1_forward_part_BetI_forward_part_t16_forward_ + protein_RNAP_machinery => ordered_polymer_complex_complex_part_P_HlyIIR_protein_HlyIIR_degtagged_2x__protein_RNAP_machinery_forward__complex_part_P_AmeR_protein_RNAP_machinery_forward__part_UTR1_forward_part_BetI_forward_part_t16_forward_; kb_P_AmeR_leak_transcription*ordered_polymer_complex_complex_part_P_HlyIIR_protein_HlyIIR_degtagged_2x__protein_RNAP_machinery_forward__part_P_AmeR_forward_part_UTR1_forward_part_BetI_forward_part_t16_forward_*protein_RNAP_machinery;
  r2rev: ordered_polymer_complex_complex_part_P_HlyIIR_protein_HlyIIR_degtagged_2x__protein_RNAP_machinery_forward__complex_part_P_AmeR_protein_RNAP_machinery_forward__part_UTR1_forward_part_BetI_forward_part_t16_forward_ => ordered_polymer_complex_complex_part_P_HlyIIR_protein_HlyIIR_degtagged_2x__protein_RNAP_machinery_forward__part_P_AmeR_forward_part_UTR1_forward_part_BetI_forward_part_t16_forward_ + protein_RNAP_machinery; ku_P_AmeR_leak_transcription*ordered_polymer_complex_complex_part_P_HlyIIR_protein_HlyIIR_degtagged_2x__protein_RNAP_machinery_forward__complex_part_P_AmeR_protein_RNAP_machinery_forward__part_UTR1_forward_part_BetI_forward_part_t16_forward_;
  r3: ordered_polymer_complex_complex_part_P_HlyIIR_protein_HlyIIR_degtagged_2x__protein_RNAP_machinery_forward__complex_part_P_AmeR_protein_RNAP_machinery_forward__part_UTR1_forward_part_BetI_forward_part_t16_forward_ => ordered_polymer_complex_complex_part_P_HlyIIR_protein_HlyIIR_degtagged_2x__protein_RNAP_machinery_forward__part_P_AmeR_forward_part_UTR1_forward_part_BetI_forward_part_t16_forward_ + rna_part_UTR1_forward_part_BetI_forward_part_t16_forward_ + protein_RNAP_machinery; ktx_P_AmeR_leak_transcription*ordered_polymer_complex_complex_part_P_HlyIIR_protein_HlyIIR_degtagged_2x__protein_RNAP_machinery_forward__complex_part_P_AmeR_protein_RNAP_machinery_forward__part_UTR1_forward_part_BetI_forward_part_t16_forward_;
  r4: 2 protein_AmeR_degtagged + ordered_polymer_complex_complex_part_P_HlyIIR_protein_HlyIIR_degtagged_2x__protein_RNAP_machinery_forward__part_P_AmeR_forward_part_UTR1_forward_part_BetI_forward_part_t16_forward_ => ordered_polymer_complex_complex_part_P_HlyIIR_protein_HlyIIR_degtagged_2x__protein_RNAP_machinery_forward__complex_part_P_AmeR_protein_AmeR_degtagged_2x_forward__part_UTR1_forward_part_BetI_forward_part_t16_forward_; kb__one_step_cooperative_binding*protein_AmeR_degtagged^2*ordered_polymer_complex_complex_part_P_HlyIIR_protein_HlyIIR_degtagged_2x__protein_RNAP_machinery_forward__part_P_AmeR_forward_part_UTR1_forward_part_BetI_forward_part_t16_forward_;
  r4rev: ordered_polymer_complex_complex_part_P_HlyIIR_protein_HlyIIR_degtagged_2x__protein_RNAP_machinery_forward__complex_part_P_AmeR_protein_AmeR_degtagged_2x_forward__part_UTR1_forward_part_BetI_forward_part_t16_forward_ => 2 protein_AmeR_degtagged + ordered_polymer_complex_complex_part_P_HlyIIR_protein_HlyIIR_degtagged_2x__protein_RNAP_machinery_forward__part_P_AmeR_forward_part_UTR1_forward_part_BetI_forward_part_t16_forward_; ku__one_step_cooperative_binding*ordered_polymer_complex_complex_part_P_HlyIIR_protein_HlyIIR_degtagged_2x__protein_RNAP_machinery_forward__complex_part_P_AmeR_protein_AmeR_degtagged_2x_forward__part_UTR1_forward_part_BetI_forward_part_t16_forward_;
  r5: ordered_polymer_complex_complex_part_P_HlyIIR_protein_HlyIIR_degtagged_2x__protein_RNAP_machinery_forward__complex_part_P_AmeR_protein_AmeR_degtagged_2x_forward__part_UTR1_forward_part_BetI_forward_part_t16_forward_ + protein_RNAP_machinery => ordered_polymer_complex_complex_part_P_HlyIIR_protein_HlyIIR_degtagged_2x__protein_RNAP_machinery_forward__complex_complex_part_P_AmeR_protein_AmeR_degtagged_2x__protein_RNAP_machinery_forward__part_UTR1_forward_part_BetI_forward_part_t16_forward_; kb__transcription*ordered_polymer_complex_complex_part_P_HlyIIR_protein_HlyIIR_degtagged_2x__protein_RNAP_machinery_forward__complex_part_P_AmeR_protein_AmeR_degtagged_2x_forward__part_UTR1_forward_part_BetI_forward_part_t16_forward_*protein_RNAP_machinery;
  r5rev: ordered_polymer_complex_complex_part_P_HlyIIR_protein_HlyIIR_degtagged_2x__protein_RNAP_machinery_forward__complex_complex_part_P_AmeR_protein_AmeR_degtagged_2x__protein_RNAP_machinery_forward__part_UTR1_forward_part_BetI_forward_part_t16_forward_ => ordered_polymer_complex_complex_part_P_HlyIIR_protein_HlyIIR_degtagged_2x__protein_RNAP_machinery_forward__complex_part_P_AmeR_protein_AmeR_degtagged_2x_forward__part_UTR1_forward_part_BetI_forward_part_t16_forward_ + protein_RNAP_machinery; ku__transcription*ordered_polymer_complex_complex_part_P_HlyIIR_protein_HlyIIR_degtagged_2x__protein_RNAP_machinery_forward__complex_complex_part_P_AmeR_protein_AmeR_degtagged_2x__protein_RNAP_machinery_forward__part_UTR1_forward_part_BetI_forward_part_t16_forward_;
  r6: ordered_polymer_complex_complex_part_P_HlyIIR_protein_HlyIIR_degtagged_2x__protein_RNAP_machinery_forward__complex_complex_part_P_AmeR_protein_AmeR_degtagged_2x__protein_RNAP_machinery_forward__part_UTR1_forward_part_BetI_forward_part_t16_forward_ => ordered_polymer_complex_complex_part_P_HlyIIR_protein_HlyIIR_degtagged_2x__protein_RNAP_machinery_forward__complex_part_P_AmeR_protein_AmeR_degtagged_2x_forward__part_UTR1_forward_part_BetI_forward_part_t16_forward_ + rna_part_UTR1_forward_part_BetI_forward_part_t16_forward_ + protein_RNAP_machinery; ktx__transcription*ordered_polymer_complex_complex_part_P_HlyIIR_protein_HlyIIR_degtagged_2x__protein_RNAP_machinery_forward__complex_complex_part_P_AmeR_protein_AmeR_degtagged_2x__protein_RNAP_machinery_forward__part_UTR1_forward_part_BetI_forward_part_t16_forward_;
  r7: ordered_polymer_complex_part_P_HlyIIR_protein_RNAP_machinery_forward__part_P_AmeR_forward_part_UTR1_forward_part_BetI_forward_part_t16_forward_ + protein_RNAP_machinery => ordered_polymer_complex_part_P_HlyIIR_protein_RNAP_machinery_forward__complex_part_P_AmeR_protein_RNAP_machinery_forward__part_UTR1_forward_part_BetI_forward_part_t16_forward_; kb_P_AmeR_leak_transcription*ordered_polymer_complex_part_P_HlyIIR_protein_RNAP_machinery_forward__part_P_AmeR_forward_part_UTR1_forward_part_BetI_forward_part_t16_forward_*protein_RNAP_machinery;
  r7rev: ordered_polymer_complex_part_P_HlyIIR_protein_RNAP_machinery_forward__complex_part_P_AmeR_protein_RNAP_machinery_forward__part_UTR1_forward_part_BetI_forward_part_t16_forward_ => ordered_polymer_complex_part_P_HlyIIR_protein_RNAP_machinery_forward__part_P_AmeR_forward_part_UTR1_forward_part_BetI_forward_part_t16_forward_ + protein_RNAP_machinery; ku_P_AmeR_leak_transcription*ordered_polymer_complex_part_P_HlyIIR_protein_RNAP_machinery_forward__complex_part_P_AmeR_protein_RNAP_machinery_forward__part_UTR1_forward_part_BetI_forward_part_t16_forward_;
  r8: ordered_polymer_complex_part_P_HlyIIR_protein_RNAP_machinery_forward__complex_part_P_AmeR_protein_RNAP_machinery_forward__part_UTR1_forward_part_BetI_forward_part_t16_forward_ => ordered_polymer_complex_part_P_HlyIIR_protein_RNAP_machinery_forward__part_P_AmeR_forward_part_UTR1_forward_part_BetI_forward_part_t16_forward_ + rna_part_UTR1_forward_part_BetI_forward_part_t16_forward_ + protein_RNAP_machinery; ktx_P_AmeR_leak_transcription*ordered_polymer_complex_part_P_HlyIIR_protein_RNAP_machinery_forward__complex_part_P_AmeR_protein_RNAP_machinery_forward__part_UTR1_forward_part_BetI_forward_part_t16_forward_;
  r9: 2 protein_AmeR_degtagged + ordered_polymer_complex_part_P_HlyIIR_protein_RNAP_machinery_forward__part_P_AmeR_forward_part_UTR1_forward_part_BetI_forward_part_t16_forward_ => ordered_polymer_complex_part_P_HlyIIR_protein_RNAP_machinery_forward__complex_part_P_AmeR_protein_AmeR_degtagged_2x_forward__part_UTR1_forward_part_BetI_forward_part_t16_forward_; kb__one_step_cooperative_binding*protein_AmeR_degtagged^2*ordered_polymer_complex_part_P_HlyIIR_protein_RNAP_machinery_forward__part_P_AmeR_forward_part_UTR1_forward_part_BetI_forward_part_t16_forward_;
  r9rev: ordered_polymer_complex_part_P_HlyIIR_protein_RNAP_machinery_forward__complex_part_P_AmeR_protein_AmeR_degtagged_2x_forward__part_UTR1_forward_part_BetI_forward_part_t16_forward_ => 2 protein_AmeR_degtagged + ordered_polymer_complex_part_P_HlyIIR_protein_RNAP_machinery_forward__part_P_AmeR_forward_part_UTR1_forward_part_BetI_forward_part_t16_forward_; ku__one_step_cooperative_binding*ordered_polymer_complex_part_P_HlyIIR_protein_RNAP_machinery_forward__complex_part_P_AmeR_protein_AmeR_degtagged_2x_forward__part_UTR1_forward_part_BetI_forward_part_t16_forward_;
  r10: ordered_polymer_complex_part_P_HlyIIR_protein_RNAP_machinery_forward__complex_part_P_AmeR_protein_AmeR_degtagged_2x_forward__part_UTR1_forward_part_BetI_forward_part_t16_forward_ + protein_RNAP_machinery => ordered_polymer_complex_part_P_HlyIIR_protein_RNAP_machinery_forward__complex_complex_part_P_AmeR_protein_AmeR_degtagged_2x__protein_RNAP_machinery_forward__part_UTR1_forward_part_BetI_forward_part_t16_forward_; kb__transcription*ordered_polymer_complex_part_P_HlyIIR_protein_RNAP_machinery_forward__complex_part_P_AmeR_protein_AmeR_degtagged_2x_forward__part_UTR1_forward_part_BetI_forward_part_t16_forward_*protein_RNAP_machinery;
  r10rev: ordered_polymer_complex_part_P_HlyIIR_protein_RNAP_machinery_forward__complex_complex_part_P_AmeR_protein_AmeR_degtagged_2x__protein_RNAP_machinery_forward__part_UTR1_forward_part_BetI_forward_part_t16_forward_ => ordered_polymer_complex_part_P_HlyIIR_protein_RNAP_machinery_forward__complex_part_P_AmeR_protein_AmeR_degtagged_2x_forward__part_UTR1_forward_part_BetI_forward_part_t16_forward_ + protein_RNAP_machinery; ku__transcription*ordered_polymer_complex_part_P_HlyIIR_protein_RNAP_machinery_forward__complex_complex_part_P_AmeR_protein_AmeR_degtagged_2x__protein_RNAP_machinery_forward__part_UTR1_forward_part_BetI_forward_part_t16_forward_;
  r11: ordered_polymer_complex_part_P_HlyIIR_protein_RNAP_machinery_forward__complex_complex_part_P_AmeR_protein_AmeR_degtagged_2x__protein_RNAP_machinery_forward__part_UTR1_forward_part_BetI_forward_part_t16_forward_ => ordered_polymer_complex_part_P_HlyIIR_protein_RNAP_machinery_forward__complex_part_P_AmeR_protein_AmeR_degtagged_2x_forward__part_UTR1_forward_part_BetI_forward_part_t16_forward_ + rna_part_UTR1_forward_part_BetI_forward_part_t16_forward_ + protein_RNAP_machinery; ktx__transcription*ordered_polymer_complex_part_P_HlyIIR_protein_RNAP_machinery_forward__complex_complex_part_P_AmeR_protein_AmeR_degtagged_2x__protein_RNAP_machinery_forward__part_UTR1_forward_part_BetI_forward_part_t16_forward_;
  r12: ordered_polymer_complex_part_P_HlyIIR_protein_HlyIIR_degtagged_2x_forward__part_P_AmeR_forward_part_UTR1_forward_part_BetI_forward_part_t16_forward_ + protein_RNAP_machinery => ordered_polymer_complex_part_P_HlyIIR_protein_HlyIIR_degtagged_2x_forward__complex_part_P_AmeR_protein_RNAP_machinery_forward__part_UTR1_forward_part_BetI_forward_part_t16_forward_; kb_P_AmeR_leak_transcription*ordered_polymer_complex_part_P_HlyIIR_protein_HlyIIR_degtagged_2x_forward__part_P_AmeR_forward_part_UTR1_forward_part_BetI_forward_part_t16_forward_*protein_RNAP_machinery;
  r12rev: ordered_polymer_complex_part_P_HlyIIR_protein_HlyIIR_degtagged_2x_forward__complex_part_P_AmeR_protein_RNAP_machinery_forward__part_UTR1_forward_part_BetI_forward_part_t16_forward_ => ordered_polymer_complex_part_P_HlyIIR_protein_HlyIIR_degtagged_2x_forward__part_P_AmeR_forward_part_UTR1_forward_part_BetI_forward_part_t16_forward_ + protein_RNAP_machinery; ku_P_AmeR_leak_transcription*ordered_polymer_complex_part_P_HlyIIR_protein_HlyIIR_degtagged_2x_forward__complex_part_P_AmeR_protein_RNAP_machinery_forward__part_UTR1_forward_part_BetI_forward_part_t16_forward_;
  r13: ordered_polymer_complex_part_P_HlyIIR_protein_HlyIIR_degtagged_2x_forward__complex_part_P_AmeR_protein_RNAP_machinery_forward__part_UTR1_forward_part_BetI_forward_part_t16_forward_ => ordered_polymer_complex_part_P_HlyIIR_protein_HlyIIR_degtagged_2x_forward__part_P_AmeR_forward_part_UTR1_forward_part_BetI_forward_part_t16_forward_ + rna_part_UTR1_forward_part_BetI_forward_part_t16_forward_ + protein_RNAP_machinery; ktx_P_AmeR_leak_transcription*ordered_polymer_complex_part_P_HlyIIR_protein_HlyIIR_degtagged_2x_forward__complex_part_P_AmeR_protein_RNAP_machinery_forward__part_UTR1_forward_part_BetI_forward_part_t16_forward_;
  r14: 2 protein_AmeR_degtagged + ordered_polymer_complex_part_P_HlyIIR_protein_HlyIIR_degtagged_2x_forward__part_P_AmeR_forward_part_UTR1_forward_part_BetI_forward_part_t16_forward_ => ordered_polymer_complex_part_P_HlyIIR_protein_HlyIIR_degtagged_2x_forward__complex_part_P_AmeR_protein_AmeR_degtagged_2x_forward__part_UTR1_forward_part_BetI_forward_part_t16_forward_; kb__one_step_cooperative_binding*protein_AmeR_degtagged^2*ordered_polymer_complex_part_P_HlyIIR_protein_HlyIIR_degtagged_2x_forward__part_P_AmeR_forward_part_UTR1_forward_part_BetI_forward_part_t16_forward_;
  r14rev: ordered_polymer_complex_part_P_HlyIIR_protein_HlyIIR_degtagged_2x_forward__complex_part_P_AmeR_protein_AmeR_degtagged_2x_forward__part_UTR1_forward_part_BetI_forward_part_t16_forward_ => 2 protein_AmeR_degtagged + ordered_polymer_complex_part_P_HlyIIR_protein_HlyIIR_degtagged_2x_forward__part_P_AmeR_forward_part_UTR1_forward_part_BetI_forward_part_t16_forward_; ku__one_step_cooperative_binding*ordered_polymer_complex_part_P_HlyIIR_protein_HlyIIR_degtagged_2x_forward__complex_part_P_AmeR_protein_AmeR_degtagged_2x_forward__part_UTR1_forward_part_BetI_forward_part_t16_forward_;
  r15: ordered_polymer_complex_part_P_HlyIIR_protein_HlyIIR_degtagged_2x_forward__complex_part_P_AmeR_protein_AmeR_degtagged_2x_forward__part_UTR1_forward_part_BetI_forward_part_t16_forward_ + protein_RNAP_machinery => ordered_polymer_complex_part_P_HlyIIR_protein_HlyIIR_degtagged_2x_forward__complex_complex_part_P_AmeR_protein_AmeR_degtagged_2x__protein_RNAP_machinery_forward__part_UTR1_forward_part_BetI_forward_part_t16_forward_; kb__transcription*ordered_polymer_complex_part_P_HlyIIR_protein_HlyIIR_degtagged_2x_forward__complex_part_P_AmeR_protein_AmeR_degtagged_2x_forward__part_UTR1_forward_part_BetI_forward_part_t16_forward_*protein_RNAP_machinery;
  r15rev: ordered_polymer_complex_part_P_HlyIIR_protein_HlyIIR_degtagged_2x_forward__complex_complex_part_P_AmeR_protein_AmeR_degtagged_2x__protein_RNAP_machinery_forward__part_UTR1_forward_part_BetI_forward_part_t16_forward_ => ordered_polymer_complex_part_P_HlyIIR_protein_HlyIIR_degtagged_2x_forward__complex_part_P_AmeR_protein_AmeR_degtagged_2x_forward__part_UTR1_forward_part_BetI_forward_part_t16_forward_ + protein_RNAP_machinery; ku__transcription*ordered_polymer_complex_part_P_HlyIIR_protein_HlyIIR_degtagged_2x_forward__complex_complex_part_P_AmeR_protein_AmeR_degtagged_2x__protein_RNAP_machinery_forward__part_UTR1_forward_part_BetI_forward_part_t16_forward_;
  r16: ordered_polymer_complex_part_P_HlyIIR_protein_HlyIIR_degtagged_2x_forward__complex_complex_part_P_AmeR_protein_AmeR_degtagged_2x__protein_RNAP_machinery_forward__part_UTR1_forward_part_BetI_forward_part_t16_forward_ => ordered_polymer_complex_part_P_HlyIIR_protein_HlyIIR_degtagged_2x_forward__complex_part_P_AmeR_protein_AmeR_degtagged_2x_forward__part_UTR1_forward_part_BetI_forward_part_t16_forward_ + rna_part_UTR1_forward_part_BetI_forward_part_t16_forward_ + protein_RNAP_machinery; ktx__transcription*ordered_polymer_complex_part_P_HlyIIR_protein_HlyIIR_degtagged_2x_forward__complex_complex_part_P_AmeR_protein_AmeR_degtagged_2x__protein_RNAP_machinery_forward__part_UTR1_forward_part_BetI_forward_part_t16_forward_;
  r17: ordered_polymer_part_P_HlyIIR_forward_complex_complex_part_P_AmeR_protein_AmeR_degtagged_2x__protein_RNAP_machinery_forward__part_UTR1_forward_part_BetI_forward_part_t16_forward_ + protein_RNAP_machinery => ordered_polymer_complex_part_P_HlyIIR_protein_RNAP_machinery_forward__complex_complex_part_P_AmeR_protein_AmeR_degtagged_2x__protein_RNAP_machinery_forward__part_UTR1_forward_part_BetI_forward_part_t16_forward_; kb_P_HlyIIR_leak_transcription*ordered_polymer_part_P_HlyIIR_forward_complex_complex_part_P_AmeR_protein_AmeR_degtagged_2x__protein_RNAP_machinery_forward__part_UTR1_forward_part_BetI_forward_part_t16_forward_*protein_RNAP_machinery;
  r17rev: ordered_polymer_complex_part_P_HlyIIR_protein_RNAP_machinery_forward__complex_complex_part_P_AmeR_protein_AmeR_degtagged_2x__protein_RNAP_machinery_forward__part_UTR1_forward_part_BetI_forward_part_t16_forward_ => ordered_polymer_part_P_HlyIIR_forward_complex_complex_part_P_AmeR_protein_AmeR_degtagged_2x__protein_RNAP_machinery_forward__part_UTR1_forward_part_BetI_forward_part_t16_forward_ + protein_RNAP_machinery; ku_P_HlyIIR_leak_transcription*ordered_polymer_complex_part_P_HlyIIR_protein_RNAP_machinery_forward__complex_complex_part_P_AmeR_protein_AmeR_degtagged_2x__protein_RNAP_machinery_forward__part_UTR1_forward_part_BetI_forward_part_t16_forward_;
  r18: ordered_polymer_complex_part_P_HlyIIR_protein_RNAP_machinery_forward__complex_complex_part_P_AmeR_protein_AmeR_degtagged_2x__protein_RNAP_machinery_forward__part_UTR1_forward_part_BetI_forward_part_t16_forward_ => ordered_polymer_part_P_HlyIIR_forward_complex_complex_part_P_AmeR_protein_AmeR_degtagged_2x__protein_RNAP_machinery_forward__part_UTR1_forward_part_BetI_forward_part_t16_forward_ + rna_part_P_AmeR_forward_part_UTR1_forward_part_BetI_forward_part_t16_forward_ + protein_RNAP_machinery; ktx_P_HlyIIR_leak_transcription*ordered_polymer_complex_part_P_HlyIIR_protein_RNAP_machinery_forward__complex_complex_part_P_AmeR_protein_AmeR_degtagged_2x__protein_RNAP_machinery_forward__part_UTR1_forward_part_BetI_forward_part_t16_forward_;
  r19: 2 protein_HlyIIR_degtagged + ordered_polymer_part_P_HlyIIR_forward_complex_complex_part_P_AmeR_protein_AmeR_degtagged_2x__protein_RNAP_machinery_forward__part_UTR1_forward_part_BetI_forward_part_t16_forward_ => ordered_polymer_complex_part_P_HlyIIR_protein_HlyIIR_degtagged_2x_forward__complex_complex_part_P_AmeR_protein_AmeR_degtagged_2x__protein_RNAP_machinery_forward__part_UTR1_forward_part_BetI_forward_part_t16_forward_; kb__one_step_cooperative_binding*protein_HlyIIR_degtagged^2*ordered_polymer_part_P_HlyIIR_forward_complex_complex_part_P_AmeR_protein_AmeR_degtagged_2x__protein_RNAP_machinery_forward__part_UTR1_forward_part_BetI_forward_part_t16_forward_;
  r19rev: ordered_polymer_complex_part_P_HlyIIR_protein_HlyIIR_degtagged_2x_forward__complex_complex_part_P_AmeR_protein_AmeR_degtagged_2x__protein_RNAP_machinery_forward__part_UTR1_forward_part_BetI_forward_part_t16_forward_ => 2 protein_HlyIIR_degtagged + ordered_polymer_part_P_HlyIIR_forward_complex_complex_part_P_AmeR_protein_AmeR_degtagged_2x__protein_RNAP_machinery_forward__part_UTR1_forward_part_BetI_forward_part_t16_forward_; ku__one_step_cooperative_binding*ordered_polymer_complex_part_P_HlyIIR_protein_HlyIIR_degtagged_2x_forward__complex_complex_part_P_AmeR_protein_AmeR_degtagged_2x__protein_RNAP_machinery_forward__part_UTR1_forward_part_BetI_forward_part_t16_forward_;
  r20: ordered_polymer_complex_part_P_HlyIIR_protein_HlyIIR_degtagged_2x_forward__complex_complex_part_P_AmeR_protein_AmeR_degtagged_2x__protein_RNAP_machinery_forward__part_UTR1_forward_part_BetI_forward_part_t16_forward_ + protein_RNAP_machinery => ordered_polymer_complex_complex_part_P_HlyIIR_protein_HlyIIR_degtagged_2x__protein_RNAP_machinery_forward__complex_complex_part_P_AmeR_protein_AmeR_degtagged_2x__protein_RNAP_machinery_forward__part_UTR1_forward_part_BetI_forward_part_t16_forward_; kb__transcription*ordered_polymer_complex_part_P_HlyIIR_protein_HlyIIR_degtagged_2x_forward__complex_complex_part_P_AmeR_protein_AmeR_degtagged_2x__protein_RNAP_machinery_forward__part_UTR1_forward_part_BetI_forward_part_t16_forward_*protein_RNAP_machinery;
  r20rev: ordered_polymer_complex_complex_part_P_HlyIIR_protein_HlyIIR_degtagged_2x__protein_RNAP_machinery_forward__complex_complex_part_P_AmeR_protein_AmeR_degtagged_2x__protein_RNAP_machinery_forward__part_UTR1_forward_part_BetI_forward_part_t16_forward_ => ordered_polymer_complex_part_P_HlyIIR_protein_HlyIIR_degtagged_2x_forward__complex_complex_part_P_AmeR_protein_AmeR_degtagged_2x__protein_RNAP_machinery_forward__part_UTR1_forward_part_BetI_forward_part_t16_forward_ + protein_RNAP_machinery; ku__transcription*ordered_polymer_complex_complex_part_P_HlyIIR_protein_HlyIIR_degtagged_2x__protein_RNAP_machinery_forward__complex_complex_part_P_AmeR_protein_AmeR_degtagged_2x__protein_RNAP_machinery_forward__part_UTR1_forward_part_BetI_forward_part_t16_forward_;
  r21: ordered_polymer_complex_complex_part_P_HlyIIR_protein_HlyIIR_degtagged_2x__protein_RNAP_machinery_forward__complex_complex_part_P_AmeR_protein_AmeR_degtagged_2x__protein_RNAP_machinery_forward__part_UTR1_forward_part_BetI_forward_part_t16_forward_ => ordered_polymer_complex_part_P_HlyIIR_protein_HlyIIR_degtagged_2x_forward__complex_complex_part_P_AmeR_protein_AmeR_degtagged_2x__protein_RNAP_machinery_forward__part_UTR1_forward_part_BetI_forward_part_t16_forward_ + rna_part_P_AmeR_forward_part_UTR1_forward_part_BetI_forward_part_t16_forward_ + protein_RNAP_machinery; ktx__transcription*ordered_polymer_complex_complex_part_P_HlyIIR_protein_HlyIIR_degtagged_2x__protein_RNAP_machinery_forward__complex_complex_part_P_AmeR_protein_AmeR_degtagged_2x__protein_RNAP_machinery_forward__part_UTR1_forward_part_BetI_forward_part_t16_forward_;
  r22: ordered_polymer_part_P_HlyIIR_forward_complex_part_P_AmeR_protein_RNAP_machinery_forward__part_UTR1_forward_part_BetI_forward_part_t16_forward_ + protein_RNAP_machinery => ordered_polymer_complex_part_P_HlyIIR_protein_RNAP_machinery_forward__complex_part_P_AmeR_protein_RNAP_machinery_forward__part_UTR1_forward_part_BetI_forward_part_t16_forward_; kb_P_HlyIIR_leak_transcription*ordered_polymer_part_P_HlyIIR_forward_complex_part_P_AmeR_protein_RNAP_machinery_forward__part_UTR1_forward_part_BetI_forward_part_t16_forward_*protein_RNAP_machinery;
  r22rev: ordered_polymer_complex_part_P_HlyIIR_protein_RNAP_machinery_forward__complex_part_P_AmeR_protein_RNAP_machinery_forward__part_UTR1_forward_part_BetI_forward_part_t16_forward_ => ordered_polymer_part_P_HlyIIR_forward_complex_part_P_AmeR_protein_RNAP_machinery_forward__part_UTR1_forward_part_BetI_forward_part_t16_forward_ + protein_RNAP_machinery; ku_P_HlyIIR_leak_transcription*ordered_polymer_complex_part_P_HlyIIR_protein_RNAP_machinery_forward__complex_part_P_AmeR_protein_RNAP_machinery_forward__part_UTR1_forward_part_BetI_forward_part_t16_forward_;
  r23: ordered_polymer_complex_part_P_HlyIIR_protein_RNAP_machinery_forward__complex_part_P_AmeR_protein_RNAP_machinery_forward__part_UTR1_forward_part_BetI_forward_part_t16_forward_ => ordered_polymer_part_P_HlyIIR_forward_complex_part_P_AmeR_protein_RNAP_machinery_forward__part_UTR1_forward_part_BetI_forward_part_t16_forward_ + rna_part_P_AmeR_forward_part_UTR1_forward_part_BetI_forward_part_t16_forward_ + protein_RNAP_machinery; ktx_P_HlyIIR_leak_transcription*ordered_polymer_complex_part_P_HlyIIR_protein_RNAP_machinery_forward__complex_part_P_AmeR_protein_RNAP_machinery_forward__part_UTR1_forward_part_BetI_forward_part_t16_forward_;
  r24: 2 protein_HlyIIR_degtagged + ordered_polymer_part_P_HlyIIR_forward_complex_part_P_AmeR_protein_RNAP_machinery_forward__part_UTR1_forward_part_BetI_forward_part_t16_forward_ => ordered_polymer_complex_part_P_HlyIIR_protein_HlyIIR_degtagged_2x_forward__complex_part_P_AmeR_protein_RNAP_machinery_forward__part_UTR1_forward_part_BetI_forward_part_t16_forward_; kb__one_step_cooperative_binding*protein_HlyIIR_degtagged^2*ordered_polymer_part_P_HlyIIR_forward_complex_part_P_AmeR_protein_RNAP_machinery_forward__part_UTR1_forward_part_BetI_forward_part_t16_forward_;
  r24rev: ordered_polymer_complex_part_P_HlyIIR_protein_HlyIIR_degtagged_2x_forward__complex_part_P_AmeR_protein_RNAP_machinery_forward__part_UTR1_forward_part_BetI_forward_part_t16_forward_ => 2 protein_HlyIIR_degtagged + ordered_polymer_part_P_HlyIIR_forward_complex_part_P_AmeR_protein_RNAP_machinery_forward__part_UTR1_forward_part_BetI_forward_part_t16_forward_; ku__one_step_cooperative_binding*ordered_polymer_complex_part_P_HlyIIR_protein_HlyIIR_degtagged_2x_forward__complex_part_P_AmeR_protein_RNAP_machinery_forward__part_UTR1_forward_part_BetI_forward_part_t16_forward_;
  r25: ordered_polymer_complex_part_P_HlyIIR_protein_HlyIIR_degtagged_2x_forward__complex_part_P_AmeR_protein_RNAP_machinery_forward__part_UTR1_forward_part_BetI_forward_part_t16_forward_ + protein_RNAP_machinery => ordered_polymer_complex_complex_part_P_HlyIIR_protein_HlyIIR_degtagged_2x__protein_RNAP_machinery_forward__complex_part_P_AmeR_protein_RNAP_machinery_forward__part_UTR1_forward_part_BetI_forward_part_t16_forward_; kb__transcription*ordered_polymer_complex_part_P_HlyIIR_protein_HlyIIR_degtagged_2x_forward__complex_part_P_AmeR_protein_RNAP_machinery_forward__part_UTR1_forward_part_BetI_forward_part_t16_forward_*protein_RNAP_machinery;
  r25rev: ordered_polymer_complex_complex_part_P_HlyIIR_protein_HlyIIR_degtagged_2x__protein_RNAP_machinery_forward__complex_part_P_AmeR_protein_RNAP_machinery_forward__part_UTR1_forward_part_BetI_forward_part_t16_forward_ => ordered_polymer_complex_part_P_HlyIIR_protein_HlyIIR_degtagged_2x_forward__complex_part_P_AmeR_protein_RNAP_machinery_forward__part_UTR1_forward_part_BetI_forward_part_t16_forward_ + protein_RNAP_machinery; ku__transcription*ordered_polymer_complex_complex_part_P_HlyIIR_protein_HlyIIR_degtagged_2x__protein_RNAP_machinery_forward__complex_part_P_AmeR_protein_RNAP_machinery_forward__part_UTR1_forward_part_BetI_forward_part_t16_forward_;
  r26: ordered_polymer_complex_complex_part_P_HlyIIR_protein_HlyIIR_degtagged_2x__protein_RNAP_machinery_forward__complex_part_P_AmeR_protein_RNAP_machinery_forward__part_UTR1_forward_part_BetI_forward_part_t16_forward_ => ordered_polymer_complex_part_P_HlyIIR_protein_HlyIIR_degtagged_2x_forward__complex_part_P_AmeR_protein_RNAP_machinery_forward__part_UTR1_forward_part_BetI_forward_part_t16_forward_ + rna_part_P_AmeR_forward_part_UTR1_forward_part_BetI_forward_part_t16_forward_ + protein_RNAP_machinery; ktx__transcription*ordered_polymer_complex_complex_part_P_HlyIIR_protein_HlyIIR_degtagged_2x__protein_RNAP_machinery_forward__complex_part_P_AmeR_protein_RNAP_machinery_forward__part_UTR1_forward_part_BetI_forward_part_t16_forward_;
  r27: ordered_polymer_part_P_HlyIIR_forward_complex_part_P_AmeR_protein_AmeR_degtagged_2x_forward__part_UTR1_forward_part_BetI_forward_part_t16_forward_ + protein_RNAP_machinery => ordered_polymer_complex_part_P_HlyIIR_protein_RNAP_machinery_forward__complex_part_P_AmeR_protein_AmeR_degtagged_2x_forward__part_UTR1_forward_part_BetI_forward_part_t16_forward_; kb_P_HlyIIR_leak_transcription*ordered_polymer_part_P_HlyIIR_forward_complex_part_P_AmeR_protein_AmeR_degtagged_2x_forward__part_UTR1_forward_part_BetI_forward_part_t16_forward_*protein_RNAP_machinery;
  r27rev: ordered_polymer_complex_part_P_HlyIIR_protein_RNAP_machinery_forward__complex_part_P_AmeR_protein_AmeR_degtagged_2x_forward__part_UTR1_forward_part_BetI_forward_part_t16_forward_ => ordered_polymer_part_P_HlyIIR_forward_complex_part_P_AmeR_protein_AmeR_degtagged_2x_forward__part_UTR1_forward_part_BetI_forward_part_t16_forward_ + protein_RNAP_machinery; ku_P_HlyIIR_leak_transcription*ordered_polymer_complex_part_P_HlyIIR_protein_RNAP_machinery_forward__complex_part_P_AmeR_protein_AmeR_degtagged_2x_forward__part_UTR1_forward_part_BetI_forward_part_t16_forward_;
  r28: ordered_polymer_complex_part_P_HlyIIR_protein_RNAP_machinery_forward__complex_part_P_AmeR_protein_AmeR_degtagged_2x_forward__part_UTR1_forward_part_BetI_forward_part_t16_forward_ => ordered_polymer_part_P_HlyIIR_forward_complex_part_P_AmeR_protein_AmeR_degtagged_2x_forward__part_UTR1_forward_part_BetI_forward_part_t16_forward_ + rna_part_P_AmeR_forward_part_UTR1_forward_part_BetI_forward_part_t16_forward_ + protein_RNAP_machinery; ktx_P_HlyIIR_leak_transcription*ordered_polymer_complex_part_P_HlyIIR_protein_RNAP_machinery_forward__complex_part_P_AmeR_protein_AmeR_degtagged_2x_forward__part_UTR1_forward_part_BetI_forward_part_t16_forward_;
  r29: 2 protein_HlyIIR_degtagged + ordered_polymer_part_P_HlyIIR_forward_complex_part_P_AmeR_protein_AmeR_degtagged_2x_forward__part_UTR1_forward_part_BetI_forward_part_t16_forward_ => ordered_polymer_complex_part_P_HlyIIR_protein_HlyIIR_degtagged_2x_forward__complex_part_P_AmeR_protein_AmeR_degtagged_2x_forward__part_UTR1_forward_part_BetI_forward_part_t16_forward_; kb__one_step_cooperative_binding*protein_HlyIIR_degtagged^2*ordered_polymer_part_P_HlyIIR_forward_complex_part_P_AmeR_protein_AmeR_degtagged_2x_forward__part_UTR1_forward_part_BetI_forward_part_t16_forward_;
  r29rev: ordered_polymer_complex_part_P_HlyIIR_protein_HlyIIR_degtagged_2x_forward__complex_part_P_AmeR_protein_AmeR_degtagged_2x_forward__part_UTR1_forward_part_BetI_forward_part_t16_forward_ => 2 protein_HlyIIR_degtagged + ordered_polymer_part_P_HlyIIR_forward_complex_part_P_AmeR_protein_AmeR_degtagged_2x_forward__part_UTR1_forward_part_BetI_forward_part_t16_forward_; ku__one_step_cooperative_binding*ordered_polymer_complex_part_P_HlyIIR_protein_HlyIIR_degtagged_2x_forward__complex_part_P_AmeR_protein_AmeR_degtagged_2x_forward__part_UTR1_forward_part_BetI_forward_part_t16_forward_;
  r30: ordered_polymer_complex_part_P_HlyIIR_protein_HlyIIR_degtagged_2x_forward__complex_part_P_AmeR_protein_AmeR_degtagged_2x_forward__part_UTR1_forward_part_BetI_forward_part_t16_forward_ + protein_RNAP_machinery => ordered_polymer_complex_complex_part_P_HlyIIR_protein_HlyIIR_degtagged_2x__protein_RNAP_machinery_forward__complex_part_P_AmeR_protein_AmeR_degtagged_2x_forward__part_UTR1_forward_part_BetI_forward_part_t16_forward_; kb__transcription*ordered_polymer_complex_part_P_HlyIIR_protein_HlyIIR_degtagged_2x_forward__complex_part_P_AmeR_protein_AmeR_degtagged_2x_forward__part_UTR1_forward_part_BetI_forward_part_t16_forward_*protein_RNAP_machinery;
  r30rev: ordered_polymer_complex_complex_part_P_HlyIIR_protein_HlyIIR_degtagged_2x__protein_RNAP_machinery_forward__complex_part_P_AmeR_protein_AmeR_degtagged_2x_forward__part_UTR1_forward_part_BetI_forward_part_t16_forward_ => ordered_polymer_complex_part_P_HlyIIR_protein_HlyIIR_degtagged_2x_forward__complex_part_P_AmeR_protein_AmeR_degtagged_2x_forward__part_UTR1_forward_part_BetI_forward_part_t16_forward_ + protein_RNAP_machinery; ku__transcription*ordered_polymer_complex_complex_part_P_HlyIIR_protein_HlyIIR_degtagged_2x__protein_RNAP_machinery_forward__complex_part_P_AmeR_protein_AmeR_degtagged_2x_forward__part_UTR1_forward_part_BetI_forward_part_t16_forward_;
  r31: ordered_polymer_complex_complex_part_P_HlyIIR_protein_HlyIIR_degtagged_2x__protein_RNAP_machinery_forward__complex_part_P_AmeR_protein_AmeR_degtagged_2x_forward__part_UTR1_forward_part_BetI_forward_part_t16_forward_ => ordered_polymer_complex_part_P_HlyIIR_protein_HlyIIR_degtagged_2x_forward__complex_part_P_AmeR_protein_AmeR_degtagged_2x_forward__part_UTR1_forward_part_BetI_forward_part_t16_forward_ + rna_part_P_AmeR_forward_part_UTR1_forward_part_BetI_forward_part_t16_forward_ + protein_RNAP_machinery; ktx__transcription*ordered_polymer_complex_complex_part_P_HlyIIR_protein_HlyIIR_degtagged_2x__protein_RNAP_machinery_forward__complex_part_P_AmeR_protein_AmeR_degtagged_2x_forward__part_UTR1_forward_part_BetI_forward_part_t16_forward_;
  r32: dna_part_P_HlyIIR_forward_part_P_AmeR_forward_part_UTR1_forward_part_BetI_forward_part_t16_forward_ + protein_RNAP_machinery => ordered_polymer_complex_part_P_HlyIIR_protein_RNAP_machinery_forward__part_P_AmeR_forward_part_UTR1_forward_part_BetI_forward_part_t16_forward_; kb_P_HlyIIR_leak_transcription*dna_part_P_HlyIIR_forward_part_P_AmeR_forward_part_UTR1_forward_part_BetI_forward_part_t16_forward_*protein_RNAP_machinery;
  r32rev: ordered_polymer_complex_part_P_HlyIIR_protein_RNAP_machinery_forward__part_P_AmeR_forward_part_UTR1_forward_part_BetI_forward_part_t16_forward_ => dna_part_P_HlyIIR_forward_part_P_AmeR_forward_part_UTR1_forward_part_BetI_forward_part_t16_forward_ + protein_RNAP_machinery; ku_P_HlyIIR_leak_transcription*ordered_polymer_complex_part_P_HlyIIR_protein_RNAP_machinery_forward__part_P_AmeR_forward_part_UTR1_forward_part_BetI_forward_part_t16_forward_;
  r33: ordered_polymer_complex_part_P_HlyIIR_protein_RNAP_machinery_forward__part_P_AmeR_forward_part_UTR1_forward_part_BetI_forward_part_t16_forward_ => dna_part_P_HlyIIR_forward_part_P_AmeR_forward_part_UTR1_forward_part_BetI_forward_part_t16_forward_ + rna_part_P_AmeR_forward_part_UTR1_forward_part_BetI_forward_part_t16_forward_ + protein_RNAP_machinery; ktx_P_HlyIIR_leak_transcription*ordered_polymer_complex_part_P_HlyIIR_protein_RNAP_machinery_forward__part_P_AmeR_forward_part_UTR1_forward_part_BetI_forward_part_t16_forward_;
  r34: 2 protein_HlyIIR_degtagged + dna_part_P_HlyIIR_forward_part_P_AmeR_forward_part_UTR1_forward_part_BetI_forward_part_t16_forward_ => ordered_polymer_complex_part_P_HlyIIR_protein_HlyIIR_degtagged_2x_forward__part_P_AmeR_forward_part_UTR1_forward_part_BetI_forward_part_t16_forward_; kb__one_step_cooperative_binding*protein_HlyIIR_degtagged^2*dna_part_P_HlyIIR_forward_part_P_AmeR_forward_part_UTR1_forward_part_BetI_forward_part_t16_forward_;
  r34rev: ordered_polymer_complex_part_P_HlyIIR_protein_HlyIIR_degtagged_2x_forward__part_P_AmeR_forward_part_UTR1_forward_part_BetI_forward_part_t16_forward_ => 2 protein_HlyIIR_degtagged + dna_part_P_HlyIIR_forward_part_P_AmeR_forward_part_UTR1_forward_part_BetI_forward_part_t16_forward_; ku__one_step_cooperative_binding*ordered_polymer_complex_part_P_HlyIIR_protein_HlyIIR_degtagged_2x_forward__part_P_AmeR_forward_part_UTR1_forward_part_BetI_forward_part_t16_forward_;
  r35: ordered_polymer_complex_part_P_HlyIIR_protein_HlyIIR_degtagged_2x_forward__part_P_AmeR_forward_part_UTR1_forward_part_BetI_forward_part_t16_forward_ + protein_RNAP_machinery => ordered_polymer_complex_complex_part_P_HlyIIR_protein_HlyIIR_degtagged_2x__protein_RNAP_machinery_forward__part_P_AmeR_forward_part_UTR1_forward_part_BetI_forward_part_t16_forward_; kb__transcription*ordered_polymer_complex_part_P_HlyIIR_protein_HlyIIR_degtagged_2x_forward__part_P_AmeR_forward_part_UTR1_forward_part_BetI_forward_part_t16_forward_*protein_RNAP_machinery;
  r35rev: ordered_polymer_complex_complex_part_P_HlyIIR_protein_HlyIIR_degtagged_2x__protein_RNAP_machinery_forward__part_P_AmeR_forward_part_UTR1_forward_part_BetI_forward_part_t16_forward_ => ordered_polymer_complex_part_P_HlyIIR_protein_HlyIIR_degtagged_2x_forward__part_P_AmeR_forward_part_UTR1_forward_part_BetI_forward_part_t16_forward_ + protein_RNAP_machinery; ku__transcription*ordered_polymer_complex_complex_part_P_HlyIIR_protein_HlyIIR_degtagged_2x__protein_RNAP_machinery_forward__part_P_AmeR_forward_part_UTR1_forward_part_BetI_forward_part_t16_forward_;
  r36: ordered_polymer_complex_complex_part_P_HlyIIR_protein_HlyIIR_degtagged_2x__protein_RNAP_machinery_forward__part_P_AmeR_forward_part_UTR1_forward_part_BetI_forward_part_t16_forward_ => ordered_polymer_complex_part_P_HlyIIR_protein_HlyIIR_degtagged_2x_forward__part_P_AmeR_forward_part_UTR1_forward_part_BetI_forward_part_t16_forward_ + rna_part_P_AmeR_forward_part_UTR1_forward_part_BetI_forward_part_t16_forward_ + protein_RNAP_machinery; ktx__transcription*ordered_polymer_complex_complex_part_P_HlyIIR_protein_HlyIIR_degtagged_2x__protein_RNAP_machinery_forward__part_P_AmeR_forward_part_UTR1_forward_part_BetI_forward_part_t16_forward_;
  r37: dna_part_P_HlyIIR_forward_part_P_AmeR_forward_part_UTR1_forward_part_BetI_forward_part_t16_forward_ + protein_RNAP_machinery => ordered_polymer_part_P_HlyIIR_forward_complex_part_P_AmeR_protein_RNAP_machinery_forward__part_UTR1_forward_part_BetI_forward_part_t16_forward_; kb_P_AmeR_leak_transcription*dna_part_P_HlyIIR_forward_part_P_AmeR_forward_part_UTR1_forward_part_BetI_forward_part_t16_forward_*protein_RNAP_machinery;
  r37rev: ordered_polymer_part_P_HlyIIR_forward_complex_part_P_AmeR_protein_RNAP_machinery_forward__part_UTR1_forward_part_BetI_forward_part_t16_forward_ => dna_part_P_HlyIIR_forward_part_P_AmeR_forward_part_UTR1_forward_part_BetI_forward_part_t16_forward_ + protein_RNAP_machinery; ku_P_AmeR_leak_transcription*ordered_polymer_part_P_HlyIIR_forward_complex_part_P_AmeR_protein_RNAP_machinery_forward__part_UTR1_forward_part_BetI_forward_part_t16_forward_;
  r38: ordered_polymer_part_P_HlyIIR_forward_complex_part_P_AmeR_protein_RNAP_machinery_forward__part_UTR1_forward_part_BetI_forward_part_t16_forward_ => dna_part_P_HlyIIR_forward_part_P_AmeR_forward_part_UTR1_forward_part_BetI_forward_part_t16_forward_ + rna_part_UTR1_forward_part_BetI_forward_part_t16_forward_ + protein_RNAP_machinery; ktx_P_AmeR_leak_transcription*ordered_polymer_part_P_HlyIIR_forward_complex_part_P_AmeR_protein_RNAP_machinery_forward__part_UTR1_forward_part_BetI_forward_part_t16_forward_;
  r39: 2 protein_AmeR_degtagged + dna_part_P_HlyIIR_forward_part_P_AmeR_forward_part_UTR1_forward_part_BetI_forward_part_t16_forward_ => ordered_polymer_part_P_HlyIIR_forward_complex_part_P_AmeR_protein_AmeR_degtagged_2x_forward__part_UTR1_forward_part_BetI_forward_part_t16_forward_; kb__one_step_cooperative_binding*protein_AmeR_degtagged^2*dna_part_P_HlyIIR_forward_part_P_AmeR_forward_part_UTR1_forward_part_BetI_forward_part_t16_forward_;
  r39rev: ordered_polymer_part_P_HlyIIR_forward_complex_part_P_AmeR_protein_AmeR_degtagged_2x_forward__part_UTR1_forward_part_BetI_forward_part_t16_forward_ => 2 protein_AmeR_degtagged + dna_part_P_HlyIIR_forward_part_P_AmeR_forward_part_UTR1_forward_part_BetI_forward_part_t16_forward_; ku__one_step_cooperative_binding*ordered_polymer_part_P_HlyIIR_forward_complex_part_P_AmeR_protein_AmeR_degtagged_2x_forward__part_UTR1_forward_part_BetI_forward_part_t16_forward_;
  r40: ordered_polymer_part_P_HlyIIR_forward_complex_part_P_AmeR_protein_AmeR_degtagged_2x_forward__part_UTR1_forward_part_BetI_forward_part_t16_forward_ + protein_RNAP_machinery => ordered_polymer_part_P_HlyIIR_forward_complex_complex_part_P_AmeR_protein_AmeR_degtagged_2x__protein_RNAP_machinery_forward__part_UTR1_forward_part_BetI_forward_part_t16_forward_; kb__transcription*ordered_polymer_part_P_HlyIIR_forward_complex_part_P_AmeR_protein_AmeR_degtagged_2x_forward__part_UTR1_forward_part_BetI_forward_part_t16_forward_*protein_RNAP_machinery;
  r40rev: ordered_polymer_part_P_HlyIIR_forward_complex_complex_part_P_AmeR_protein_AmeR_degtagged_2x__protein_RNAP_machinery_forward__part_UTR1_forward_part_BetI_forward_part_t16_forward_ => ordered_polymer_part_P_HlyIIR_forward_complex_part_P_AmeR_protein_AmeR_degtagged_2x_forward__part_UTR1_forward_part_BetI_forward_part_t16_forward_ + protein_RNAP_machinery; ku__transcription*ordered_polymer_part_P_HlyIIR_forward_complex_complex_part_P_AmeR_protein_AmeR_degtagged_2x__protein_RNAP_machinery_forward__part_UTR1_forward_part_BetI_forward_part_t16_forward_;
  r41: ordered_polymer_part_P_HlyIIR_forward_complex_complex_part_P_AmeR_protein_AmeR_degtagged_2x__protein_RNAP_machinery_forward__part_UTR1_forward_part_BetI_forward_part_t16_forward_ => ordered_polymer_part_P_HlyIIR_forward_complex_part_P_AmeR_protein_AmeR_degtagged_2x_forward__part_UTR1_forward_part_BetI_forward_part_t16_forward_ + rna_part_UTR1_forward_part_BetI_forward_part_t16_forward_ + protein_RNAP_machinery; ktx__transcription*ordered_polymer_part_P_HlyIIR_forward_complex_complex_part_P_AmeR_protein_AmeR_degtagged_2x__protein_RNAP_machinery_forward__part_UTR1_forward_part_BetI_forward_part_t16_forward_;
  r42: dna_part_P_Tac_forward_part_UTR1_forward_part_HlyIIR_forward_part_t16_forward_ + protein_RNAP_machinery => ordered_polymer_complex_part_P_Tac_protein_RNAP_machinery_forward__part_UTR1_forward_part_HlyIIR_forward_part_t16_forward_; kb_P_Tac_leak_transcription*dna_part_P_Tac_forward_part_UTR1_forward_part_HlyIIR_forward_part_t16_forward_*protein_RNAP_machinery;
  r42rev: ordered_polymer_complex_part_P_Tac_protein_RNAP_machinery_forward__part_UTR1_forward_part_HlyIIR_forward_part_t16_forward_ => dna_part_P_Tac_forward_part_UTR1_forward_part_HlyIIR_forward_part_t16_forward_ + protein_RNAP_machinery; ku_P_Tac_leak_transcription*ordered_polymer_complex_part_P_Tac_protein_RNAP_machinery_forward__part_UTR1_forward_part_HlyIIR_forward_part_t16_forward_;
  r43: ordered_polymer_complex_part_P_Tac_protein_RNAP_machinery_forward__part_UTR1_forward_part_HlyIIR_forward_part_t16_forward_ => dna_part_P_Tac_forward_part_UTR1_forward_part_HlyIIR_forward_part_t16_forward_ + rna_part_UTR1_forward_part_HlyIIR_forward_part_t16_forward_ + protein_RNAP_machinery; ktx_P_Tac_leak_transcription*ordered_polymer_complex_part_P_Tac_protein_RNAP_machinery_forward__part_UTR1_forward_part_HlyIIR_forward_part_t16_forward_;
  r44: 2 LacI_repressor + dna_part_P_Tac_forward_part_UTR1_forward_part_HlyIIR_forward_part_t16_forward_ => ordered_polymer_complex_LacI_repressor_2x_part_P_Tac_forward__part_UTR1_forward_part_HlyIIR_forward_part_t16_forward_; kb__one_step_cooperative_binding*LacI_repressor^2*dna_part_P_Tac_forward_part_UTR1_forward_part_HlyIIR_forward_part_t16_forward_;
  r44rev: ordered_polymer_complex_LacI_repressor_2x_part_P_Tac_forward__part_UTR1_forward_part_HlyIIR_forward_part_t16_forward_ => 2 LacI_repressor + dna_part_P_Tac_forward_part_UTR1_forward_part_HlyIIR_forward_part_t16_forward_; ku__one_step_cooperative_binding*ordered_polymer_complex_LacI_repressor_2x_part_P_Tac_forward__part_UTR1_forward_part_HlyIIR_forward_part_t16_forward_;
  r45: ordered_polymer_complex_LacI_repressor_2x_part_P_Tac_forward__part_UTR1_forward_part_HlyIIR_forward_part_t16_forward_ + protein_RNAP_machinery => ordered_polymer_complex_complex_LacI_repressor_2x_part_P_Tac__protein_RNAP_machinery_forward__part_UTR1_forward_part_HlyIIR_forward_part_t16_forward_; kb__transcription*ordered_polymer_complex_LacI_repressor_2x_part_P_Tac_forward__part_UTR1_forward_part_HlyIIR_forward_part_t16_forward_*protein_RNAP_machinery;
  r45rev: ordered_polymer_complex_complex_LacI_repressor_2x_part_P_Tac__protein_RNAP_machinery_forward__part_UTR1_forward_part_HlyIIR_forward_part_t16_forward_ => ordered_polymer_complex_LacI_repressor_2x_part_P_Tac_forward__part_UTR1_forward_part_HlyIIR_forward_part_t16_forward_ + protein_RNAP_machinery; ku__transcription*ordered_polymer_complex_complex_LacI_repressor_2x_part_P_Tac__protein_RNAP_machinery_forward__part_UTR1_forward_part_HlyIIR_forward_part_t16_forward_;
  r46: ordered_polymer_complex_complex_LacI_repressor_2x_part_P_Tac__protein_RNAP_machinery_forward__part_UTR1_forward_part_HlyIIR_forward_part_t16_forward_ => ordered_polymer_complex_LacI_repressor_2x_part_P_Tac_forward__part_UTR1_forward_part_HlyIIR_forward_part_t16_forward_ + rna_part_UTR1_forward_part_HlyIIR_forward_part_t16_forward_ + protein_RNAP_machinery; ktx__transcription*ordered_polymer_complex_complex_LacI_repressor_2x_part_P_Tac__protein_RNAP_machinery_forward__part_UTR1_forward_part_HlyIIR_forward_part_t16_forward_;
  r47: dna_part_P_Tet_forward_part_UTR1_forward_part_AmeR_forward_part_t16_forward_ + protein_RNAP_machinery => ordered_polymer_complex_part_P_Tet_protein_RNAP_machinery_forward__part_UTR1_forward_part_AmeR_forward_part_t16_forward_; kb_P_Tet_leak_transcription*dna_part_P_Tet_forward_part_UTR1_forward_part_AmeR_forward_part_t16_forward_*protein_RNAP_machinery;
  r47rev: ordered_polymer_complex_part_P_Tet_protein_RNAP_machinery_forward__part_UTR1_forward_part_AmeR_forward_part_t16_forward_ => dna_part_P_Tet_forward_part_UTR1_forward_part_AmeR_forward_part_t16_forward_ + protein_RNAP_machinery; ku_P_Tet_leak_transcription*ordered_polymer_complex_part_P_Tet_protein_RNAP_machinery_forward__part_UTR1_forward_part_AmeR_forward_part_t16_forward_;
  r48: ordered_polymer_complex_part_P_Tet_protein_RNAP_machinery_forward__part_UTR1_forward_part_AmeR_forward_part_t16_forward_ => dna_part_P_Tet_forward_part_UTR1_forward_part_AmeR_forward_part_t16_forward_ + rna_part_UTR1_forward_part_AmeR_forward_part_t16_forward_ + protein_RNAP_machinery; ktx_P_Tet_leak_transcription*ordered_polymer_complex_part_P_Tet_protein_RNAP_machinery_forward__part_UTR1_forward_part_AmeR_forward_part_t16_forward_;
  r49: 2 TetR_repressor + dna_part_P_Tet_forward_part_UTR1_forward_part_AmeR_forward_part_t16_forward_ => ordered_polymer_complex_TetR_repressor_2x_part_P_Tet_forward__part_UTR1_forward_part_AmeR_forward_part_t16_forward_; kb__one_step_cooperative_binding*TetR_repressor^2*dna_part_P_Tet_forward_part_UTR1_forward_part_AmeR_forward_part_t16_forward_;
  r49rev: ordered_polymer_complex_TetR_repressor_2x_part_P_Tet_forward__part_UTR1_forward_part_AmeR_forward_part_t16_forward_ => 2 TetR_repressor + dna_part_P_Tet_forward_part_UTR1_forward_part_AmeR_forward_part_t16_forward_; ku__one_step_cooperative_binding*ordered_polymer_complex_TetR_repressor_2x_part_P_Tet_forward__part_UTR1_forward_part_AmeR_forward_part_t16_forward_;
  r50: ordered_polymer_complex_TetR_repressor_2x_part_P_Tet_forward__part_UTR1_forward_part_AmeR_forward_part_t16_forward_ + protein_RNAP_machinery => ordered_polymer_complex_complex_TetR_repressor_2x_part_P_Tet__protein_RNAP_machinery_forward__part_UTR1_forward_part_AmeR_forward_part_t16_forward_; kb__transcription*ordered_polymer_complex_TetR_repressor_2x_part_P_Tet_forward__part_UTR1_forward_part_AmeR_forward_part_t16_forward_*protein_RNAP_machinery;
  r50rev: ordered_polymer_complex_complex_TetR_repressor_2x_part_P_Tet__protein_RNAP_machinery_forward__part_UTR1_forward_part_AmeR_forward_part_t16_forward_ => ordered_polymer_complex_TetR_repressor_2x_part_P_Tet_forward__part_UTR1_forward_part_AmeR_forward_part_t16_forward_ + protein_RNAP_machinery; ku__transcription*ordered_polymer_complex_complex_TetR_repressor_2x_part_P_Tet__protein_RNAP_machinery_forward__part_UTR1_forward_part_AmeR_forward_part_t16_forward_;
  r51: ordered_polymer_complex_complex_TetR_repressor_2x_part_P_Tet__protein_RNAP_machinery_forward__part_UTR1_forward_part_AmeR_forward_part_t16_forward_ => ordered_polymer_complex_TetR_repressor_2x_part_P_Tet_forward__part_UTR1_forward_part_AmeR_forward_part_t16_forward_ + rna_part_UTR1_forward_part_AmeR_forward_part_t16_forward_ + protein_RNAP_machinery; ktx__transcription*ordered_polymer_complex_complex_TetR_repressor_2x_part_P_Tet__protein_RNAP_machinery_forward__part_UTR1_forward_part_AmeR_forward_part_t16_forward_;
  r52: rna_part_P_AmeR_forward_part_UTR1_forward_part_BetI_forward_part_t16_forward_ + protein_Ribo_machinery => ordered_polymer_part_P_AmeR_forward_complex_part_UTR1_protein_Ribo_machinery_forward__part_BetI_forward_part_t16_forward_; kb__*rna_part_P_AmeR_forward_part_UTR1_forward_part_BetI_forward_part_t16_forward_*protein_Ribo_machinery;
  r52rev: ordered_polymer_part_P_AmeR_forward_complex_part_UTR1_protein_Ribo_machinery_forward__part_BetI_forward_part_t16_forward_ => rna_part_P_AmeR_forward_part_UTR1_forward_part_BetI_forward_part_t16_forward_ + protein_Ribo_machinery; ku__*ordered_polymer_part_P_AmeR_forward_complex_part_UTR1_protein_Ribo_machinery_forward__part_BetI_forward_part_t16_forward_;
  r53: ordered_polymer_part_P_AmeR_forward_complex_part_UTR1_protein_Ribo_machinery_forward__part_BetI_forward_part_t16_forward_ => rna_part_P_AmeR_forward_part_UTR1_forward_part_BetI_forward_part_t16_forward_ + BetI_degtagged + protein_Ribo_machinery; ktl__*ordered_polymer_part_P_AmeR_forward_complex_part_UTR1_protein_Ribo_machinery_forward__part_BetI_forward_part_t16_forward_;
  r54: rna_part_UTR1_forward_part_BetI_forward_part_t16_forward_ + protein_Ribo_machinery => ordered_polymer_complex_part_UTR1_protein_Ribo_machinery_forward__part_BetI_forward_part_t16_forward_; kb__*rna_part_UTR1_forward_part_BetI_forward_part_t16_forward_*protein_Ribo_machinery;
  r54rev: ordered_polymer_complex_part_UTR1_protein_Ribo_machinery_forward__part_BetI_forward_part_t16_forward_ => rna_part_UTR1_forward_part_BetI_forward_part_t16_forward_ + protein_Ribo_machinery; ku__*ordered_polymer_complex_part_UTR1_protein_Ribo_machinery_forward__part_BetI_forward_part_t16_forward_;
  r55: ordered_polymer_complex_part_UTR1_protein_Ribo_machinery_forward__part_BetI_forward_part_t16_forward_ => rna_part_UTR1_forward_part_BetI_forward_part_t16_forward_ + BetI_degtagged + protein_Ribo_machinery; ktl__*ordered_polymer_complex_part_UTR1_protein_Ribo_machinery_forward__part_BetI_forward_part_t16_forward_;
  r56: rna_part_UTR1_forward_part_HlyIIR_forward_part_t16_forward_ + protein_Ribo_machinery => ordered_polymer_complex_part_UTR1_protein_Ribo_machinery_forward__part_HlyIIR_forward_part_t16_forward_; kb__*rna_part_UTR1_forward_part_HlyIIR_forward_part_t16_forward_*protein_Ribo_machinery;
  r56rev: ordered_polymer_complex_part_UTR1_protein_Ribo_machinery_forward__part_HlyIIR_forward_part_t16_forward_ => rna_part_UTR1_forward_part_HlyIIR_forward_part_t16_forward_ + protein_Ribo_machinery; ku__*ordered_polymer_complex_part_UTR1_protein_Ribo_machinery_forward__part_HlyIIR_forward_part_t16_forward_;
  r57: ordered_polymer_complex_part_UTR1_protein_Ribo_machinery_forward__part_HlyIIR_forward_part_t16_forward_ => rna_part_UTR1_forward_part_HlyIIR_forward_part_t16_forward_ + HlyIIR_degtagged + protein_Ribo_machinery; ktl__*ordered_polymer_complex_part_UTR1_protein_Ribo_machinery_forward__part_HlyIIR_forward_part_t16_forward_;
  r58: rna_part_UTR1_forward_part_AmeR_forward_part_t16_forward_ + protein_Ribo_machinery => ordered_polymer_complex_part_UTR1_protein_Ribo_machinery_forward__part_AmeR_forward_part_t16_forward_; kb__*rna_part_UTR1_forward_part_AmeR_forward_part_t16_forward_*protein_Ribo_machinery;
  r58rev: ordered_polymer_complex_part_UTR1_protein_Ribo_machinery_forward__part_AmeR_forward_part_t16_forward_ => rna_part_UTR1_forward_part_AmeR_forward_part_t16_forward_ + protein_Ribo_machinery; ku__*ordered_polymer_complex_part_UTR1_protein_Ribo_machinery_forward__part_AmeR_forward_part_t16_forward_;
  r59: ordered_polymer_complex_part_UTR1_protein_Ribo_machinery_forward__part_AmeR_forward_part_t16_forward_ => rna_part_UTR1_forward_part_AmeR_forward_part_t16_forward_ + AmeR_degtagged + protein_Ribo_machinery; ktl__*ordered_polymer_complex_part_UTR1_protein_Ribo_machinery_forward__part_AmeR_forward_part_t16_forward_;
  r60: BetI_degtagged + protease => complex_BetI_degtagged_protease_; kb__*BetI_degtagged*protease;
  r60rev: complex_BetI_degtagged_protease_ => BetI_degtagged + protease; ku__*complex_BetI_degtagged_protease_;
  r61: complex_BetI_degtagged_protease_ => protease; kdeg__*complex_BetI_degtagged_protease_;
  r62: HlyIIR_degtagged + protease => complex_HlyIIR_degtagged_protease_; kb__*HlyIIR_degtagged*protease;
  r62rev: complex_HlyIIR_degtagged_protease_ => HlyIIR_degtagged + protease; ku__*complex_HlyIIR_degtagged_protease_;
  r63: complex_HlyIIR_degtagged_protease_ => protease; kdeg__*complex_HlyIIR_degtagged_protease_;
  r64: AmeR_degtagged + protease => complex_AmeR_degtagged_protease_; kb__*AmeR_degtagged*protease;
  r64rev: complex_AmeR_degtagged_protease_ => AmeR_degtagged + protease; ku__*complex_AmeR_degtagged_protease_;
  r65: complex_AmeR_degtagged_protease_ => protease; kdeg__*complex_AmeR_degtagged_protease_;
  r66: rna_part_UTR1_forward_part_BetI_forward_part_t16_forward_ + protein_RNAase => complex_protein_RNAase_rna_part_UTR1_forward_part_BetI_forward_part_t16_forward__; kb__*rna_part_UTR1_forward_part_BetI_forward_part_t16_forward_*protein_RNAase;
  r66rev: complex_protein_RNAase_rna_part_UTR1_forward_part_BetI_forward_part_t16_forward__ => rna_part_UTR1_forward_part_BetI_forward_part_t16_forward_ + protein_RNAase; ku__*complex_protein_RNAase_rna_part_UTR1_forward_part_BetI_forward_part_t16_forward__;
  r67: complex_protein_RNAase_rna_part_UTR1_forward_part_BetI_forward_part_t16_forward__ => protein_RNAase; kdeg__*complex_protein_RNAase_rna_part_UTR1_forward_part_BetI_forward_part_t16_forward__;
  r68: rna_part_P_AmeR_forward_part_UTR1_forward_part_BetI_forward_part_t16_forward_ + protein_RNAase => complex_protein_RNAase_rna_part_P_AmeR_forward_part_UTR1_forward_part_BetI_forward_part_t16_forward__; kb__*rna_part_P_AmeR_forward_part_UTR1_forward_part_BetI_forward_part_t16_forward_*protein_RNAase;
  r68rev: complex_protein_RNAase_rna_part_P_AmeR_forward_part_UTR1_forward_part_BetI_forward_part_t16_forward__ => rna_part_P_AmeR_forward_part_UTR1_forward_part_BetI_forward_part_t16_forward_ + protein_RNAase; ku__*complex_protein_RNAase_rna_part_P_AmeR_forward_part_UTR1_forward_part_BetI_forward_part_t16_forward__;
  r69: complex_protein_RNAase_rna_part_P_AmeR_forward_part_UTR1_forward_part_BetI_forward_part_t16_forward__ => protein_RNAase; kdeg__*complex_protein_RNAase_rna_part_P_AmeR_forward_part_UTR1_forward_part_BetI_forward_part_t16_forward__;
  r70: rna_part_UTR1_forward_part_HlyIIR_forward_part_t16_forward_ + protein_RNAase => complex_protein_RNAase_rna_part_UTR1_forward_part_HlyIIR_forward_part_t16_forward__; kb__*rna_part_UTR1_forward_part_HlyIIR_forward_part_t16_forward_*protein_RNAase;
  r70rev: complex_protein_RNAase_rna_part_UTR1_forward_part_HlyIIR_forward_part_t16_forward__ => rna_part_UTR1_forward_part_HlyIIR_forward_part_t16_forward_ + protein_RNAase; ku__*complex_protein_RNAase_rna_part_UTR1_forward_part_HlyIIR_forward_part_t16_forward__;
  r71: complex_protein_RNAase_rna_part_UTR1_forward_part_HlyIIR_forward_part_t16_forward__ => protein_RNAase; kdeg__*complex_protein_RNAase_rna_part_UTR1_forward_part_HlyIIR_forward_part_t16_forward__;
  r72: rna_part_UTR1_forward_part_AmeR_forward_part_t16_forward_ + protein_RNAase => complex_protein_RNAase_rna_part_UTR1_forward_part_AmeR_forward_part_t16_forward__; kb__*rna_part_UTR1_forward_part_AmeR_forward_part_t16_forward_*protein_RNAase;
  r72rev: complex_protein_RNAase_rna_part_UTR1_forward_part_AmeR_forward_part_t16_forward__ => rna_part_UTR1_forward_part_AmeR_forward_part_t16_forward_ + protein_RNAase; ku__*complex_protein_RNAase_rna_part_UTR1_forward_part_AmeR_forward_part_t16_forward__;
  r73: complex_protein_RNAase_rna_part_UTR1_forward_part_AmeR_forward_part_t16_forward__ => protein_RNAase; kdeg__*complex_protein_RNAase_rna_part_UTR1_forward_part_AmeR_forward_part_t16_forward__;

  // Unit definitions:
  unit square_metre = metre^2;
end
