// SBML level 3 version 2

model biocrnpyler_834202()
  // model units - substance: mole, time: second, volume: litre, area: square_metre, length: metre, extent: mole

  // Compartments:
  compartment default = 1e-6;

  // Species:
  species dna_AmeR_assembly in default = 0;
  species TetR in default = 0;
  species rna_AmeR_assembly in default = 0;
  species protein_Ribo in default = 24;
  species AmeR in default = 0;
  species complex_protein_Ribo_rna_AmeR_assembly_ in default = 0;
  species dna_HlyIIR_assembly in default = 0;
  species LacI in default = 0;
  species rna_HlyIIR_assembly in default = 0;
  species HlyIIR in default = 0;
  species complex_protein_Ribo_rna_HlyIIR_assembly_ in default = 0;
  species dna_SrpR_assembly in default = 0;
  species protein_RNAP in default = 3;
  species rna_SrpR_assembly in default = 0;
  species complex_dna_SrpR_assembly_protein_RNAP_ in default = 0;
  species complex_LacI_2x_dna_SrpR_assembly_ in default = 0;
  species complex_complex_LacI_2x_dna_SrpR_assembly__protein_RNAP_ in default = 0;
  species complex_TetR_2x_dna_SrpR_assembly_ in default = 0;
  species complex_complex_TetR_2x_dna_SrpR_assembly__protein_RNAP_ in default = 0;
  species SrpR in default = 0;
  species complex_protein_Ribo_rna_SrpR_assembly_ in default = 0;
  species dna_BetI_assembly in default = 0;
  species dummy_species in default = 0;
  species complex_dna_BetI_assembly_dummy_species_2x_ in default = 0;
  species rna_BetI_assembly in default = 0;
  species complex_complex_dna_BetI_assembly_dummy_species_2x__protein_RNAP_ in default = 0;
  species complex_AmeR_2x_dna_BetI_assembly_dummy_species_2x_ in default = 0;
  species complex_complex_AmeR_2x_dna_BetI_assembly_dummy_species_2x__protein_RNAP_ in default = 0;
  species complex_HlyIIR_2x_dna_BetI_assembly_dummy_species_2x_ in default = 0;
  species complex_complex_HlyIIR_2x_dna_BetI_assembly_dummy_species_2x__protein_RNAP_ in default = 0;
  species complex_AmeR_2x_dna_BetI_assembly_ in default = 0;
  species complex_HlyIIR_2x_dna_BetI_assembly_ in default = 0;
  species complex_AmeR_2x_HlyIIR_2x_dna_BetI_assembly_ in default = 0;
  species complex_AmeR_2x_HlyIIR_2x_dna_BetI_assembly_dummy_species_2x_ in default = 0;
  species BetI in default = 0;
  species complex_protein_Ribo_rna_BetI_assembly_ in default = 0;
  species dna_PhlF_assembly in default = 0;
  species complex_dna_PhlF_assembly_dummy_species_2x_ in default = 0;
  species rna_PhlF_assembly in default = 0;
  species complex_complex_dna_PhlF_assembly_dummy_species_2x__protein_RNAP_ in default = 0;
  species complex_BetI_2x_dna_PhlF_assembly_ in default = 0;
  species complex_SrpR_2x_dna_PhlF_assembly_ in default = 0;
  species complex_BetI_2x_SrpR_2x_dna_PhlF_assembly_ in default = 0;
  species complex_BetI_2x_dna_PhlF_assembly_dummy_species_2x_ in default = 0;
  species complex_SrpR_2x_dna_PhlF_assembly_dummy_species_2x_ in default = 0;
  species complex_BetI_2x_SrpR_2x_dna_PhlF_assembly_dummy_species_2x_ in default = 0;
  species PhlF in default = 0;
  species complex_protein_Ribo_rna_PhlF_assembly_ in default = 0;
  species aTc in default = 0;
  species complex_TetR_2x_aTc_2x_ in default = 0;
  species IPTG in default = 0;
  species complex_IPTG_2x_LacI_2x_ in default = 0;
  species protein_RNAase in default = 6;
  species complex_protein_RNAase_rna_AmeR_assembly_ in default = 0;
  species complex_complex_protein_Ribo_rna_AmeR_assembly__protein_RNAase_ in default = 0;
  species complex_protein_RNAase_rna_HlyIIR_assembly_ in default = 0;
  species complex_complex_protein_Ribo_rna_HlyIIR_assembly__protein_RNAase_ in default = 0;
  species complex_protein_RNAase_rna_SrpR_assembly_ in default = 0;
  species complex_complex_protein_Ribo_rna_SrpR_assembly__protein_RNAase_ in default = 0;
  species complex_protein_RNAase_rna_BetI_assembly_ in default = 0;
  species complex_complex_protein_Ribo_rna_BetI_assembly__protein_RNAase_ in default = 0;
  species complex_protein_RNAase_rna_PhlF_assembly_ in default = 0;
  species complex_complex_protein_Ribo_rna_PhlF_assembly__protein_RNAase_ in default = 0;

  // Parameters:
  k__ = 1;
  K__ = 20;
  n__ = 4;
  kb__ = 100;
  ku_strong_ = 0.5;
  ktl__ = 0.05;
  kb_P_Tac_Tet_leak_transcription = 100;
  ku_P_Tac_Tet_leak_transcription = 100;
  ktx_P_Tac_Tet_leak_transcription = 1;
  ku__ = 10;
  kb_P_Tac_Tet_LacI_transcription = 1;
  ku_P_Tac_Tet_LacI_transcription = 100;
  ktx_P_Tac_Tet_LacI_transcription = 1;
  kb_P_Tac_Tet_TetR_transcription = 1;
  ku_P_Tac_Tet_TetR_transcription = 100;
  ktx_P_Tac_Tet_TetR_transcription = 1;
  ktx__ = 0.05;
  kdeg__rna_degredation_mm = 0.001;

  // Reactions:
  r0: dna_AmeR_assembly => dna_AmeR_assembly + rna_AmeR_assembly; k__*dna_AmeR_assembly/(1 + (TetR/K__)^n__);  // modifiers: TetR
  r1: rna_AmeR_assembly + protein_Ribo => complex_protein_Ribo_rna_AmeR_assembly_; kb__*rna_AmeR_assembly*protein_Ribo;
  r1rev: complex_protein_Ribo_rna_AmeR_assembly_ => rna_AmeR_assembly + protein_Ribo; ku_strong_*complex_protein_Ribo_rna_AmeR_assembly_;
  r2: complex_protein_Ribo_rna_AmeR_assembly_ => rna_AmeR_assembly + AmeR + protein_Ribo; ktl__*complex_protein_Ribo_rna_AmeR_assembly_;
  r3: dna_HlyIIR_assembly => dna_HlyIIR_assembly + rna_HlyIIR_assembly; k__*dna_HlyIIR_assembly/(1 + (LacI/K__)^n__);  // modifiers: LacI
  r4: rna_HlyIIR_assembly + protein_Ribo => complex_protein_Ribo_rna_HlyIIR_assembly_; kb__*rna_HlyIIR_assembly*protein_Ribo;
  r4rev: complex_protein_Ribo_rna_HlyIIR_assembly_ => rna_HlyIIR_assembly + protein_Ribo; ku_strong_*complex_protein_Ribo_rna_HlyIIR_assembly_;
  r5: complex_protein_Ribo_rna_HlyIIR_assembly_ => rna_HlyIIR_assembly + HlyIIR + protein_Ribo; ktl__*complex_protein_Ribo_rna_HlyIIR_assembly_;
  r6: dna_SrpR_assembly + protein_RNAP => complex_dna_SrpR_assembly_protein_RNAP_; kb_P_Tac_Tet_leak_transcription*dna_SrpR_assembly*protein_RNAP;
  r6rev: complex_dna_SrpR_assembly_protein_RNAP_ => dna_SrpR_assembly + protein_RNAP; ku_P_Tac_Tet_leak_transcription*complex_dna_SrpR_assembly_protein_RNAP_;
  r7: complex_dna_SrpR_assembly_protein_RNAP_ => dna_SrpR_assembly + rna_SrpR_assembly + protein_RNAP; ktx_P_Tac_Tet_leak_transcription*complex_dna_SrpR_assembly_protein_RNAP_;
  r8: 2 LacI + dna_SrpR_assembly => complex_LacI_2x_dna_SrpR_assembly_; kb__*LacI^2*dna_SrpR_assembly;
  r8rev: complex_LacI_2x_dna_SrpR_assembly_ => 2 LacI + dna_SrpR_assembly; ku__*complex_LacI_2x_dna_SrpR_assembly_;
  r9: complex_LacI_2x_dna_SrpR_assembly_ + protein_RNAP => complex_complex_LacI_2x_dna_SrpR_assembly__protein_RNAP_; kb_P_Tac_Tet_LacI_transcription*complex_LacI_2x_dna_SrpR_assembly_*protein_RNAP;
  r9rev: complex_complex_LacI_2x_dna_SrpR_assembly__protein_RNAP_ => complex_LacI_2x_dna_SrpR_assembly_ + protein_RNAP; ku_P_Tac_Tet_LacI_transcription*complex_complex_LacI_2x_dna_SrpR_assembly__protein_RNAP_;
  r10: complex_complex_LacI_2x_dna_SrpR_assembly__protein_RNAP_ => complex_LacI_2x_dna_SrpR_assembly_ + rna_SrpR_assembly + protein_RNAP; ktx_P_Tac_Tet_LacI_transcription*complex_complex_LacI_2x_dna_SrpR_assembly__protein_RNAP_;
  r11: 2 TetR + dna_SrpR_assembly => complex_TetR_2x_dna_SrpR_assembly_; kb__*TetR^2*dna_SrpR_assembly;
  r11rev: complex_TetR_2x_dna_SrpR_assembly_ => 2 TetR + dna_SrpR_assembly; ku__*complex_TetR_2x_dna_SrpR_assembly_;
  r12: complex_TetR_2x_dna_SrpR_assembly_ + protein_RNAP => complex_complex_TetR_2x_dna_SrpR_assembly__protein_RNAP_; kb_P_Tac_Tet_TetR_transcription*complex_TetR_2x_dna_SrpR_assembly_*protein_RNAP;
  r12rev: complex_complex_TetR_2x_dna_SrpR_assembly__protein_RNAP_ => complex_TetR_2x_dna_SrpR_assembly_ + protein_RNAP; ku_P_Tac_Tet_TetR_transcription*complex_complex_TetR_2x_dna_SrpR_assembly__protein_RNAP_;
  r13: complex_complex_TetR_2x_dna_SrpR_assembly__protein_RNAP_ => complex_TetR_2x_dna_SrpR_assembly_ + rna_SrpR_assembly + protein_RNAP; ktx_P_Tac_Tet_TetR_transcription*complex_complex_TetR_2x_dna_SrpR_assembly__protein_RNAP_;
  r14: rna_SrpR_assembly + protein_Ribo => complex_protein_Ribo_rna_SrpR_assembly_; kb__*rna_SrpR_assembly*protein_Ribo;
  r14rev: complex_protein_Ribo_rna_SrpR_assembly_ => rna_SrpR_assembly + protein_Ribo; ku_strong_*complex_protein_Ribo_rna_SrpR_assembly_;
  r15: complex_protein_Ribo_rna_SrpR_assembly_ => rna_SrpR_assembly + SrpR + protein_Ribo; ktl__*complex_protein_Ribo_rna_SrpR_assembly_;
  r16: 2 AmeR + dna_BetI_assembly => complex_AmeR_2x_dna_BetI_assembly_; kb__*AmeR^2*dna_BetI_assembly;
  r16rev: complex_AmeR_2x_dna_BetI_assembly_ => 2 AmeR + dna_BetI_assembly; ku__*complex_AmeR_2x_dna_BetI_assembly_;
  r17: 2 HlyIIR + dna_BetI_assembly => complex_HlyIIR_2x_dna_BetI_assembly_; kb__*HlyIIR^2*dna_BetI_assembly;
  r17rev: complex_HlyIIR_2x_dna_BetI_assembly_ => 2 HlyIIR + dna_BetI_assembly; ku__*complex_HlyIIR_2x_dna_BetI_assembly_;
  r18: 2 dummy_species + dna_BetI_assembly => complex_dna_BetI_assembly_dummy_species_2x_; kb__*dummy_species^2*dna_BetI_assembly;
  r18rev: complex_dna_BetI_assembly_dummy_species_2x_ => 2 dummy_species + dna_BetI_assembly; ku__*complex_dna_BetI_assembly_dummy_species_2x_;
  r19: 2 AmeR + complex_HlyIIR_2x_dna_BetI_assembly_ => complex_AmeR_2x_HlyIIR_2x_dna_BetI_assembly_; kb__*AmeR^2*complex_HlyIIR_2x_dna_BetI_assembly_;
  r19rev: complex_AmeR_2x_HlyIIR_2x_dna_BetI_assembly_ => 2 AmeR + complex_HlyIIR_2x_dna_BetI_assembly_; ku__*complex_AmeR_2x_HlyIIR_2x_dna_BetI_assembly_;
  r20: 2 HlyIIR + complex_AmeR_2x_dna_BetI_assembly_ => complex_AmeR_2x_HlyIIR_2x_dna_BetI_assembly_; kb__*HlyIIR^2*complex_AmeR_2x_dna_BetI_assembly_;
  r20rev: complex_AmeR_2x_HlyIIR_2x_dna_BetI_assembly_ => 2 HlyIIR + complex_AmeR_2x_dna_BetI_assembly_; ku__*complex_AmeR_2x_HlyIIR_2x_dna_BetI_assembly_;
  r21: 2 AmeR + complex_dna_BetI_assembly_dummy_species_2x_ => complex_AmeR_2x_dna_BetI_assembly_dummy_species_2x_; kb__*AmeR^2*complex_dna_BetI_assembly_dummy_species_2x_;
  r21rev: complex_AmeR_2x_dna_BetI_assembly_dummy_species_2x_ => 2 AmeR + complex_dna_BetI_assembly_dummy_species_2x_; ku__*complex_AmeR_2x_dna_BetI_assembly_dummy_species_2x_;
  r22: 2 dummy_species + complex_AmeR_2x_dna_BetI_assembly_ => complex_AmeR_2x_dna_BetI_assembly_dummy_species_2x_; kb__*dummy_species^2*complex_AmeR_2x_dna_BetI_assembly_;
  r22rev: complex_AmeR_2x_dna_BetI_assembly_dummy_species_2x_ => 2 dummy_species + complex_AmeR_2x_dna_BetI_assembly_; ku__*complex_AmeR_2x_dna_BetI_assembly_dummy_species_2x_;
  r23: 2 HlyIIR + complex_dna_BetI_assembly_dummy_species_2x_ => complex_HlyIIR_2x_dna_BetI_assembly_dummy_species_2x_; kb__*HlyIIR^2*complex_dna_BetI_assembly_dummy_species_2x_;
  r23rev: complex_HlyIIR_2x_dna_BetI_assembly_dummy_species_2x_ => 2 HlyIIR + complex_dna_BetI_assembly_dummy_species_2x_; ku__*complex_HlyIIR_2x_dna_BetI_assembly_dummy_species_2x_;
  r24: 2 dummy_species + complex_HlyIIR_2x_dna_BetI_assembly_ => complex_HlyIIR_2x_dna_BetI_assembly_dummy_species_2x_; kb__*dummy_species^2*complex_HlyIIR_2x_dna_BetI_assembly_;
  r24rev: complex_HlyIIR_2x_dna_BetI_assembly_dummy_species_2x_ => 2 dummy_species + complex_HlyIIR_2x_dna_BetI_assembly_; ku__*complex_HlyIIR_2x_dna_BetI_assembly_dummy_species_2x_;
  r25: 2 AmeR + complex_HlyIIR_2x_dna_BetI_assembly_dummy_species_2x_ => complex_AmeR_2x_HlyIIR_2x_dna_BetI_assembly_dummy_species_2x_; kb__*AmeR^2*complex_HlyIIR_2x_dna_BetI_assembly_dummy_species_2x_;
  r25rev: complex_AmeR_2x_HlyIIR_2x_dna_BetI_assembly_dummy_species_2x_ => 2 AmeR + complex_HlyIIR_2x_dna_BetI_assembly_dummy_species_2x_; ku__*complex_AmeR_2x_HlyIIR_2x_dna_BetI_assembly_dummy_species_2x_;
  r26: 2 HlyIIR + complex_AmeR_2x_dna_BetI_assembly_dummy_species_2x_ => complex_AmeR_2x_HlyIIR_2x_dna_BetI_assembly_dummy_species_2x_; kb__*HlyIIR^2*complex_AmeR_2x_dna_BetI_assembly_dummy_species_2x_;
  r26rev: complex_AmeR_2x_HlyIIR_2x_dna_BetI_assembly_dummy_species_2x_ => 2 HlyIIR + complex_AmeR_2x_dna_BetI_assembly_dummy_species_2x_; ku__*complex_AmeR_2x_HlyIIR_2x_dna_BetI_assembly_dummy_species_2x_;
  r27: 2 dummy_species + complex_AmeR_2x_HlyIIR_2x_dna_BetI_assembly_ => complex_AmeR_2x_HlyIIR_2x_dna_BetI_assembly_dummy_species_2x_; kb__*dummy_species^2*complex_AmeR_2x_HlyIIR_2x_dna_BetI_assembly_;
  r27rev: complex_AmeR_2x_HlyIIR_2x_dna_BetI_assembly_dummy_species_2x_ => 2 dummy_species + complex_AmeR_2x_HlyIIR_2x_dna_BetI_assembly_; ku__*complex_AmeR_2x_HlyIIR_2x_dna_BetI_assembly_dummy_species_2x_;
  r28: complex_dna_BetI_assembly_dummy_species_2x_ + protein_RNAP => complex_complex_dna_BetI_assembly_dummy_species_2x__protein_RNAP_; kb__*complex_dna_BetI_assembly_dummy_species_2x_*protein_RNAP;
  r28rev: complex_complex_dna_BetI_assembly_dummy_species_2x__protein_RNAP_ => complex_dna_BetI_assembly_dummy_species_2x_ + protein_RNAP; ku__*complex_complex_dna_BetI_assembly_dummy_species_2x__protein_RNAP_;
  r29: complex_complex_dna_BetI_assembly_dummy_species_2x__protein_RNAP_ => complex_dna_BetI_assembly_dummy_species_2x_ + rna_BetI_assembly + protein_RNAP; ktx__*complex_complex_dna_BetI_assembly_dummy_species_2x__protein_RNAP_;
  r30: complex_AmeR_2x_dna_BetI_assembly_dummy_species_2x_ + protein_RNAP => complex_complex_AmeR_2x_dna_BetI_assembly_dummy_species_2x__protein_RNAP_; kb__*complex_AmeR_2x_dna_BetI_assembly_dummy_species_2x_*protein_RNAP;
  r30rev: complex_complex_AmeR_2x_dna_BetI_assembly_dummy_species_2x__protein_RNAP_ => complex_AmeR_2x_dna_BetI_assembly_dummy_species_2x_ + protein_RNAP; ku__*complex_complex_AmeR_2x_dna_BetI_assembly_dummy_species_2x__protein_RNAP_;
  r31: complex_complex_AmeR_2x_dna_BetI_assembly_dummy_species_2x__protein_RNAP_ => complex_AmeR_2x_dna_BetI_assembly_dummy_species_2x_ + rna_BetI_assembly + protein_RNAP; ktx__*complex_complex_AmeR_2x_dna_BetI_assembly_dummy_species_2x__protein_RNAP_;
  r32: complex_HlyIIR_2x_dna_BetI_assembly_dummy_species_2x_ + protein_RNAP => complex_complex_HlyIIR_2x_dna_BetI_assembly_dummy_species_2x__protein_RNAP_; kb__*complex_HlyIIR_2x_dna_BetI_assembly_dummy_species_2x_*protein_RNAP;
  r32rev: complex_complex_HlyIIR_2x_dna_BetI_assembly_dummy_species_2x__protein_RNAP_ => complex_HlyIIR_2x_dna_BetI_assembly_dummy_species_2x_ + protein_RNAP; ku__*complex_complex_HlyIIR_2x_dna_BetI_assembly_dummy_species_2x__protein_RNAP_;
  r33: complex_complex_HlyIIR_2x_dna_BetI_assembly_dummy_species_2x__protein_RNAP_ => complex_HlyIIR_2x_dna_BetI_assembly_dummy_species_2x_ + rna_BetI_assembly + protein_RNAP; ktx__*complex_complex_HlyIIR_2x_dna_BetI_assembly_dummy_species_2x__protein_RNAP_;
  r34: rna_BetI_assembly + protein_Ribo => complex_protein_Ribo_rna_BetI_assembly_; kb__*rna_BetI_assembly*protein_Ribo;
  r34rev: complex_protein_Ribo_rna_BetI_assembly_ => rna_BetI_assembly + protein_Ribo; ku_strong_*complex_protein_Ribo_rna_BetI_assembly_;
  r35: complex_protein_Ribo_rna_BetI_assembly_ => rna_BetI_assembly + BetI + protein_Ribo; ktl__*complex_protein_Ribo_rna_BetI_assembly_;
  r36: 2 BetI + dna_PhlF_assembly => complex_BetI_2x_dna_PhlF_assembly_; kb__*BetI^2*dna_PhlF_assembly;
  r36rev: complex_BetI_2x_dna_PhlF_assembly_ => 2 BetI + dna_PhlF_assembly; ku__*complex_BetI_2x_dna_PhlF_assembly_;
  r37: 2 SrpR + dna_PhlF_assembly => complex_SrpR_2x_dna_PhlF_assembly_; kb__*SrpR^2*dna_PhlF_assembly;
  r37rev: complex_SrpR_2x_dna_PhlF_assembly_ => 2 SrpR + dna_PhlF_assembly; ku__*complex_SrpR_2x_dna_PhlF_assembly_;
  r38: 2 dummy_species + dna_PhlF_assembly => complex_dna_PhlF_assembly_dummy_species_2x_; kb__*dummy_species^2*dna_PhlF_assembly;
  r38rev: complex_dna_PhlF_assembly_dummy_species_2x_ => 2 dummy_species + dna_PhlF_assembly; ku__*complex_dna_PhlF_assembly_dummy_species_2x_;
  r39: 2 BetI + complex_SrpR_2x_dna_PhlF_assembly_ => complex_BetI_2x_SrpR_2x_dna_PhlF_assembly_; kb__*BetI^2*complex_SrpR_2x_dna_PhlF_assembly_;
  r39rev: complex_BetI_2x_SrpR_2x_dna_PhlF_assembly_ => 2 BetI + complex_SrpR_2x_dna_PhlF_assembly_; ku__*complex_BetI_2x_SrpR_2x_dna_PhlF_assembly_;
  r40: 2 SrpR + complex_BetI_2x_dna_PhlF_assembly_ => complex_BetI_2x_SrpR_2x_dna_PhlF_assembly_; kb__*SrpR^2*complex_BetI_2x_dna_PhlF_assembly_;
  r40rev: complex_BetI_2x_SrpR_2x_dna_PhlF_assembly_ => 2 SrpR + complex_BetI_2x_dna_PhlF_assembly_; ku__*complex_BetI_2x_SrpR_2x_dna_PhlF_assembly_;
  r41: 2 BetI + complex_dna_PhlF_assembly_dummy_species_2x_ => complex_BetI_2x_dna_PhlF_assembly_dummy_species_2x_; kb__*BetI^2*complex_dna_PhlF_assembly_dummy_species_2x_;
  r41rev: complex_BetI_2x_dna_PhlF_assembly_dummy_species_2x_ => 2 BetI + complex_dna_PhlF_assembly_dummy_species_2x_; ku__*complex_BetI_2x_dna_PhlF_assembly_dummy_species_2x_;
  r42: 2 dummy_species + complex_BetI_2x_dna_PhlF_assembly_ => complex_BetI_2x_dna_PhlF_assembly_dummy_species_2x_; kb__*dummy_species^2*complex_BetI_2x_dna_PhlF_assembly_;
  r42rev: complex_BetI_2x_dna_PhlF_assembly_dummy_species_2x_ => 2 dummy_species + complex_BetI_2x_dna_PhlF_assembly_; ku__*complex_BetI_2x_dna_PhlF_assembly_dummy_species_2x_;
  r43: 2 SrpR + complex_dna_PhlF_assembly_dummy_species_2x_ => complex_SrpR_2x_dna_PhlF_assembly_dummy_species_2x_; kb__*SrpR^2*complex_dna_PhlF_assembly_dummy_species_2x_;
  r43rev: complex_SrpR_2x_dna_PhlF_assembly_dummy_species_2x_ => 2 SrpR + complex_dna_PhlF_assembly_dummy_species_2x_; ku__*complex_SrpR_2x_dna_PhlF_assembly_dummy_species_2x_;
  r44: 2 dummy_species + complex_SrpR_2x_dna_PhlF_assembly_ => complex_SrpR_2x_dna_PhlF_assembly_dummy_species_2x_; kb__*dummy_species^2*complex_SrpR_2x_dna_PhlF_assembly_;
  r44rev: complex_SrpR_2x_dna_PhlF_assembly_dummy_species_2x_ => 2 dummy_species + complex_SrpR_2x_dna_PhlF_assembly_; ku__*complex_SrpR_2x_dna_PhlF_assembly_dummy_species_2x_;
  r45: 2 BetI + complex_SrpR_2x_dna_PhlF_assembly_dummy_species_2x_ => complex_BetI_2x_SrpR_2x_dna_PhlF_assembly_dummy_species_2x_; kb__*BetI^2*complex_SrpR_2x_dna_PhlF_assembly_dummy_species_2x_;
  r45rev: complex_BetI_2x_SrpR_2x_dna_PhlF_assembly_dummy_species_2x_ => 2 BetI + complex_SrpR_2x_dna_PhlF_assembly_dummy_species_2x_; ku__*complex_BetI_2x_SrpR_2x_dna_PhlF_assembly_dummy_species_2x_;
  r46: 2 SrpR + complex_BetI_2x_dna_PhlF_assembly_dummy_species_2x_ => complex_BetI_2x_SrpR_2x_dna_PhlF_assembly_dummy_species_2x_; kb__*SrpR^2*complex_BetI_2x_dna_PhlF_assembly_dummy_species_2x_;
  r46rev: complex_BetI_2x_SrpR_2x_dna_PhlF_assembly_dummy_species_2x_ => 2 SrpR + complex_BetI_2x_dna_PhlF_assembly_dummy_species_2x_; ku__*complex_BetI_2x_SrpR_2x_dna_PhlF_assembly_dummy_species_2x_;
  r47: 2 dummy_species + complex_BetI_2x_SrpR_2x_dna_PhlF_assembly_ => complex_BetI_2x_SrpR_2x_dna_PhlF_assembly_dummy_species_2x_; kb__*dummy_species^2*complex_BetI_2x_SrpR_2x_dna_PhlF_assembly_;
  r47rev: complex_BetI_2x_SrpR_2x_dna_PhlF_assembly_dummy_species_2x_ => 2 dummy_species + complex_BetI_2x_SrpR_2x_dna_PhlF_assembly_; ku__*complex_BetI_2x_SrpR_2x_dna_PhlF_assembly_dummy_species_2x_;
  r48: complex_dna_PhlF_assembly_dummy_species_2x_ + protein_RNAP => complex_complex_dna_PhlF_assembly_dummy_species_2x__protein_RNAP_; kb__*complex_dna_PhlF_assembly_dummy_species_2x_*protein_RNAP;
  r48rev: complex_complex_dna_PhlF_assembly_dummy_species_2x__protein_RNAP_ => complex_dna_PhlF_assembly_dummy_species_2x_ + protein_RNAP; ku__*complex_complex_dna_PhlF_assembly_dummy_species_2x__protein_RNAP_;
  r49: complex_complex_dna_PhlF_assembly_dummy_species_2x__protein_RNAP_ => complex_dna_PhlF_assembly_dummy_species_2x_ + rna_PhlF_assembly + protein_RNAP; ktx__*complex_complex_dna_PhlF_assembly_dummy_species_2x__protein_RNAP_;
  r50: rna_PhlF_assembly + protein_Ribo => complex_protein_Ribo_rna_PhlF_assembly_; kb__*rna_PhlF_assembly*protein_Ribo;
  r50rev: complex_protein_Ribo_rna_PhlF_assembly_ => rna_PhlF_assembly + protein_Ribo; ku_strong_*complex_protein_Ribo_rna_PhlF_assembly_;
  r51: complex_protein_Ribo_rna_PhlF_assembly_ => rna_PhlF_assembly + PhlF + protein_Ribo; ktl__*complex_protein_Ribo_rna_PhlF_assembly_;
  r52: 2 aTc + 2 TetR => complex_TetR_2x_aTc_2x_; kb__*aTc^2*TetR^2;
  r52rev: complex_TetR_2x_aTc_2x_ => 2 aTc + 2 TetR; ku__*complex_TetR_2x_aTc_2x_;
  r53: 2 IPTG + 2 LacI => complex_IPTG_2x_LacI_2x_; kb__*IPTG^2*LacI^2;
  r53rev: complex_IPTG_2x_LacI_2x_ => 2 IPTG + 2 LacI; ku__*complex_IPTG_2x_LacI_2x_;
  r54: rna_AmeR_assembly + protein_RNAase => complex_protein_RNAase_rna_AmeR_assembly_; kb__*rna_AmeR_assembly*protein_RNAase;
  r54rev: complex_protein_RNAase_rna_AmeR_assembly_ => rna_AmeR_assembly + protein_RNAase; ku__*complex_protein_RNAase_rna_AmeR_assembly_;
  r55: complex_protein_RNAase_rna_AmeR_assembly_ => protein_RNAase; kdeg__rna_degredation_mm*complex_protein_RNAase_rna_AmeR_assembly_;
  r56: complex_protein_Ribo_rna_AmeR_assembly_ + protein_RNAase => complex_complex_protein_Ribo_rna_AmeR_assembly__protein_RNAase_; kb__*complex_protein_Ribo_rna_AmeR_assembly_*protein_RNAase;
  r56rev: complex_complex_protein_Ribo_rna_AmeR_assembly__protein_RNAase_ => complex_protein_Ribo_rna_AmeR_assembly_ + protein_RNAase; ku__*complex_complex_protein_Ribo_rna_AmeR_assembly__protein_RNAase_;
  r57: complex_complex_protein_Ribo_rna_AmeR_assembly__protein_RNAase_ => protein_Ribo + protein_RNAase; kdeg__rna_degredation_mm*complex_complex_protein_Ribo_rna_AmeR_assembly__protein_RNAase_;
  r58: rna_HlyIIR_assembly + protein_RNAase => complex_protein_RNAase_rna_HlyIIR_assembly_; kb__*rna_HlyIIR_assembly*protein_RNAase;
  r58rev: complex_protein_RNAase_rna_HlyIIR_assembly_ => rna_HlyIIR_assembly + protein_RNAase; ku__*complex_protein_RNAase_rna_HlyIIR_assembly_;
  r59: complex_protein_RNAase_rna_HlyIIR_assembly_ => protein_RNAase; kdeg__rna_degredation_mm*complex_protein_RNAase_rna_HlyIIR_assembly_;
  r60: complex_protein_Ribo_rna_HlyIIR_assembly_ + protein_RNAase => complex_complex_protein_Ribo_rna_HlyIIR_assembly__protein_RNAase_; kb__*complex_protein_Ribo_rna_HlyIIR_assembly_*protein_RNAase;
  r60rev: complex_complex_protein_Ribo_rna_HlyIIR_assembly__protein_RNAase_ => complex_protein_Ribo_rna_HlyIIR_assembly_ + protein_RNAase; ku__*complex_complex_protein_Ribo_rna_HlyIIR_assembly__protein_RNAase_;
  r61: complex_complex_protein_Ribo_rna_HlyIIR_assembly__protein_RNAase_ => protein_Ribo + protein_RNAase; kdeg__rna_degredation_mm*complex_complex_protein_Ribo_rna_HlyIIR_assembly__protein_RNAase_;
  r62: rna_SrpR_assembly + protein_RNAase => complex_protein_RNAase_rna_SrpR_assembly_; kb__*rna_SrpR_assembly*protein_RNAase;
  r62rev: complex_protein_RNAase_rna_SrpR_assembly_ => rna_SrpR_assembly + protein_RNAase; ku__*complex_protein_RNAase_rna_SrpR_assembly_;
  r63: complex_protein_RNAase_rna_SrpR_assembly_ => protein_RNAase; kdeg__rna_degredation_mm*complex_protein_RNAase_rna_SrpR_assembly_;
  r64: complex_protein_Ribo_rna_SrpR_assembly_ + protein_RNAase => complex_complex_protein_Ribo_rna_SrpR_assembly__protein_RNAase_; kb__*complex_protein_Ribo_rna_SrpR_assembly_*protein_RNAase;
  r64rev: complex_complex_protein_Ribo_rna_SrpR_assembly__protein_RNAase_ => complex_protein_Ribo_rna_SrpR_assembly_ + protein_RNAase; ku__*complex_complex_protein_Ribo_rna_SrpR_assembly__protein_RNAase_;
  r65: complex_complex_protein_Ribo_rna_SrpR_assembly__protein_RNAase_ => protein_Ribo + protein_RNAase; kdeg__rna_degredation_mm*complex_complex_protein_Ribo_rna_SrpR_assembly__protein_RNAase_;
  r66: rna_BetI_assembly + protein_RNAase => complex_protein_RNAase_rna_BetI_assembly_; kb__*rna_BetI_assembly*protein_RNAase;
  r66rev: complex_protein_RNAase_rna_BetI_assembly_ => rna_BetI_assembly + protein_RNAase; ku__*complex_protein_RNAase_rna_BetI_assembly_;
  r67: complex_protein_RNAase_rna_BetI_assembly_ => protein_RNAase; kdeg__rna_degredation_mm*complex_protein_RNAase_rna_BetI_assembly_;
  r68: complex_protein_Ribo_rna_BetI_assembly_ + protein_RNAase => complex_complex_protein_Ribo_rna_BetI_assembly__protein_RNAase_; kb__*complex_protein_Ribo_rna_BetI_assembly_*protein_RNAase;
  r68rev: complex_complex_protein_Ribo_rna_BetI_assembly__protein_RNAase_ => complex_protein_Ribo_rna_BetI_assembly_ + protein_RNAase; ku__*complex_complex_protein_Ribo_rna_BetI_assembly__protein_RNAase_;
  r69: complex_complex_protein_Ribo_rna_BetI_assembly__protein_RNAase_ => protein_Ribo + protein_RNAase; kdeg__rna_degredation_mm*complex_complex_protein_Ribo_rna_BetI_assembly__protein_RNAase_;
  r70: rna_PhlF_assembly + protein_RNAase => complex_protein_RNAase_rna_PhlF_assembly_; kb__*rna_PhlF_assembly*protein_RNAase;
  r70rev: complex_protein_RNAase_rna_PhlF_assembly_ => rna_PhlF_assembly + protein_RNAase; ku__*complex_protein_RNAase_rna_PhlF_assembly_;
  r71: complex_protein_RNAase_rna_PhlF_assembly_ => protein_RNAase; kdeg__rna_degredation_mm*complex_protein_RNAase_rna_PhlF_assembly_;
  r72: complex_protein_Ribo_rna_PhlF_assembly_ + protein_RNAase => complex_complex_protein_Ribo_rna_PhlF_assembly__protein_RNAase_; kb__*complex_protein_Ribo_rna_PhlF_assembly_*protein_RNAase;
  r72rev: complex_complex_protein_Ribo_rna_PhlF_assembly__protein_RNAase_ => complex_protein_Ribo_rna_PhlF_assembly_ + protein_RNAase; ku__*complex_complex_protein_Ribo_rna_PhlF_assembly__protein_RNAase_;
  r73: complex_complex_protein_Ribo_rna_PhlF_assembly__protein_RNAase_ => protein_Ribo + protein_RNAase; kdeg__rna_degredation_mm*complex_complex_protein_Ribo_rna_PhlF_assembly__protein_RNAase_;

  // Unit definitions:
  unit square_metre = metre^2;
end
