// SBML level 3 version 2

model biocrnpyler_583919()
  // model units - substance: mole, time: second, volume: litre, area: square_metre, length: metre, extent: mole

  // Compartments:
  compartment default = 1e-6;

  // Species:
  species dna_part_Promoter_forward_part_UTR1_forward_part_A_forward_part_t16_forward_ in default = 0;
  species rna_part_UTR1_forward_part_A_forward_part_t16_forward_ in default = 0;
  species protein_repressor_input in default = 0;
  species ordered_polymer_complex_part_Promoter_protein_repressor_input_2x_forward__part_UTR1_forward_part_A_forward_part_t16_forward_ in default = 0;
  species protein_A_degtagged in default = 0;

  // Parameters:
  ktx_Promoter_leak_simple_transcription = 0.05;
  kb__one_step_cooperative_binding = 100;
  ku__one_step_cooperative_binding = 10;
  ktx__simple_transcription = 1e-7;
  ktl__ = 0.05;
  kdil__ = 0.0075;

  // Reactions:
  r0: dna_part_Promoter_forward_part_UTR1_forward_part_A_forward_part_t16_forward_ => dna_part_Promoter_forward_part_UTR1_forward_part_A_forward_part_t16_forward_ + rna_part_UTR1_forward_part_A_forward_part_t16_forward_; ktx_Promoter_leak_simple_transcription*dna_part_Promoter_forward_part_UTR1_forward_part_A_forward_part_t16_forward_;
  r1: 2 protein_repressor_input + dna_part_Promoter_forward_part_UTR1_forward_part_A_forward_part_t16_forward_ => ordered_polymer_complex_part_Promoter_protein_repressor_input_2x_forward__part_UTR1_forward_part_A_forward_part_t16_forward_; kb__one_step_cooperative_binding*protein_repressor_input^2*dna_part_Promoter_forward_part_UTR1_forward_part_A_forward_part_t16_forward_;
  r1rev: ordered_polymer_complex_part_Promoter_protein_repressor_input_2x_forward__part_UTR1_forward_part_A_forward_part_t16_forward_ => 2 protein_repressor_input + dna_part_Promoter_forward_part_UTR1_forward_part_A_forward_part_t16_forward_; ku__one_step_cooperative_binding*ordered_polymer_complex_part_Promoter_protein_repressor_input_2x_forward__part_UTR1_forward_part_A_forward_part_t16_forward_;
  r2: ordered_polymer_complex_part_Promoter_protein_repressor_input_2x_forward__part_UTR1_forward_part_A_forward_part_t16_forward_ => ordered_polymer_complex_part_Promoter_protein_repressor_input_2x_forward__part_UTR1_forward_part_A_forward_part_t16_forward_ + rna_part_UTR1_forward_part_A_forward_part_t16_forward_; ktx__simple_transcription*ordered_polymer_complex_part_Promoter_protein_repressor_input_2x_forward__part_UTR1_forward_part_A_forward_part_t16_forward_;
  r3: rna_part_UTR1_forward_part_A_forward_part_t16_forward_ => rna_part_UTR1_forward_part_A_forward_part_t16_forward_ + protein_A_degtagged; ktl__*rna_part_UTR1_forward_part_A_forward_part_t16_forward_;
  r4: protein_A_degtagged => ; kdil__*protein_A_degtagged;
  r5: rna_part_UTR1_forward_part_A_forward_part_t16_forward_ => ; kdil__*rna_part_UTR1_forward_part_A_forward_part_t16_forward_;

  // Unit definitions:
  unit square_metre = metre^2;
end
