// SBML level 3 version 2

model biocrnpyler_785526()
  // model units - substance: mole, time: second, volume: litre, area: square_metre, length: metre, extent: mole

  // Compartments:
  compartment default = 1e-6;

  // Species:
  species dna_part_P_Tac_forward_part_P_Tet_forward_part_UTR1_forward_part_CDS_SrpR_forward_part_t16_forward_ in default = 0;
  species protein_IPTG_input in default = 0;
  species protein_LacI_input in default = 0;
  species complex_protein_IPTG_input_2x_protein_LacI_input_2x_ in default = 0;
  species protein_aTc_input in default = 0;
  species protein_TetR_input in default = 0;
  species complex_protein_TetR_input_2x_protein_aTc_input_2x_ in default = 0;
  species protein_RNAP in default = 0;
  species protein_Ribo in default = 0;
  species protein_RNAase in default = 0;
  species ordered_polymer_complex_complex_part_P_Tac_protein_LacI_input_2x__protein_RNAP_forward__part_P_Tet_forward_part_UTR1_forward_part_CDS_SrpR_forward_part_t16_forward_ in default = 0;
  species rna_part_UTR1_forward_part_CDS_SrpR_forward_part_t16_forward_ in default = 0;
  species ordered_polymer_complex_complex_part_P_Tac_protein_LacI_input_2x__protein_RNAP_forward__complex_part_P_Tet_protein_RNAP_forward__part_UTR1_forward_part_CDS_SrpR_forward_part_t16_forward_ in default = 0;
  species ordered_polymer_complex_complex_part_P_Tac_protein_LacI_input_2x__protein_RNAP_forward__complex_part_P_Tet_protein_TetR_input_2x_forward__part_UTR1_forward_part_CDS_SrpR_forward_part_t16_forward_ in default = 0;
  species ordered_polymer_complex_complex_part_P_Tac_protein_LacI_input_2x__protein_RNAP_forward__complex_complex_part_P_Tet_protein_TetR_input_2x__protein_RNAP_forward__part_UTR1_forward_part_CDS_SrpR_forward_part_t16_forward_ in default = 0;
  species ordered_polymer_complex_part_P_Tac_protein_LacI_input_2x_forward__part_P_Tet_forward_part_UTR1_forward_part_CDS_SrpR_forward_part_t16_forward_ in default = 0;
  species ordered_polymer_complex_part_P_Tac_protein_LacI_input_2x_forward__complex_part_P_Tet_protein_RNAP_forward__part_UTR1_forward_part_CDS_SrpR_forward_part_t16_forward_ in default = 0;
  species ordered_polymer_complex_part_P_Tac_protein_LacI_input_2x_forward__complex_part_P_Tet_protein_TetR_input_2x_forward__part_UTR1_forward_part_CDS_SrpR_forward_part_t16_forward_ in default = 0;
  species ordered_polymer_complex_part_P_Tac_protein_LacI_input_2x_forward__complex_complex_part_P_Tet_protein_TetR_input_2x__protein_RNAP_forward__part_UTR1_forward_part_CDS_SrpR_forward_part_t16_forward_ in default = 0;
  species ordered_polymer_complex_part_P_Tac_protein_RNAP_forward__part_P_Tet_forward_part_UTR1_forward_part_CDS_SrpR_forward_part_t16_forward_ in default = 0;
  species ordered_polymer_complex_part_P_Tac_protein_RNAP_forward__complex_part_P_Tet_protein_RNAP_forward__part_UTR1_forward_part_CDS_SrpR_forward_part_t16_forward_ in default = 0;
  species ordered_polymer_complex_part_P_Tac_protein_RNAP_forward__complex_part_P_Tet_protein_TetR_input_2x_forward__part_UTR1_forward_part_CDS_SrpR_forward_part_t16_forward_ in default = 0;
  species ordered_polymer_complex_part_P_Tac_protein_RNAP_forward__complex_complex_part_P_Tet_protein_TetR_input_2x__protein_RNAP_forward__part_UTR1_forward_part_CDS_SrpR_forward_part_t16_forward_ in default = 0;
  species ordered_polymer_part_P_Tac_forward_complex_part_P_Tet_protein_RNAP_forward__part_UTR1_forward_part_CDS_SrpR_forward_part_t16_forward_ in default = 0;
  species rna_part_P_Tet_forward_part_UTR1_forward_part_CDS_SrpR_forward_part_t16_forward_ in default = 0;
  species ordered_polymer_part_P_Tac_forward_complex_part_P_Tet_protein_TetR_input_2x_forward__part_UTR1_forward_part_CDS_SrpR_forward_part_t16_forward_ in default = 0;
  species ordered_polymer_part_P_Tac_forward_complex_complex_part_P_Tet_protein_TetR_input_2x__protein_RNAP_forward__part_UTR1_forward_part_CDS_SrpR_forward_part_t16_forward_ in default = 0;
  species ordered_polymer_part_P_Tet_forward_complex_part_UTR1_protein_Ribo_forward__part_CDS_SrpR_forward_part_t16_forward_ in default = 0;
  species protein_SrpR_degtagged in default = 0;
  species ordered_polymer_complex_part_UTR1_protein_Ribo_forward__part_CDS_SrpR_forward_part_t16_forward_ in default = 0;
  species complex_protein_RNAase_rna_part_UTR1_forward_part_CDS_SrpR_forward_part_t16_forward__ in default = 0;
  species complex_protein_RNAase_rna_part_P_Tet_forward_part_UTR1_forward_part_CDS_SrpR_forward_part_t16_forward__ in default = 0;

  // Parameters:
  kb__ = 100;
  ku__ = 10;
  kb_P_Tet_leak_transcription_mm = 100;
  ku_P_Tet_leak_transcription_mm = 10;
  ktx_P_Tet_leak_transcription_mm = 0.05;
  kb__one_step_cooperative_binding = 100;
  ku__one_step_cooperative_binding = 10;
  kb__transcription_mm = 10;
  ku__transcription_mm = 100;
  ktx__transcription_mm = 0.05;
  kb_P_Tac_leak_transcription_mm = 100;
  ku_P_Tac_leak_transcription_mm = 10;
  ktx_P_Tac_leak_transcription_mm = 0.05;
  ktl__ = 0.05;
  kdil__ = 0.0075;
  kdeg__ = 0.001;

  // Reactions:
  r0: 2 protein_IPTG_input + 2 protein_LacI_input => complex_protein_IPTG_input_2x_protein_LacI_input_2x_; kb__*protein_IPTG_input^2*protein_LacI_input^2;
  r0rev: complex_protein_IPTG_input_2x_protein_LacI_input_2x_ => 2 protein_IPTG_input + 2 protein_LacI_input; ku__*complex_protein_IPTG_input_2x_protein_LacI_input_2x_;
  r1: 2 protein_aTc_input + 2 protein_TetR_input => complex_protein_TetR_input_2x_protein_aTc_input_2x_; kb__*protein_aTc_input^2*protein_TetR_input^2;
  r1rev: complex_protein_TetR_input_2x_protein_aTc_input_2x_ => 2 protein_aTc_input + 2 protein_TetR_input; ku__*complex_protein_TetR_input_2x_protein_aTc_input_2x_;
  r2: ordered_polymer_complex_complex_part_P_Tac_protein_LacI_input_2x__protein_RNAP_forward__part_P_Tet_forward_part_UTR1_forward_part_CDS_SrpR_forward_part_t16_forward_ + protein_RNAP => ordered_polymer_complex_complex_part_P_Tac_protein_LacI_input_2x__protein_RNAP_forward__complex_part_P_Tet_protein_RNAP_forward__part_UTR1_forward_part_CDS_SrpR_forward_part_t16_forward_; kb_P_Tet_leak_transcription_mm*ordered_polymer_complex_complex_part_P_Tac_protein_LacI_input_2x__protein_RNAP_forward__part_P_Tet_forward_part_UTR1_forward_part_CDS_SrpR_forward_part_t16_forward_*protein_RNAP;
  r2rev: ordered_polymer_complex_complex_part_P_Tac_protein_LacI_input_2x__protein_RNAP_forward__complex_part_P_Tet_protein_RNAP_forward__part_UTR1_forward_part_CDS_SrpR_forward_part_t16_forward_ => ordered_polymer_complex_complex_part_P_Tac_protein_LacI_input_2x__protein_RNAP_forward__part_P_Tet_forward_part_UTR1_forward_part_CDS_SrpR_forward_part_t16_forward_ + protein_RNAP; ku_P_Tet_leak_transcription_mm*ordered_polymer_complex_complex_part_P_Tac_protein_LacI_input_2x__protein_RNAP_forward__complex_part_P_Tet_protein_RNAP_forward__part_UTR1_forward_part_CDS_SrpR_forward_part_t16_forward_;
  r3: ordered_polymer_complex_complex_part_P_Tac_protein_LacI_input_2x__protein_RNAP_forward__complex_part_P_Tet_protein_RNAP_forward__part_UTR1_forward_part_CDS_SrpR_forward_part_t16_forward_ => ordered_polymer_complex_complex_part_P_Tac_protein_LacI_input_2x__protein_RNAP_forward__part_P_Tet_forward_part_UTR1_forward_part_CDS_SrpR_forward_part_t16_forward_ + rna_part_UTR1_forward_part_CDS_SrpR_forward_part_t16_forward_ + protein_RNAP; ktx_P_Tet_leak_transcription_mm*ordered_polymer_complex_complex_part_P_Tac_protein_LacI_input_2x__protein_RNAP_forward__complex_part_P_Tet_protein_RNAP_forward__part_UTR1_forward_part_CDS_SrpR_forward_part_t16_forward_;
  r4: 2 protein_TetR_input + ordered_polymer_complex_complex_part_P_Tac_protein_LacI_input_2x__protein_RNAP_forward__part_P_Tet_forward_part_UTR1_forward_part_CDS_SrpR_forward_part_t16_forward_ => ordered_polymer_complex_complex_part_P_Tac_protein_LacI_input_2x__protein_RNAP_forward__complex_part_P_Tet_protein_TetR_input_2x_forward__part_UTR1_forward_part_CDS_SrpR_forward_part_t16_forward_; kb__one_step_cooperative_binding*protein_TetR_input^2*ordered_polymer_complex_complex_part_P_Tac_protein_LacI_input_2x__protein_RNAP_forward__part_P_Tet_forward_part_UTR1_forward_part_CDS_SrpR_forward_part_t16_forward_;
  r4rev: ordered_polymer_complex_complex_part_P_Tac_protein_LacI_input_2x__protein_RNAP_forward__complex_part_P_Tet_protein_TetR_input_2x_forward__part_UTR1_forward_part_CDS_SrpR_forward_part_t16_forward_ => 2 protein_TetR_input + ordered_polymer_complex_complex_part_P_Tac_protein_LacI_input_2x__protein_RNAP_forward__part_P_Tet_forward_part_UTR1_forward_part_CDS_SrpR_forward_part_t16_forward_; ku__one_step_cooperative_binding*ordered_polymer_complex_complex_part_P_Tac_protein_LacI_input_2x__protein_RNAP_forward__complex_part_P_Tet_protein_TetR_input_2x_forward__part_UTR1_forward_part_CDS_SrpR_forward_part_t16_forward_;
  r5: ordered_polymer_complex_complex_part_P_Tac_protein_LacI_input_2x__protein_RNAP_forward__complex_part_P_Tet_protein_TetR_input_2x_forward__part_UTR1_forward_part_CDS_SrpR_forward_part_t16_forward_ + protein_RNAP => ordered_polymer_complex_complex_part_P_Tac_protein_LacI_input_2x__protein_RNAP_forward__complex_complex_part_P_Tet_protein_TetR_input_2x__protein_RNAP_forward__part_UTR1_forward_part_CDS_SrpR_forward_part_t16_forward_; kb__transcription_mm*ordered_polymer_complex_complex_part_P_Tac_protein_LacI_input_2x__protein_RNAP_forward__complex_part_P_Tet_protein_TetR_input_2x_forward__part_UTR1_forward_part_CDS_SrpR_forward_part_t16_forward_*protein_RNAP;
  r5rev: ordered_polymer_complex_complex_part_P_Tac_protein_LacI_input_2x__protein_RNAP_forward__complex_complex_part_P_Tet_protein_TetR_input_2x__protein_RNAP_forward__part_UTR1_forward_part_CDS_SrpR_forward_part_t16_forward_ => ordered_polymer_complex_complex_part_P_Tac_protein_LacI_input_2x__protein_RNAP_forward__complex_part_P_Tet_protein_TetR_input_2x_forward__part_UTR1_forward_part_CDS_SrpR_forward_part_t16_forward_ + protein_RNAP; ku__transcription_mm*ordered_polymer_complex_complex_part_P_Tac_protein_LacI_input_2x__protein_RNAP_forward__complex_complex_part_P_Tet_protein_TetR_input_2x__protein_RNAP_forward__part_UTR1_forward_part_CDS_SrpR_forward_part_t16_forward_;
  r6: ordered_polymer_complex_complex_part_P_Tac_protein_LacI_input_2x__protein_RNAP_forward__complex_complex_part_P_Tet_protein_TetR_input_2x__protein_RNAP_forward__part_UTR1_forward_part_CDS_SrpR_forward_part_t16_forward_ => ordered_polymer_complex_complex_part_P_Tac_protein_LacI_input_2x__protein_RNAP_forward__complex_part_P_Tet_protein_TetR_input_2x_forward__part_UTR1_forward_part_CDS_SrpR_forward_part_t16_forward_ + rna_part_UTR1_forward_part_CDS_SrpR_forward_part_t16_forward_ + protein_RNAP; ktx__transcription_mm*ordered_polymer_complex_complex_part_P_Tac_protein_LacI_input_2x__protein_RNAP_forward__complex_complex_part_P_Tet_protein_TetR_input_2x__protein_RNAP_forward__part_UTR1_forward_part_CDS_SrpR_forward_part_t16_forward_;
  r7: ordered_polymer_complex_part_P_Tac_protein_LacI_input_2x_forward__part_P_Tet_forward_part_UTR1_forward_part_CDS_SrpR_forward_part_t16_forward_ + protein_RNAP => ordered_polymer_complex_part_P_Tac_protein_LacI_input_2x_forward__complex_part_P_Tet_protein_RNAP_forward__part_UTR1_forward_part_CDS_SrpR_forward_part_t16_forward_; kb_P_Tet_leak_transcription_mm*ordered_polymer_complex_part_P_Tac_protein_LacI_input_2x_forward__part_P_Tet_forward_part_UTR1_forward_part_CDS_SrpR_forward_part_t16_forward_*protein_RNAP;
  r7rev: ordered_polymer_complex_part_P_Tac_protein_LacI_input_2x_forward__complex_part_P_Tet_protein_RNAP_forward__part_UTR1_forward_part_CDS_SrpR_forward_part_t16_forward_ => ordered_polymer_complex_part_P_Tac_protein_LacI_input_2x_forward__part_P_Tet_forward_part_UTR1_forward_part_CDS_SrpR_forward_part_t16_forward_ + protein_RNAP; ku_P_Tet_leak_transcription_mm*ordered_polymer_complex_part_P_Tac_protein_LacI_input_2x_forward__complex_part_P_Tet_protein_RNAP_forward__part_UTR1_forward_part_CDS_SrpR_forward_part_t16_forward_;
  r8: ordered_polymer_complex_part_P_Tac_protein_LacI_input_2x_forward__complex_part_P_Tet_protein_RNAP_forward__part_UTR1_forward_part_CDS_SrpR_forward_part_t16_forward_ => ordered_polymer_complex_part_P_Tac_protein_LacI_input_2x_forward__part_P_Tet_forward_part_UTR1_forward_part_CDS_SrpR_forward_part_t16_forward_ + rna_part_UTR1_forward_part_CDS_SrpR_forward_part_t16_forward_ + protein_RNAP; ktx_P_Tet_leak_transcription_mm*ordered_polymer_complex_part_P_Tac_protein_LacI_input_2x_forward__complex_part_P_Tet_protein_RNAP_forward__part_UTR1_forward_part_CDS_SrpR_forward_part_t16_forward_;
  r9: 2 protein_TetR_input + ordered_polymer_complex_part_P_Tac_protein_LacI_input_2x_forward__part_P_Tet_forward_part_UTR1_forward_part_CDS_SrpR_forward_part_t16_forward_ => ordered_polymer_complex_part_P_Tac_protein_LacI_input_2x_forward__complex_part_P_Tet_protein_TetR_input_2x_forward__part_UTR1_forward_part_CDS_SrpR_forward_part_t16_forward_; kb__one_step_cooperative_binding*protein_TetR_input^2*ordered_polymer_complex_part_P_Tac_protein_LacI_input_2x_forward__part_P_Tet_forward_part_UTR1_forward_part_CDS_SrpR_forward_part_t16_forward_;
  r9rev: ordered_polymer_complex_part_P_Tac_protein_LacI_input_2x_forward__complex_part_P_Tet_protein_TetR_input_2x_forward__part_UTR1_forward_part_CDS_SrpR_forward_part_t16_forward_ => 2 protein_TetR_input + ordered_polymer_complex_part_P_Tac_protein_LacI_input_2x_forward__part_P_Tet_forward_part_UTR1_forward_part_CDS_SrpR_forward_part_t16_forward_; ku__one_step_cooperative_binding*ordered_polymer_complex_part_P_Tac_protein_LacI_input_2x_forward__complex_part_P_Tet_protein_TetR_input_2x_forward__part_UTR1_forward_part_CDS_SrpR_forward_part_t16_forward_;
  r10: ordered_polymer_complex_part_P_Tac_protein_LacI_input_2x_forward__complex_part_P_Tet_protein_TetR_input_2x_forward__part_UTR1_forward_part_CDS_SrpR_forward_part_t16_forward_ + protein_RNAP => ordered_polymer_complex_part_P_Tac_protein_LacI_input_2x_forward__complex_complex_part_P_Tet_protein_TetR_input_2x__protein_RNAP_forward__part_UTR1_forward_part_CDS_SrpR_forward_part_t16_forward_; kb__transcription_mm*ordered_polymer_complex_part_P_Tac_protein_LacI_input_2x_forward__complex_part_P_Tet_protein_TetR_input_2x_forward__part_UTR1_forward_part_CDS_SrpR_forward_part_t16_forward_*protein_RNAP;
  r10rev: ordered_polymer_complex_part_P_Tac_protein_LacI_input_2x_forward__complex_complex_part_P_Tet_protein_TetR_input_2x__protein_RNAP_forward__part_UTR1_forward_part_CDS_SrpR_forward_part_t16_forward_ => ordered_polymer_complex_part_P_Tac_protein_LacI_input_2x_forward__complex_part_P_Tet_protein_TetR_input_2x_forward__part_UTR1_forward_part_CDS_SrpR_forward_part_t16_forward_ + protein_RNAP; ku__transcription_mm*ordered_polymer_complex_part_P_Tac_protein_LacI_input_2x_forward__complex_complex_part_P_Tet_protein_TetR_input_2x__protein_RNAP_forward__part_UTR1_forward_part_CDS_SrpR_forward_part_t16_forward_;
  r11: ordered_polymer_complex_part_P_Tac_protein_LacI_input_2x_forward__complex_complex_part_P_Tet_protein_TetR_input_2x__protein_RNAP_forward__part_UTR1_forward_part_CDS_SrpR_forward_part_t16_forward_ => ordered_polymer_complex_part_P_Tac_protein_LacI_input_2x_forward__complex_part_P_Tet_protein_TetR_input_2x_forward__part_UTR1_forward_part_CDS_SrpR_forward_part_t16_forward_ + rna_part_UTR1_forward_part_CDS_SrpR_forward_part_t16_forward_ + protein_RNAP; ktx__transcription_mm*ordered_polymer_complex_part_P_Tac_protein_LacI_input_2x_forward__complex_complex_part_P_Tet_protein_TetR_input_2x__protein_RNAP_forward__part_UTR1_forward_part_CDS_SrpR_forward_part_t16_forward_;
  r12: ordered_polymer_complex_part_P_Tac_protein_RNAP_forward__part_P_Tet_forward_part_UTR1_forward_part_CDS_SrpR_forward_part_t16_forward_ + protein_RNAP => ordered_polymer_complex_part_P_Tac_protein_RNAP_forward__complex_part_P_Tet_protein_RNAP_forward__part_UTR1_forward_part_CDS_SrpR_forward_part_t16_forward_; kb_P_Tet_leak_transcription_mm*ordered_polymer_complex_part_P_Tac_protein_RNAP_forward__part_P_Tet_forward_part_UTR1_forward_part_CDS_SrpR_forward_part_t16_forward_*protein_RNAP;
  r12rev: ordered_polymer_complex_part_P_Tac_protein_RNAP_forward__complex_part_P_Tet_protein_RNAP_forward__part_UTR1_forward_part_CDS_SrpR_forward_part_t16_forward_ => ordered_polymer_complex_part_P_Tac_protein_RNAP_forward__part_P_Tet_forward_part_UTR1_forward_part_CDS_SrpR_forward_part_t16_forward_ + protein_RNAP; ku_P_Tet_leak_transcription_mm*ordered_polymer_complex_part_P_Tac_protein_RNAP_forward__complex_part_P_Tet_protein_RNAP_forward__part_UTR1_forward_part_CDS_SrpR_forward_part_t16_forward_;
  r13: ordered_polymer_complex_part_P_Tac_protein_RNAP_forward__complex_part_P_Tet_protein_RNAP_forward__part_UTR1_forward_part_CDS_SrpR_forward_part_t16_forward_ => ordered_polymer_complex_part_P_Tac_protein_RNAP_forward__part_P_Tet_forward_part_UTR1_forward_part_CDS_SrpR_forward_part_t16_forward_ + rna_part_UTR1_forward_part_CDS_SrpR_forward_part_t16_forward_ + protein_RNAP; ktx_P_Tet_leak_transcription_mm*ordered_polymer_complex_part_P_Tac_protein_RNAP_forward__complex_part_P_Tet_protein_RNAP_forward__part_UTR1_forward_part_CDS_SrpR_forward_part_t16_forward_;
  r14: 2 protein_TetR_input + ordered_polymer_complex_part_P_Tac_protein_RNAP_forward__part_P_Tet_forward_part_UTR1_forward_part_CDS_SrpR_forward_part_t16_forward_ => ordered_polymer_complex_part_P_Tac_protein_RNAP_forward__complex_part_P_Tet_protein_TetR_input_2x_forward__part_UTR1_forward_part_CDS_SrpR_forward_part_t16_forward_; kb__one_step_cooperative_binding*protein_TetR_input^2*ordered_polymer_complex_part_P_Tac_protein_RNAP_forward__part_P_Tet_forward_part_UTR1_forward_part_CDS_SrpR_forward_part_t16_forward_;
  r14rev: ordered_polymer_complex_part_P_Tac_protein_RNAP_forward__complex_part_P_Tet_protein_TetR_input_2x_forward__part_UTR1_forward_part_CDS_SrpR_forward_part_t16_forward_ => 2 protein_TetR_input + ordered_polymer_complex_part_P_Tac_protein_RNAP_forward__part_P_Tet_forward_part_UTR1_forward_part_CDS_SrpR_forward_part_t16_forward_; ku__one_step_cooperative_binding*ordered_polymer_complex_part_P_Tac_protein_RNAP_forward__complex_part_P_Tet_protein_TetR_input_2x_forward__part_UTR1_forward_part_CDS_SrpR_forward_part_t16_forward_;
  r15: ordered_polymer_complex_part_P_Tac_protein_RNAP_forward__complex_part_P_Tet_protein_TetR_input_2x_forward__part_UTR1_forward_part_CDS_SrpR_forward_part_t16_forward_ + protein_RNAP => ordered_polymer_complex_part_P_Tac_protein_RNAP_forward__complex_complex_part_P_Tet_protein_TetR_input_2x__protein_RNAP_forward__part_UTR1_forward_part_CDS_SrpR_forward_part_t16_forward_; kb__transcription_mm*ordered_polymer_complex_part_P_Tac_protein_RNAP_forward__complex_part_P_Tet_protein_TetR_input_2x_forward__part_UTR1_forward_part_CDS_SrpR_forward_part_t16_forward_*protein_RNAP;
  r15rev: ordered_polymer_complex_part_P_Tac_protein_RNAP_forward__complex_complex_part_P_Tet_protein_TetR_input_2x__protein_RNAP_forward__part_UTR1_forward_part_CDS_SrpR_forward_part_t16_forward_ => ordered_polymer_complex_part_P_Tac_protein_RNAP_forward__complex_part_P_Tet_protein_TetR_input_2x_forward__part_UTR1_forward_part_CDS_SrpR_forward_part_t16_forward_ + protein_RNAP; ku__transcription_mm*ordered_polymer_complex_part_P_Tac_protein_RNAP_forward__complex_complex_part_P_Tet_protein_TetR_input_2x__protein_RNAP_forward__part_UTR1_forward_part_CDS_SrpR_forward_part_t16_forward_;
  r16: ordered_polymer_complex_part_P_Tac_protein_RNAP_forward__complex_complex_part_P_Tet_protein_TetR_input_2x__protein_RNAP_forward__part_UTR1_forward_part_CDS_SrpR_forward_part_t16_forward_ => ordered_polymer_complex_part_P_Tac_protein_RNAP_forward__complex_part_P_Tet_protein_TetR_input_2x_forward__part_UTR1_forward_part_CDS_SrpR_forward_part_t16_forward_ + rna_part_UTR1_forward_part_CDS_SrpR_forward_part_t16_forward_ + protein_RNAP; ktx__transcription_mm*ordered_polymer_complex_part_P_Tac_protein_RNAP_forward__complex_complex_part_P_Tet_protein_TetR_input_2x__protein_RNAP_forward__part_UTR1_forward_part_CDS_SrpR_forward_part_t16_forward_;
  r17: ordered_polymer_part_P_Tac_forward_complex_part_P_Tet_protein_RNAP_forward__part_UTR1_forward_part_CDS_SrpR_forward_part_t16_forward_ + protein_RNAP => ordered_polymer_complex_part_P_Tac_protein_RNAP_forward__complex_part_P_Tet_protein_RNAP_forward__part_UTR1_forward_part_CDS_SrpR_forward_part_t16_forward_; kb_P_Tac_leak_transcription_mm*ordered_polymer_part_P_Tac_forward_complex_part_P_Tet_protein_RNAP_forward__part_UTR1_forward_part_CDS_SrpR_forward_part_t16_forward_*protein_RNAP;
  r17rev: ordered_polymer_complex_part_P_Tac_protein_RNAP_forward__complex_part_P_Tet_protein_RNAP_forward__part_UTR1_forward_part_CDS_SrpR_forward_part_t16_forward_ => ordered_polymer_part_P_Tac_forward_complex_part_P_Tet_protein_RNAP_forward__part_UTR1_forward_part_CDS_SrpR_forward_part_t16_forward_ + protein_RNAP; ku_P_Tac_leak_transcription_mm*ordered_polymer_complex_part_P_Tac_protein_RNAP_forward__complex_part_P_Tet_protein_RNAP_forward__part_UTR1_forward_part_CDS_SrpR_forward_part_t16_forward_;
  r18: ordered_polymer_complex_part_P_Tac_protein_RNAP_forward__complex_part_P_Tet_protein_RNAP_forward__part_UTR1_forward_part_CDS_SrpR_forward_part_t16_forward_ => ordered_polymer_part_P_Tac_forward_complex_part_P_Tet_protein_RNAP_forward__part_UTR1_forward_part_CDS_SrpR_forward_part_t16_forward_ + rna_part_P_Tet_forward_part_UTR1_forward_part_CDS_SrpR_forward_part_t16_forward_ + protein_RNAP; ktx_P_Tac_leak_transcription_mm*ordered_polymer_complex_part_P_Tac_protein_RNAP_forward__complex_part_P_Tet_protein_RNAP_forward__part_UTR1_forward_part_CDS_SrpR_forward_part_t16_forward_;
  r19: 2 protein_LacI_input + ordered_polymer_part_P_Tac_forward_complex_part_P_Tet_protein_RNAP_forward__part_UTR1_forward_part_CDS_SrpR_forward_part_t16_forward_ => ordered_polymer_complex_part_P_Tac_protein_LacI_input_2x_forward__complex_part_P_Tet_protein_RNAP_forward__part_UTR1_forward_part_CDS_SrpR_forward_part_t16_forward_; kb__one_step_cooperative_binding*protein_LacI_input^2*ordered_polymer_part_P_Tac_forward_complex_part_P_Tet_protein_RNAP_forward__part_UTR1_forward_part_CDS_SrpR_forward_part_t16_forward_;
  r19rev: ordered_polymer_complex_part_P_Tac_protein_LacI_input_2x_forward__complex_part_P_Tet_protein_RNAP_forward__part_UTR1_forward_part_CDS_SrpR_forward_part_t16_forward_ => 2 protein_LacI_input + ordered_polymer_part_P_Tac_forward_complex_part_P_Tet_protein_RNAP_forward__part_UTR1_forward_part_CDS_SrpR_forward_part_t16_forward_; ku__one_step_cooperative_binding*ordered_polymer_complex_part_P_Tac_protein_LacI_input_2x_forward__complex_part_P_Tet_protein_RNAP_forward__part_UTR1_forward_part_CDS_SrpR_forward_part_t16_forward_;
  r20: ordered_polymer_complex_part_P_Tac_protein_LacI_input_2x_forward__complex_part_P_Tet_protein_RNAP_forward__part_UTR1_forward_part_CDS_SrpR_forward_part_t16_forward_ + protein_RNAP => ordered_polymer_complex_complex_part_P_Tac_protein_LacI_input_2x__protein_RNAP_forward__complex_part_P_Tet_protein_RNAP_forward__part_UTR1_forward_part_CDS_SrpR_forward_part_t16_forward_; kb__transcription_mm*ordered_polymer_complex_part_P_Tac_protein_LacI_input_2x_forward__complex_part_P_Tet_protein_RNAP_forward__part_UTR1_forward_part_CDS_SrpR_forward_part_t16_forward_*protein_RNAP;
  r20rev: ordered_polymer_complex_complex_part_P_Tac_protein_LacI_input_2x__protein_RNAP_forward__complex_part_P_Tet_protein_RNAP_forward__part_UTR1_forward_part_CDS_SrpR_forward_part_t16_forward_ => ordered_polymer_complex_part_P_Tac_protein_LacI_input_2x_forward__complex_part_P_Tet_protein_RNAP_forward__part_UTR1_forward_part_CDS_SrpR_forward_part_t16_forward_ + protein_RNAP; ku__transcription_mm*ordered_polymer_complex_complex_part_P_Tac_protein_LacI_input_2x__protein_RNAP_forward__complex_part_P_Tet_protein_RNAP_forward__part_UTR1_forward_part_CDS_SrpR_forward_part_t16_forward_;
  r21: ordered_polymer_complex_complex_part_P_Tac_protein_LacI_input_2x__protein_RNAP_forward__complex_part_P_Tet_protein_RNAP_forward__part_UTR1_forward_part_CDS_SrpR_forward_part_t16_forward_ => ordered_polymer_complex_part_P_Tac_protein_LacI_input_2x_forward__complex_part_P_Tet_protein_RNAP_forward__part_UTR1_forward_part_CDS_SrpR_forward_part_t16_forward_ + rna_part_P_Tet_forward_part_UTR1_forward_part_CDS_SrpR_forward_part_t16_forward_ + protein_RNAP; ktx__transcription_mm*ordered_polymer_complex_complex_part_P_Tac_protein_LacI_input_2x__protein_RNAP_forward__complex_part_P_Tet_protein_RNAP_forward__part_UTR1_forward_part_CDS_SrpR_forward_part_t16_forward_;
  r22: ordered_polymer_part_P_Tac_forward_complex_part_P_Tet_protein_TetR_input_2x_forward__part_UTR1_forward_part_CDS_SrpR_forward_part_t16_forward_ + protein_RNAP => ordered_polymer_complex_part_P_Tac_protein_RNAP_forward__complex_part_P_Tet_protein_TetR_input_2x_forward__part_UTR1_forward_part_CDS_SrpR_forward_part_t16_forward_; kb_P_Tac_leak_transcription_mm*ordered_polymer_part_P_Tac_forward_complex_part_P_Tet_protein_TetR_input_2x_forward__part_UTR1_forward_part_CDS_SrpR_forward_part_t16_forward_*protein_RNAP;
  r22rev: ordered_polymer_complex_part_P_Tac_protein_RNAP_forward__complex_part_P_Tet_protein_TetR_input_2x_forward__part_UTR1_forward_part_CDS_SrpR_forward_part_t16_forward_ => ordered_polymer_part_P_Tac_forward_complex_part_P_Tet_protein_TetR_input_2x_forward__part_UTR1_forward_part_CDS_SrpR_forward_part_t16_forward_ + protein_RNAP; ku_P_Tac_leak_transcription_mm*ordered_polymer_complex_part_P_Tac_protein_RNAP_forward__complex_part_P_Tet_protein_TetR_input_2x_forward__part_UTR1_forward_part_CDS_SrpR_forward_part_t16_forward_;
  r23: ordered_polymer_complex_part_P_Tac_protein_RNAP_forward__complex_part_P_Tet_protein_TetR_input_2x_forward__part_UTR1_forward_part_CDS_SrpR_forward_part_t16_forward_ => ordered_polymer_part_P_Tac_forward_complex_part_P_Tet_protein_TetR_input_2x_forward__part_UTR1_forward_part_CDS_SrpR_forward_part_t16_forward_ + rna_part_P_Tet_forward_part_UTR1_forward_part_CDS_SrpR_forward_part_t16_forward_ + protein_RNAP; ktx_P_Tac_leak_transcription_mm*ordered_polymer_complex_part_P_Tac_protein_RNAP_forward__complex_part_P_Tet_protein_TetR_input_2x_forward__part_UTR1_forward_part_CDS_SrpR_forward_part_t16_forward_;
  r24: 2 protein_LacI_input + ordered_polymer_part_P_Tac_forward_complex_part_P_Tet_protein_TetR_input_2x_forward__part_UTR1_forward_part_CDS_SrpR_forward_part_t16_forward_ => ordered_polymer_complex_part_P_Tac_protein_LacI_input_2x_forward__complex_part_P_Tet_protein_TetR_input_2x_forward__part_UTR1_forward_part_CDS_SrpR_forward_part_t16_forward_; kb__one_step_cooperative_binding*protein_LacI_input^2*ordered_polymer_part_P_Tac_forward_complex_part_P_Tet_protein_TetR_input_2x_forward__part_UTR1_forward_part_CDS_SrpR_forward_part_t16_forward_;
  r24rev: ordered_polymer_complex_part_P_Tac_protein_LacI_input_2x_forward__complex_part_P_Tet_protein_TetR_input_2x_forward__part_UTR1_forward_part_CDS_SrpR_forward_part_t16_forward_ => 2 protein_LacI_input + ordered_polymer_part_P_Tac_forward_complex_part_P_Tet_protein_TetR_input_2x_forward__part_UTR1_forward_part_CDS_SrpR_forward_part_t16_forward_; ku__one_step_cooperative_binding*ordered_polymer_complex_part_P_Tac_protein_LacI_input_2x_forward__complex_part_P_Tet_protein_TetR_input_2x_forward__part_UTR1_forward_part_CDS_SrpR_forward_part_t16_forward_;
  r25: ordered_polymer_complex_part_P_Tac_protein_LacI_input_2x_forward__complex_part_P_Tet_protein_TetR_input_2x_forward__part_UTR1_forward_part_CDS_SrpR_forward_part_t16_forward_ + protein_RNAP => ordered_polymer_complex_complex_part_P_Tac_protein_LacI_input_2x__protein_RNAP_forward__complex_part_P_Tet_protein_TetR_input_2x_forward__part_UTR1_forward_part_CDS_SrpR_forward_part_t16_forward_; kb__transcription_mm*ordered_polymer_complex_part_P_Tac_protein_LacI_input_2x_forward__complex_part_P_Tet_protein_TetR_input_2x_forward__part_UTR1_forward_part_CDS_SrpR_forward_part_t16_forward_*protein_RNAP;
  r25rev: ordered_polymer_complex_complex_part_P_Tac_protein_LacI_input_2x__protein_RNAP_forward__complex_part_P_Tet_protein_TetR_input_2x_forward__part_UTR1_forward_part_CDS_SrpR_forward_part_t16_forward_ => ordered_polymer_complex_part_P_Tac_protein_LacI_input_2x_forward__complex_part_P_Tet_protein_TetR_input_2x_forward__part_UTR1_forward_part_CDS_SrpR_forward_part_t16_forward_ + protein_RNAP; ku__transcription_mm*ordered_polymer_complex_complex_part_P_Tac_protein_LacI_input_2x__protein_RNAP_forward__complex_part_P_Tet_protein_TetR_input_2x_forward__part_UTR1_forward_part_CDS_SrpR_forward_part_t16_forward_;
  r26: ordered_polymer_complex_complex_part_P_Tac_protein_LacI_input_2x__protein_RNAP_forward__complex_part_P_Tet_protein_TetR_input_2x_forward__part_UTR1_forward_part_CDS_SrpR_forward_part_t16_forward_ => ordered_polymer_complex_part_P_Tac_protein_LacI_input_2x_forward__complex_part_P_Tet_protein_TetR_input_2x_forward__part_UTR1_forward_part_CDS_SrpR_forward_part_t16_forward_ + rna_part_P_Tet_forward_part_UTR1_forward_part_CDS_SrpR_forward_part_t16_forward_ + protein_RNAP; ktx__transcription_mm*ordered_polymer_complex_complex_part_P_Tac_protein_LacI_input_2x__protein_RNAP_forward__complex_part_P_Tet_protein_TetR_input_2x_forward__part_UTR1_forward_part_CDS_SrpR_forward_part_t16_forward_;
  r27: ordered_polymer_part_P_Tac_forward_complex_complex_part_P_Tet_protein_TetR_input_2x__protein_RNAP_forward__part_UTR1_forward_part_CDS_SrpR_forward_part_t16_forward_ + protein_RNAP => ordered_polymer_complex_part_P_Tac_protein_RNAP_forward__complex_complex_part_P_Tet_protein_TetR_input_2x__protein_RNAP_forward__part_UTR1_forward_part_CDS_SrpR_forward_part_t16_forward_; kb_P_Tac_leak_transcription_mm*ordered_polymer_part_P_Tac_forward_complex_complex_part_P_Tet_protein_TetR_input_2x__protein_RNAP_forward__part_UTR1_forward_part_CDS_SrpR_forward_part_t16_forward_*protein_RNAP;
  r27rev: ordered_polymer_complex_part_P_Tac_protein_RNAP_forward__complex_complex_part_P_Tet_protein_TetR_input_2x__protein_RNAP_forward__part_UTR1_forward_part_CDS_SrpR_forward_part_t16_forward_ => ordered_polymer_part_P_Tac_forward_complex_complex_part_P_Tet_protein_TetR_input_2x__protein_RNAP_forward__part_UTR1_forward_part_CDS_SrpR_forward_part_t16_forward_ + protein_RNAP; ku_P_Tac_leak_transcription_mm*ordered_polymer_complex_part_P_Tac_protein_RNAP_forward__complex_complex_part_P_Tet_protein_TetR_input_2x__protein_RNAP_forward__part_UTR1_forward_part_CDS_SrpR_forward_part_t16_forward_;
  r28: ordered_polymer_complex_part_P_Tac_protein_RNAP_forward__complex_complex_part_P_Tet_protein_TetR_input_2x__protein_RNAP_forward__part_UTR1_forward_part_CDS_SrpR_forward_part_t16_forward_ => ordered_polymer_part_P_Tac_forward_complex_complex_part_P_Tet_protein_TetR_input_2x__protein_RNAP_forward__part_UTR1_forward_part_CDS_SrpR_forward_part_t16_forward_ + rna_part_P_Tet_forward_part_UTR1_forward_part_CDS_SrpR_forward_part_t16_forward_ + protein_RNAP; ktx_P_Tac_leak_transcription_mm*ordered_polymer_complex_part_P_Tac_protein_RNAP_forward__complex_complex_part_P_Tet_protein_TetR_input_2x__protein_RNAP_forward__part_UTR1_forward_part_CDS_SrpR_forward_part_t16_forward_;
  r29: 2 protein_LacI_input + ordered_polymer_part_P_Tac_forward_complex_complex_part_P_Tet_protein_TetR_input_2x__protein_RNAP_forward__part_UTR1_forward_part_CDS_SrpR_forward_part_t16_forward_ => ordered_polymer_complex_part_P_Tac_protein_LacI_input_2x_forward__complex_complex_part_P_Tet_protein_TetR_input_2x__protein_RNAP_forward__part_UTR1_forward_part_CDS_SrpR_forward_part_t16_forward_; kb__one_step_cooperative_binding*protein_LacI_input^2*ordered_polymer_part_P_Tac_forward_complex_complex_part_P_Tet_protein_TetR_input_2x__protein_RNAP_forward__part_UTR1_forward_part_CDS_SrpR_forward_part_t16_forward_;
  r29rev: ordered_polymer_complex_part_P_Tac_protein_LacI_input_2x_forward__complex_complex_part_P_Tet_protein_TetR_input_2x__protein_RNAP_forward__part_UTR1_forward_part_CDS_SrpR_forward_part_t16_forward_ => 2 protein_LacI_input + ordered_polymer_part_P_Tac_forward_complex_complex_part_P_Tet_protein_TetR_input_2x__protein_RNAP_forward__part_UTR1_forward_part_CDS_SrpR_forward_part_t16_forward_; ku__one_step_cooperative_binding*ordered_polymer_complex_part_P_Tac_protein_LacI_input_2x_forward__complex_complex_part_P_Tet_protein_TetR_input_2x__protein_RNAP_forward__part_UTR1_forward_part_CDS_SrpR_forward_part_t16_forward_;
  r30: ordered_polymer_complex_part_P_Tac_protein_LacI_input_2x_forward__complex_complex_part_P_Tet_protein_TetR_input_2x__protein_RNAP_forward__part_UTR1_forward_part_CDS_SrpR_forward_part_t16_forward_ + protein_RNAP => ordered_polymer_complex_complex_part_P_Tac_protein_LacI_input_2x__protein_RNAP_forward__complex_complex_part_P_Tet_protein_TetR_input_2x__protein_RNAP_forward__part_UTR1_forward_part_CDS_SrpR_forward_part_t16_forward_; kb__transcription_mm*ordered_polymer_complex_part_P_Tac_protein_LacI_input_2x_forward__complex_complex_part_P_Tet_protein_TetR_input_2x__protein_RNAP_forward__part_UTR1_forward_part_CDS_SrpR_forward_part_t16_forward_*protein_RNAP;
  r30rev: ordered_polymer_complex_complex_part_P_Tac_protein_LacI_input_2x__protein_RNAP_forward__complex_complex_part_P_Tet_protein_TetR_input_2x__protein_RNAP_forward__part_UTR1_forward_part_CDS_SrpR_forward_part_t16_forward_ => ordered_polymer_complex_part_P_Tac_protein_LacI_input_2x_forward__complex_complex_part_P_Tet_protein_TetR_input_2x__protein_RNAP_forward__part_UTR1_forward_part_CDS_SrpR_forward_part_t16_forward_ + protein_RNAP; ku__transcription_mm*ordered_polymer_complex_complex_part_P_Tac_protein_LacI_input_2x__protein_RNAP_forward__complex_complex_part_P_Tet_protein_TetR_input_2x__protein_RNAP_forward__part_UTR1_forward_part_CDS_SrpR_forward_part_t16_forward_;
  r31: ordered_polymer_complex_complex_part_P_Tac_protein_LacI_input_2x__protein_RNAP_forward__complex_complex_part_P_Tet_protein_TetR_input_2x__protein_RNAP_forward__part_UTR1_forward_part_CDS_SrpR_forward_part_t16_forward_ => ordered_polymer_complex_part_P_Tac_protein_LacI_input_2x_forward__complex_complex_part_P_Tet_protein_TetR_input_2x__protein_RNAP_forward__part_UTR1_forward_part_CDS_SrpR_forward_part_t16_forward_ + rna_part_P_Tet_forward_part_UTR1_forward_part_CDS_SrpR_forward_part_t16_forward_ + protein_RNAP; ktx__transcription_mm*ordered_polymer_complex_complex_part_P_Tac_protein_LacI_input_2x__protein_RNAP_forward__complex_complex_part_P_Tet_protein_TetR_input_2x__protein_RNAP_forward__part_UTR1_forward_part_CDS_SrpR_forward_part_t16_forward_;
  r32: dna_part_P_Tac_forward_part_P_Tet_forward_part_UTR1_forward_part_CDS_SrpR_forward_part_t16_forward_ + protein_RNAP => ordered_polymer_complex_part_P_Tac_protein_RNAP_forward__part_P_Tet_forward_part_UTR1_forward_part_CDS_SrpR_forward_part_t16_forward_; kb_P_Tac_leak_transcription_mm*dna_part_P_Tac_forward_part_P_Tet_forward_part_UTR1_forward_part_CDS_SrpR_forward_part_t16_forward_*protein_RNAP;
  r32rev: ordered_polymer_complex_part_P_Tac_protein_RNAP_forward__part_P_Tet_forward_part_UTR1_forward_part_CDS_SrpR_forward_part_t16_forward_ => dna_part_P_Tac_forward_part_P_Tet_forward_part_UTR1_forward_part_CDS_SrpR_forward_part_t16_forward_ + protein_RNAP; ku_P_Tac_leak_transcription_mm*ordered_polymer_complex_part_P_Tac_protein_RNAP_forward__part_P_Tet_forward_part_UTR1_forward_part_CDS_SrpR_forward_part_t16_forward_;
  r33: ordered_polymer_complex_part_P_Tac_protein_RNAP_forward__part_P_Tet_forward_part_UTR1_forward_part_CDS_SrpR_forward_part_t16_forward_ => dna_part_P_Tac_forward_part_P_Tet_forward_part_UTR1_forward_part_CDS_SrpR_forward_part_t16_forward_ + rna_part_P_Tet_forward_part_UTR1_forward_part_CDS_SrpR_forward_part_t16_forward_ + protein_RNAP; ktx_P_Tac_leak_transcription_mm*ordered_polymer_complex_part_P_Tac_protein_RNAP_forward__part_P_Tet_forward_part_UTR1_forward_part_CDS_SrpR_forward_part_t16_forward_;
  r34: 2 protein_LacI_input + dna_part_P_Tac_forward_part_P_Tet_forward_part_UTR1_forward_part_CDS_SrpR_forward_part_t16_forward_ => ordered_polymer_complex_part_P_Tac_protein_LacI_input_2x_forward__part_P_Tet_forward_part_UTR1_forward_part_CDS_SrpR_forward_part_t16_forward_; kb__one_step_cooperative_binding*protein_LacI_input^2*dna_part_P_Tac_forward_part_P_Tet_forward_part_UTR1_forward_part_CDS_SrpR_forward_part_t16_forward_;
  r34rev: ordered_polymer_complex_part_P_Tac_protein_LacI_input_2x_forward__part_P_Tet_forward_part_UTR1_forward_part_CDS_SrpR_forward_part_t16_forward_ => 2 protein_LacI_input + dna_part_P_Tac_forward_part_P_Tet_forward_part_UTR1_forward_part_CDS_SrpR_forward_part_t16_forward_; ku__one_step_cooperative_binding*ordered_polymer_complex_part_P_Tac_protein_LacI_input_2x_forward__part_P_Tet_forward_part_UTR1_forward_part_CDS_SrpR_forward_part_t16_forward_;
  r35: ordered_polymer_complex_part_P_Tac_protein_LacI_input_2x_forward__part_P_Tet_forward_part_UTR1_forward_part_CDS_SrpR_forward_part_t16_forward_ + protein_RNAP => ordered_polymer_complex_complex_part_P_Tac_protein_LacI_input_2x__protein_RNAP_forward__part_P_Tet_forward_part_UTR1_forward_part_CDS_SrpR_forward_part_t16_forward_; kb__transcription_mm*ordered_polymer_complex_part_P_Tac_protein_LacI_input_2x_forward__part_P_Tet_forward_part_UTR1_forward_part_CDS_SrpR_forward_part_t16_forward_*protein_RNAP;
  r35rev: ordered_polymer_complex_complex_part_P_Tac_protein_LacI_input_2x__protein_RNAP_forward__part_P_Tet_forward_part_UTR1_forward_part_CDS_SrpR_forward_part_t16_forward_ => ordered_polymer_complex_part_P_Tac_protein_LacI_input_2x_forward__part_P_Tet_forward_part_UTR1_forward_part_CDS_SrpR_forward_part_t16_forward_ + protein_RNAP; ku__transcription_mm*ordered_polymer_complex_complex_part_P_Tac_protein_LacI_input_2x__protein_RNAP_forward__part_P_Tet_forward_part_UTR1_forward_part_CDS_SrpR_forward_part_t16_forward_;
  r36: ordered_polymer_complex_complex_part_P_Tac_protein_LacI_input_2x__protein_RNAP_forward__part_P_Tet_forward_part_UTR1_forward_part_CDS_SrpR_forward_part_t16_forward_ => ordered_polymer_complex_part_P_Tac_protein_LacI_input_2x_forward__part_P_Tet_forward_part_UTR1_forward_part_CDS_SrpR_forward_part_t16_forward_ + rna_part_P_Tet_forward_part_UTR1_forward_part_CDS_SrpR_forward_part_t16_forward_ + protein_RNAP; ktx__transcription_mm*ordered_polymer_complex_complex_part_P_Tac_protein_LacI_input_2x__protein_RNAP_forward__part_P_Tet_forward_part_UTR1_forward_part_CDS_SrpR_forward_part_t16_forward_;
  r37: dna_part_P_Tac_forward_part_P_Tet_forward_part_UTR1_forward_part_CDS_SrpR_forward_part_t16_forward_ + protein_RNAP => ordered_polymer_part_P_Tac_forward_complex_part_P_Tet_protein_RNAP_forward__part_UTR1_forward_part_CDS_SrpR_forward_part_t16_forward_; kb_P_Tet_leak_transcription_mm*dna_part_P_Tac_forward_part_P_Tet_forward_part_UTR1_forward_part_CDS_SrpR_forward_part_t16_forward_*protein_RNAP;
  r37rev: ordered_polymer_part_P_Tac_forward_complex_part_P_Tet_protein_RNAP_forward__part_UTR1_forward_part_CDS_SrpR_forward_part_t16_forward_ => dna_part_P_Tac_forward_part_P_Tet_forward_part_UTR1_forward_part_CDS_SrpR_forward_part_t16_forward_ + protein_RNAP; ku_P_Tet_leak_transcription_mm*ordered_polymer_part_P_Tac_forward_complex_part_P_Tet_protein_RNAP_forward__part_UTR1_forward_part_CDS_SrpR_forward_part_t16_forward_;
  r38: ordered_polymer_part_P_Tac_forward_complex_part_P_Tet_protein_RNAP_forward__part_UTR1_forward_part_CDS_SrpR_forward_part_t16_forward_ => dna_part_P_Tac_forward_part_P_Tet_forward_part_UTR1_forward_part_CDS_SrpR_forward_part_t16_forward_ + rna_part_UTR1_forward_part_CDS_SrpR_forward_part_t16_forward_ + protein_RNAP; ktx_P_Tet_leak_transcription_mm*ordered_polymer_part_P_Tac_forward_complex_part_P_Tet_protein_RNAP_forward__part_UTR1_forward_part_CDS_SrpR_forward_part_t16_forward_;
  r39: 2 protein_TetR_input + dna_part_P_Tac_forward_part_P_Tet_forward_part_UTR1_forward_part_CDS_SrpR_forward_part_t16_forward_ => ordered_polymer_part_P_Tac_forward_complex_part_P_Tet_protein_TetR_input_2x_forward__part_UTR1_forward_part_CDS_SrpR_forward_part_t16_forward_; kb__one_step_cooperative_binding*protein_TetR_input^2*dna_part_P_Tac_forward_part_P_Tet_forward_part_UTR1_forward_part_CDS_SrpR_forward_part_t16_forward_;
  r39rev: ordered_polymer_part_P_Tac_forward_complex_part_P_Tet_protein_TetR_input_2x_forward__part_UTR1_forward_part_CDS_SrpR_forward_part_t16_forward_ => 2 protein_TetR_input + dna_part_P_Tac_forward_part_P_Tet_forward_part_UTR1_forward_part_CDS_SrpR_forward_part_t16_forward_; ku__one_step_cooperative_binding*ordered_polymer_part_P_Tac_forward_complex_part_P_Tet_protein_TetR_input_2x_forward__part_UTR1_forward_part_CDS_SrpR_forward_part_t16_forward_;
  r40: ordered_polymer_part_P_Tac_forward_complex_part_P_Tet_protein_TetR_input_2x_forward__part_UTR1_forward_part_CDS_SrpR_forward_part_t16_forward_ + protein_RNAP => ordered_polymer_part_P_Tac_forward_complex_complex_part_P_Tet_protein_TetR_input_2x__protein_RNAP_forward__part_UTR1_forward_part_CDS_SrpR_forward_part_t16_forward_; kb__transcription_mm*ordered_polymer_part_P_Tac_forward_complex_part_P_Tet_protein_TetR_input_2x_forward__part_UTR1_forward_part_CDS_SrpR_forward_part_t16_forward_*protein_RNAP;
  r40rev: ordered_polymer_part_P_Tac_forward_complex_complex_part_P_Tet_protein_TetR_input_2x__protein_RNAP_forward__part_UTR1_forward_part_CDS_SrpR_forward_part_t16_forward_ => ordered_polymer_part_P_Tac_forward_complex_part_P_Tet_protein_TetR_input_2x_forward__part_UTR1_forward_part_CDS_SrpR_forward_part_t16_forward_ + protein_RNAP; ku__transcription_mm*ordered_polymer_part_P_Tac_forward_complex_complex_part_P_Tet_protein_TetR_input_2x__protein_RNAP_forward__part_UTR1_forward_part_CDS_SrpR_forward_part_t16_forward_;
  r41: ordered_polymer_part_P_Tac_forward_complex_complex_part_P_Tet_protein_TetR_input_2x__protein_RNAP_forward__part_UTR1_forward_part_CDS_SrpR_forward_part_t16_forward_ => ordered_polymer_part_P_Tac_forward_complex_part_P_Tet_protein_TetR_input_2x_forward__part_UTR1_forward_part_CDS_SrpR_forward_part_t16_forward_ + rna_part_UTR1_forward_part_CDS_SrpR_forward_part_t16_forward_ + protein_RNAP; ktx__transcription_mm*ordered_polymer_part_P_Tac_forward_complex_complex_part_P_Tet_protein_TetR_input_2x__protein_RNAP_forward__part_UTR1_forward_part_CDS_SrpR_forward_part_t16_forward_;
  r42: rna_part_P_Tet_forward_part_UTR1_forward_part_CDS_SrpR_forward_part_t16_forward_ + protein_Ribo => ordered_polymer_part_P_Tet_forward_complex_part_UTR1_protein_Ribo_forward__part_CDS_SrpR_forward_part_t16_forward_; kb__*rna_part_P_Tet_forward_part_UTR1_forward_part_CDS_SrpR_forward_part_t16_forward_*protein_Ribo;
  r42rev: ordered_polymer_part_P_Tet_forward_complex_part_UTR1_protein_Ribo_forward__part_CDS_SrpR_forward_part_t16_forward_ => rna_part_P_Tet_forward_part_UTR1_forward_part_CDS_SrpR_forward_part_t16_forward_ + protein_Ribo; ku__*ordered_polymer_part_P_Tet_forward_complex_part_UTR1_protein_Ribo_forward__part_CDS_SrpR_forward_part_t16_forward_;
  r43: ordered_polymer_part_P_Tet_forward_complex_part_UTR1_protein_Ribo_forward__part_CDS_SrpR_forward_part_t16_forward_ => rna_part_P_Tet_forward_part_UTR1_forward_part_CDS_SrpR_forward_part_t16_forward_ + protein_SrpR_degtagged + protein_Ribo; ktl__*ordered_polymer_part_P_Tet_forward_complex_part_UTR1_protein_Ribo_forward__part_CDS_SrpR_forward_part_t16_forward_;
  r44: rna_part_UTR1_forward_part_CDS_SrpR_forward_part_t16_forward_ + protein_Ribo => ordered_polymer_complex_part_UTR1_protein_Ribo_forward__part_CDS_SrpR_forward_part_t16_forward_; kb__*rna_part_UTR1_forward_part_CDS_SrpR_forward_part_t16_forward_*protein_Ribo;
  r44rev: ordered_polymer_complex_part_UTR1_protein_Ribo_forward__part_CDS_SrpR_forward_part_t16_forward_ => rna_part_UTR1_forward_part_CDS_SrpR_forward_part_t16_forward_ + protein_Ribo; ku__*ordered_polymer_complex_part_UTR1_protein_Ribo_forward__part_CDS_SrpR_forward_part_t16_forward_;
  r45: ordered_polymer_complex_part_UTR1_protein_Ribo_forward__part_CDS_SrpR_forward_part_t16_forward_ => rna_part_UTR1_forward_part_CDS_SrpR_forward_part_t16_forward_ + protein_SrpR_degtagged + protein_Ribo; ktl__*ordered_polymer_complex_part_UTR1_protein_Ribo_forward__part_CDS_SrpR_forward_part_t16_forward_;
  r46: protein_SrpR_degtagged => ; kdil__*protein_SrpR_degtagged;
  r47: rna_part_UTR1_forward_part_CDS_SrpR_forward_part_t16_forward_ + protein_RNAase => complex_protein_RNAase_rna_part_UTR1_forward_part_CDS_SrpR_forward_part_t16_forward__; kb__*rna_part_UTR1_forward_part_CDS_SrpR_forward_part_t16_forward_*protein_RNAase;
  r47rev: complex_protein_RNAase_rna_part_UTR1_forward_part_CDS_SrpR_forward_part_t16_forward__ => rna_part_UTR1_forward_part_CDS_SrpR_forward_part_t16_forward_ + protein_RNAase; ku__*complex_protein_RNAase_rna_part_UTR1_forward_part_CDS_SrpR_forward_part_t16_forward__;
  r48: complex_protein_RNAase_rna_part_UTR1_forward_part_CDS_SrpR_forward_part_t16_forward__ => protein_RNAase; kdeg__*complex_protein_RNAase_rna_part_UTR1_forward_part_CDS_SrpR_forward_part_t16_forward__;
  r49: rna_part_P_Tet_forward_part_UTR1_forward_part_CDS_SrpR_forward_part_t16_forward_ + protein_RNAase => complex_protein_RNAase_rna_part_P_Tet_forward_part_UTR1_forward_part_CDS_SrpR_forward_part_t16_forward__; kb__*rna_part_P_Tet_forward_part_UTR1_forward_part_CDS_SrpR_forward_part_t16_forward_*protein_RNAase;
  r49rev: complex_protein_RNAase_rna_part_P_Tet_forward_part_UTR1_forward_part_CDS_SrpR_forward_part_t16_forward__ => rna_part_P_Tet_forward_part_UTR1_forward_part_CDS_SrpR_forward_part_t16_forward_ + protein_RNAase; ku__*complex_protein_RNAase_rna_part_P_Tet_forward_part_UTR1_forward_part_CDS_SrpR_forward_part_t16_forward__;
  r50: complex_protein_RNAase_rna_part_P_Tet_forward_part_UTR1_forward_part_CDS_SrpR_forward_part_t16_forward__ => protein_RNAase; kdeg__*complex_protein_RNAase_rna_part_P_Tet_forward_part_UTR1_forward_part_CDS_SrpR_forward_part_t16_forward__;

  // Unit definitions:
  unit square_metre = metre^2;
end
